// SBML level 3 version 2

model combined_model_of__biocrnpyler_669103_biocrnpyler_566124()
  // model units - substance: mole, time: second, volume: litre, area: square_metre, length: metre, extent: mole

  // Compartments:
  compartment default_virE2biocrnpyler_669103_combined = 2e-6;

  // Species:
  species dna_g_virE2biocrnpyler_669103 in default_virE2biocrnpyler_669103_combined = 0;
  species tetR_virE2biocrnpyler_669103 in default_virE2biocrnpyler_669103_combined = 0;
  species rna_g_virE2biocrnpyler_669103 in default_virE2biocrnpyler_669103_combined = 0;
  species VirE2_f_virE2biocrnpyler_669103 in default_virE2biocrnpyler_669103_combined = 0;
  species atc_i_virE2biocrnpyler_669103 in default_virE2biocrnpyler_669103_combined = 0;
  species complex_atc_i_tetR_virE2biocrnpyler_669103 in default_virE2biocrnpyler_669103_combined = 0;
  species VirE2_b_virE2biocrnpyler_669103 in default_virE2biocrnpyler_669103_combined = 0;
  species complex_dna_g_tetR_virE2biocrnpyler_669103 in default_virE2biocrnpyler_669103_combined = 0;
  species complex_atc_i_dna_g_tetR_virE2biocrnpyler_669103 in default_virE2biocrnpyler_669103_combined = 0;
  species enzyme_hex_ATP_rheostatbiocrnpyler_566124 in default_virE2biocrnpyler_669103_combined = 0;
  species ATP_virE2biocrnpyler_669103_1_combined in default_virE2biocrnpyler_669103_combined = 0;
  species molecule_glucose_ATP_rheostatbiocrnpyler_566124 in default_virE2biocrnpyler_669103_combined = 0;
  species molecule_g6p_ATP_rheostatbiocrnpyler_566124 in default_virE2biocrnpyler_669103_combined = 0;
  species ADP_virE2biocrnpyler_669103_1_combined in default_virE2biocrnpyler_669103_combined = 0;
  species complex_enzyme_hex_metabolite_atp_molecule_glucose_ATP_rheostatbiocrnpyler_566124 in default_virE2biocrnpyler_669103_combined = 0;
  species complex_enzyme_hex_metabolite_adp_molecule_g6p_ATP_rheostatbiocrnpyler_566124 in default_virE2biocrnpyler_669103_combined = 0;
  species enzyme_pgi_ATP_rheostatbiocrnpyler_566124 in default_virE2biocrnpyler_669103_combined = 0;
  species molecule_f6p_ATP_rheostatbiocrnpyler_566124 in default_virE2biocrnpyler_669103_combined = 0;
  species complex_enzyme_pgi_molecule_g6p_ATP_rheostatbiocrnpyler_566124 in default_virE2biocrnpyler_669103_combined = 0;
  species complex_enzyme_pgi_molecule_f6p_ATP_rheostatbiocrnpyler_566124 in default_virE2biocrnpyler_669103_combined = 0;
  species enzyme_pfk_ATP_rheostatbiocrnpyler_566124 in default_virE2biocrnpyler_669103_combined = 0;
  species molecule_f16p_ATP_rheostatbiocrnpyler_566124 in default_virE2biocrnpyler_669103_combined = 0;
  species complex_enzyme_pfk_metabolite_atp_molecule_f6p_ATP_rheostatbiocrnpyler_566124 in default_virE2biocrnpyler_669103_combined = 0;
  species complex_enzyme_pfk_metabolite_adp_molecule_f16p_ATP_rheostatbiocrnpyler_566124 in default_virE2biocrnpyler_669103_combined = 0;
  species enzyme_ald_tpi_ATP_rheostatbiocrnpyler_566124 in default_virE2biocrnpyler_669103_combined = 0;
  species molecule_g3p_ATP_rheostatbiocrnpyler_566124 in default_virE2biocrnpyler_669103_combined = 0;
  species complex_enzyme_ald_tpi_molecule_f16p_ATP_rheostatbiocrnpyler_566124 in default_virE2biocrnpyler_669103_combined = 0;
  species complex_enzyme_ald_tpi_2x_molecule_g3p_ATP_rheostatbiocrnpyler_566124 in default_virE2biocrnpyler_669103_combined = 0;
  species enzyme_gapN_ATP_rheostatbiocrnpyler_566124 in default_virE2biocrnpyler_669103_combined = 0;
  species metabolite_nadp_ATP_rheostatbiocrnpyler_566124 in default_virE2biocrnpyler_669103_combined = 0;
  species molecule_3pg_ATP_rheostatbiocrnpyler_566124 in default_virE2biocrnpyler_669103_combined = 0;
  species metabolite_nadph_ATP_rheostatbiocrnpyler_566124 in default_virE2biocrnpyler_669103_combined = 0;
  species complex_enzyme_gapN_2x_metabolite_nadp_2x_molecule_g3p_ATP_rheostatbiocrnpyler_566124 in default_virE2biocrnpyler_669103_combined = 0;
  species complex_enzyme_gapN_2x_metabolite_nadph_2x_molecule_3pg_ATP_rheostatbiocrnpyler_566124 in default_virE2biocrnpyler_669103_combined = 0;
  species enzyme_mGapDH_ATP_rheostatbiocrnpyler_566124 in default_virE2biocrnpyler_669103_combined = 0;
  species P_virE2biocrnpyler_669103_1_combined in default_virE2biocrnpyler_669103_combined = 0;
  species molecule_13bpg_ATP_rheostatbiocrnpyler_566124 in default_virE2biocrnpyler_669103_combined = 0;
  species complex_enzyme_mGapDH_2x_metabolite_nadp_metabolite_pi_2x_molecule_g3p_ATP_rheostatbiocrnpyler_566124 in default_virE2biocrnpyler_669103_combined = 0;
  species complex_enzyme_mGapDH_2x_metabolite_nadph_molecule_13bpg_ATP_rheostatbiocrnpyler_566124 in default_virE2biocrnpyler_669103_combined = 0;
  species enzyme_pgk_ATP_rheostatbiocrnpyler_566124 in default_virE2biocrnpyler_669103_combined = 0;
  species complex_enzyme_pgk_metabolite_adp_molecule_13bpg_ATP_rheostatbiocrnpyler_566124 in default_virE2biocrnpyler_669103_combined = 0;
  species complex_enzyme_pgk_metabolite_atp_2x_molecule_3pg_ATP_rheostatbiocrnpyler_566124 in default_virE2biocrnpyler_669103_combined = 0;
  species enzyme_pgm_ATP_rheostatbiocrnpyler_566124 in default_virE2biocrnpyler_669103_combined = 0;
  species molecule_2pg_ATP_rheostatbiocrnpyler_566124 in default_virE2biocrnpyler_669103_combined = 0;
  species complex_enzyme_pgm_2x_molecule_3pg_ATP_rheostatbiocrnpyler_566124 in default_virE2biocrnpyler_669103_combined = 0;
  species complex_enzyme_pgm_2x_molecule_2pg_ATP_rheostatbiocrnpyler_566124 in default_virE2biocrnpyler_669103_combined = 0;
  species enzyme_eno_ATP_rheostatbiocrnpyler_566124 in default_virE2biocrnpyler_669103_combined = 0;
  species molecule_pep_ATP_rheostatbiocrnpyler_566124 in default_virE2biocrnpyler_669103_combined = 0;
  species complex_enzyme_eno_2x_molecule_2pg_ATP_rheostatbiocrnpyler_566124 in default_virE2biocrnpyler_669103_combined = 0;
  species complex_enzyme_eno_2x_molecule_pep_ATP_rheostatbiocrnpyler_566124 in default_virE2biocrnpyler_669103_combined = 0;
  species enzyme_pyk_ATP_rheostatbiocrnpyler_566124 in default_virE2biocrnpyler_669103_combined = 0;
  species molecule_pyruvate_ATP_rheostatbiocrnpyler_566124 in default_virE2biocrnpyler_669103_combined = 0;
  species complex_enzyme_pyk_2x_metabolite_adp_2x_molecule_pep_ATP_rheostatbiocrnpyler_566124 in default_virE2biocrnpyler_669103_combined = 0;
  species complex_enzyme_pyk_2x_metabolite_atp_2x_molecule_pyruvate_ATP_rheostatbiocrnpyler_566124 in default_virE2biocrnpyler_669103_combined = 0;
  species enzyme_alsS_ATP_rheostatbiocrnpyler_566124 in default_virE2biocrnpyler_669103_combined = 0;
  species molecule_acetolac_ATP_rheostatbiocrnpyler_566124 in default_virE2biocrnpyler_669103_combined = 0;
  species complex_enzyme_alsS_2x_molecule_pyruvate_ATP_rheostatbiocrnpyler_566124 in default_virE2biocrnpyler_669103_combined = 0;
  species complex_enzyme_alsS_molecule_acetolac_ATP_rheostatbiocrnpyler_566124 in default_virE2biocrnpyler_669103_combined = 0;
  species enzyme_IlvC_ATP_rheostatbiocrnpyler_566124 in default_virE2biocrnpyler_669103_combined = 0;
  species molecule_23dih3mebut_ATP_rheostatbiocrnpyler_566124 in default_virE2biocrnpyler_669103_combined = 0;
  species complex_enzyme_IlvC_metabolite_nadph_molecule_acetolac_ATP_rheostatbiocrnpyler_566124 in default_virE2biocrnpyler_669103_combined = 0;
  species complex_enzyme_IlvC_metabolite_nadp_molecule_23dih3mebut_ATP_rheostatbiocrnpyler_566124 in default_virE2biocrnpyler_669103_combined = 0;
  species enzyme_IlvD_ATP_rheostatbiocrnpyler_566124 in default_virE2biocrnpyler_669103_combined = 0;
  species molecule_3me2oxo_ATP_rheostatbiocrnpyler_566124 in default_virE2biocrnpyler_669103_combined = 0;
  species complex_enzyme_IlvD_molecule_23dih3mebut_ATP_rheostatbiocrnpyler_566124 in default_virE2biocrnpyler_669103_combined = 0;
  species complex_enzyme_IlvD_molecule_3me2oxo_ATP_rheostatbiocrnpyler_566124 in default_virE2biocrnpyler_669103_combined = 0;
  species enzyme_kivD_ATP_rheostatbiocrnpyler_566124 in default_virE2biocrnpyler_669103_combined = 0;
  species molecule_isobutanal_ATP_rheostatbiocrnpyler_566124 in default_virE2biocrnpyler_669103_combined = 0;
  species complex_enzyme_kivD_molecule_3me2oxo_ATP_rheostatbiocrnpyler_566124 in default_virE2biocrnpyler_669103_combined = 0;
  species complex_enzyme_kivD_molecule_isobutanal_ATP_rheostatbiocrnpyler_566124 in default_virE2biocrnpyler_669103_combined = 0;
  species enzyme_yahk_ATP_rheostatbiocrnpyler_566124 in default_virE2biocrnpyler_669103_combined = 0;
  species molecule_isobutanol_ATP_rheostatbiocrnpyler_566124 in default_virE2biocrnpyler_669103_combined = 0;
  species complex_enzyme_yahk_metabolite_nadph_molecule_isobutanal_ATP_rheostatbiocrnpyler_566124 in default_virE2biocrnpyler_669103_combined = 0;
  species complex_enzyme_yahk_metabolite_nadp_molecule_isobutanol_ATP_rheostatbiocrnpyler_566124 in default_virE2biocrnpyler_669103_combined = 0;

  // Reactions:
  r0_virE2biocrnpyler_669103: atc_i_virE2biocrnpyler_669103 + tetR_virE2biocrnpyler_669103 => complex_atc_i_tetR_virE2biocrnpyler_669103; r0_virE2biocrnpyler_669103_k*atc_i_virE2biocrnpyler_669103*tetR_virE2biocrnpyler_669103;
    r0_virE2biocrnpyler_669103_k = 0.0002;
  r0_1_virE2biocrnpyler_669103: complex_atc_i_tetR_virE2biocrnpyler_669103 => atc_i_virE2biocrnpyler_669103 + tetR_virE2biocrnpyler_669103; r0_1_virE2biocrnpyler_669103_k*complex_atc_i_tetR_virE2biocrnpyler_669103;
    r0_1_virE2biocrnpyler_669103_k = 2e-9;
  r2_virE2biocrnpyler_669103: dna_g_virE2biocrnpyler_669103 + tetR_virE2biocrnpyler_669103 => complex_dna_g_tetR_virE2biocrnpyler_669103; r2_virE2biocrnpyler_669103_k*dna_g_virE2biocrnpyler_669103*tetR_virE2biocrnpyler_669103;
    r2_virE2biocrnpyler_669103_k = 4e-5;
  r2_1_virE2biocrnpyler_669103: complex_dna_g_tetR_virE2biocrnpyler_669103 => dna_g_virE2biocrnpyler_669103 + tetR_virE2biocrnpyler_669103; r2_1_virE2biocrnpyler_669103_k*complex_dna_g_tetR_virE2biocrnpyler_669103;
    r2_1_virE2biocrnpyler_669103_k = 1e-12;
  r4_virE2biocrnpyler_669103: complex_dna_g_tetR_virE2biocrnpyler_669103 + atc_i_virE2biocrnpyler_669103 => complex_atc_i_dna_g_tetR_virE2biocrnpyler_669103; r4_virE2biocrnpyler_669103_k*complex_dna_g_tetR_virE2biocrnpyler_669103*atc_i_virE2biocrnpyler_669103;
    r4_virE2biocrnpyler_669103_k = 6e-6;
  r4_1_virE2biocrnpyler_669103: complex_atc_i_dna_g_tetR_virE2biocrnpyler_669103 => complex_dna_g_tetR_virE2biocrnpyler_669103 + atc_i_virE2biocrnpyler_669103; r4_1_virE2biocrnpyler_669103_k*complex_atc_i_dna_g_tetR_virE2biocrnpyler_669103;
    r4_1_virE2biocrnpyler_669103_k = 3e-9;
  r6_virE2biocrnpyler_669103: complex_atc_i_dna_g_tetR_virE2biocrnpyler_669103 => dna_g_virE2biocrnpyler_669103 + complex_atc_i_tetR_virE2biocrnpyler_669103; r6_virE2biocrnpyler_669103_k*complex_atc_i_dna_g_tetR_virE2biocrnpyler_669103;
    r6_virE2biocrnpyler_669103_k = 0.005;
  r6_1_virE2biocrnpyler_669103: dna_g_virE2biocrnpyler_669103 + complex_atc_i_tetR_virE2biocrnpyler_669103 => complex_atc_i_dna_g_tetR_virE2biocrnpyler_669103; r6_1_virE2biocrnpyler_669103_k*dna_g_virE2biocrnpyler_669103*complex_atc_i_tetR_virE2biocrnpyler_669103;
    r6_1_virE2biocrnpyler_669103_k = 1e-10;
  r8_virE2biocrnpyler_669103: dna_g_virE2biocrnpyler_669103 => dna_g_virE2biocrnpyler_669103 + rna_g_virE2biocrnpyler_669103; r8_virE2biocrnpyler_669103_k*dna_g_virE2biocrnpyler_669103;
    r8_virE2biocrnpyler_669103_k = 0.0031875;
  r9_virE2biocrnpyler_669103: rna_g_virE2biocrnpyler_669103 + ATP_virE2biocrnpyler_669103_1_combined => rna_g_virE2biocrnpyler_669103 + ADP_virE2biocrnpyler_669103_1_combined + VirE2_f_virE2biocrnpyler_669103 + P_virE2biocrnpyler_669103_1_combined; r9_virE2biocrnpyler_669103_k*rna_g_virE2biocrnpyler_669103*ATP_virE2biocrnpyler_669103_1_combined^r9_virE2biocrnpyler_669103_n/(ATP_virE2biocrnpyler_669103_1_combined^r9_virE2biocrnpyler_669103_n + r9_virE2biocrnpyler_669103_K);
    r9_virE2biocrnpyler_669103_k = 0.001; r9_virE2biocrnpyler_669103_n = 1; r9_virE2biocrnpyler_669103_K = 1;
  r10_virE2biocrnpyler_669103: VirE2_f_virE2biocrnpyler_669103 => VirE2_b_virE2biocrnpyler_669103; r10_virE2biocrnpyler_669103_k*VirE2_f_virE2biocrnpyler_669103/(VirE2_b_virE2biocrnpyler_669103^r10_virE2biocrnpyler_669103_n + r10_virE2biocrnpyler_669103_K);
    r10_virE2biocrnpyler_669103_k = 0.0005; r10_virE2biocrnpyler_669103_n = 1; r10_virE2biocrnpyler_669103_K = 1;
  r11_virE2biocrnpyler_669103: rna_g_virE2biocrnpyler_669103 => ; r11_virE2biocrnpyler_669103_k*rna_g_virE2biocrnpyler_669103;
    r11_virE2biocrnpyler_669103_k = 0.001;
  r12_virE2biocrnpyler_669103: VirE2_f_virE2biocrnpyler_669103 => ; r12_virE2biocrnpyler_669103_k*VirE2_f_virE2biocrnpyler_669103;
    r12_virE2biocrnpyler_669103_k = 1e-5;
  r0_ATP_rheostatbiocrnpyler_566124: enzyme_hex_ATP_rheostatbiocrnpyler_566124 + ATP_virE2biocrnpyler_669103_1_combined + molecule_glucose_ATP_rheostatbiocrnpyler_566124 => complex_enzyme_hex_metabolite_atp_molecule_glucose_ATP_rheostatbiocrnpyler_566124; r0_ATP_rheostatbiocrnpyler_566124_k*enzyme_hex_ATP_rheostatbiocrnpyler_566124*ATP_virE2biocrnpyler_669103_1_combined*molecule_glucose_ATP_rheostatbiocrnpyler_566124;
    r0_ATP_rheostatbiocrnpyler_566124_k = 0.03;
  r0_1_ATP_rheostatbiocrnpyler_566124: complex_enzyme_hex_metabolite_atp_molecule_glucose_ATP_rheostatbiocrnpyler_566124 => enzyme_hex_ATP_rheostatbiocrnpyler_566124 + ATP_virE2biocrnpyler_669103_1_combined + molecule_glucose_ATP_rheostatbiocrnpyler_566124; r0_1_ATP_rheostatbiocrnpyler_566124_k*complex_enzyme_hex_metabolite_atp_molecule_glucose_ATP_rheostatbiocrnpyler_566124;
    r0_1_ATP_rheostatbiocrnpyler_566124_k = 0.003;
  r2_ATP_rheostatbiocrnpyler_566124: complex_enzyme_hex_metabolite_atp_molecule_glucose_ATP_rheostatbiocrnpyler_566124 => complex_enzyme_hex_metabolite_adp_molecule_g6p_ATP_rheostatbiocrnpyler_566124; r2_ATP_rheostatbiocrnpyler_566124_k*complex_enzyme_hex_metabolite_atp_molecule_glucose_ATP_rheostatbiocrnpyler_566124;
    r2_ATP_rheostatbiocrnpyler_566124_k = 36000;
  r3_ATP_rheostatbiocrnpyler_566124: complex_enzyme_hex_metabolite_adp_molecule_g6p_ATP_rheostatbiocrnpyler_566124 => enzyme_hex_ATP_rheostatbiocrnpyler_566124 + molecule_g6p_ATP_rheostatbiocrnpyler_566124 + ADP_virE2biocrnpyler_669103_1_combined; r3_ATP_rheostatbiocrnpyler_566124_k*complex_enzyme_hex_metabolite_adp_molecule_g6p_ATP_rheostatbiocrnpyler_566124;
    r3_ATP_rheostatbiocrnpyler_566124_k = 0.03;
  r3_1_ATP_rheostatbiocrnpyler_566124: enzyme_hex_ATP_rheostatbiocrnpyler_566124 + molecule_g6p_ATP_rheostatbiocrnpyler_566124 + ADP_virE2biocrnpyler_669103_1_combined => complex_enzyme_hex_metabolite_adp_molecule_g6p_ATP_rheostatbiocrnpyler_566124; r3_1_ATP_rheostatbiocrnpyler_566124_k*enzyme_hex_ATP_rheostatbiocrnpyler_566124*molecule_g6p_ATP_rheostatbiocrnpyler_566124*ADP_virE2biocrnpyler_669103_1_combined;
    r3_1_ATP_rheostatbiocrnpyler_566124_k = 0.003;
  r5_ATP_rheostatbiocrnpyler_566124: enzyme_pgi_ATP_rheostatbiocrnpyler_566124 + molecule_g6p_ATP_rheostatbiocrnpyler_566124 => complex_enzyme_pgi_molecule_g6p_ATP_rheostatbiocrnpyler_566124; r5_ATP_rheostatbiocrnpyler_566124_k*enzyme_pgi_ATP_rheostatbiocrnpyler_566124*molecule_g6p_ATP_rheostatbiocrnpyler_566124;
    r5_ATP_rheostatbiocrnpyler_566124_k = 0.03;
  r5_1_ATP_rheostatbiocrnpyler_566124: complex_enzyme_pgi_molecule_g6p_ATP_rheostatbiocrnpyler_566124 => enzyme_pgi_ATP_rheostatbiocrnpyler_566124 + molecule_g6p_ATP_rheostatbiocrnpyler_566124; r5_1_ATP_rheostatbiocrnpyler_566124_k*complex_enzyme_pgi_molecule_g6p_ATP_rheostatbiocrnpyler_566124;
    r5_1_ATP_rheostatbiocrnpyler_566124_k = 0.003;
  r7_ATP_rheostatbiocrnpyler_566124: complex_enzyme_pgi_molecule_g6p_ATP_rheostatbiocrnpyler_566124 => complex_enzyme_pgi_molecule_f6p_ATP_rheostatbiocrnpyler_566124; r7_ATP_rheostatbiocrnpyler_566124_k*complex_enzyme_pgi_molecule_g6p_ATP_rheostatbiocrnpyler_566124;
    r7_ATP_rheostatbiocrnpyler_566124_k = 36000;
  r8_ATP_rheostatbiocrnpyler_566124: complex_enzyme_pgi_molecule_f6p_ATP_rheostatbiocrnpyler_566124 => enzyme_pgi_ATP_rheostatbiocrnpyler_566124 + molecule_f6p_ATP_rheostatbiocrnpyler_566124; r8_ATP_rheostatbiocrnpyler_566124_k*complex_enzyme_pgi_molecule_f6p_ATP_rheostatbiocrnpyler_566124;
    r8_ATP_rheostatbiocrnpyler_566124_k = 0.03;
  r8_1_ATP_rheostatbiocrnpyler_566124: enzyme_pgi_ATP_rheostatbiocrnpyler_566124 + molecule_f6p_ATP_rheostatbiocrnpyler_566124 => complex_enzyme_pgi_molecule_f6p_ATP_rheostatbiocrnpyler_566124; r8_1_ATP_rheostatbiocrnpyler_566124_k*enzyme_pgi_ATP_rheostatbiocrnpyler_566124*molecule_f6p_ATP_rheostatbiocrnpyler_566124;
    r8_1_ATP_rheostatbiocrnpyler_566124_k = 0.003;
  r10_ATP_rheostatbiocrnpyler_566124: enzyme_pfk_ATP_rheostatbiocrnpyler_566124 + ATP_virE2biocrnpyler_669103_1_combined + molecule_f6p_ATP_rheostatbiocrnpyler_566124 => complex_enzyme_pfk_metabolite_atp_molecule_f6p_ATP_rheostatbiocrnpyler_566124; r10_ATP_rheostatbiocrnpyler_566124_k*enzyme_pfk_ATP_rheostatbiocrnpyler_566124*ATP_virE2biocrnpyler_669103_1_combined*molecule_f6p_ATP_rheostatbiocrnpyler_566124;
    r10_ATP_rheostatbiocrnpyler_566124_k = 0.03;
  r10_1_ATP_rheostatbiocrnpyler_566124: complex_enzyme_pfk_metabolite_atp_molecule_f6p_ATP_rheostatbiocrnpyler_566124 => enzyme_pfk_ATP_rheostatbiocrnpyler_566124 + ATP_virE2biocrnpyler_669103_1_combined + molecule_f6p_ATP_rheostatbiocrnpyler_566124; r10_1_ATP_rheostatbiocrnpyler_566124_k*complex_enzyme_pfk_metabolite_atp_molecule_f6p_ATP_rheostatbiocrnpyler_566124;
    r10_1_ATP_rheostatbiocrnpyler_566124_k = 0.003;
  r12_ATP_rheostatbiocrnpyler_566124: complex_enzyme_pfk_metabolite_atp_molecule_f6p_ATP_rheostatbiocrnpyler_566124 => complex_enzyme_pfk_metabolite_adp_molecule_f16p_ATP_rheostatbiocrnpyler_566124; r12_ATP_rheostatbiocrnpyler_566124_k*complex_enzyme_pfk_metabolite_atp_molecule_f6p_ATP_rheostatbiocrnpyler_566124;
    r12_ATP_rheostatbiocrnpyler_566124_k = 36000;
  r13_ATP_rheostatbiocrnpyler_566124: complex_enzyme_pfk_metabolite_adp_molecule_f16p_ATP_rheostatbiocrnpyler_566124 => enzyme_pfk_ATP_rheostatbiocrnpyler_566124 + molecule_f16p_ATP_rheostatbiocrnpyler_566124 + ADP_virE2biocrnpyler_669103_1_combined; r13_ATP_rheostatbiocrnpyler_566124_k*complex_enzyme_pfk_metabolite_adp_molecule_f16p_ATP_rheostatbiocrnpyler_566124;
    r13_ATP_rheostatbiocrnpyler_566124_k = 0.03;
  r13_1_ATP_rheostatbiocrnpyler_566124: enzyme_pfk_ATP_rheostatbiocrnpyler_566124 + molecule_f16p_ATP_rheostatbiocrnpyler_566124 + ADP_virE2biocrnpyler_669103_1_combined => complex_enzyme_pfk_metabolite_adp_molecule_f16p_ATP_rheostatbiocrnpyler_566124; r13_1_ATP_rheostatbiocrnpyler_566124_k*enzyme_pfk_ATP_rheostatbiocrnpyler_566124*molecule_f16p_ATP_rheostatbiocrnpyler_566124*ADP_virE2biocrnpyler_669103_1_combined;
    r13_1_ATP_rheostatbiocrnpyler_566124_k = 0.003;
  r15_ATP_rheostatbiocrnpyler_566124: enzyme_ald_tpi_ATP_rheostatbiocrnpyler_566124 + molecule_f16p_ATP_rheostatbiocrnpyler_566124 => complex_enzyme_ald_tpi_molecule_f16p_ATP_rheostatbiocrnpyler_566124; r15_ATP_rheostatbiocrnpyler_566124_k*enzyme_ald_tpi_ATP_rheostatbiocrnpyler_566124*molecule_f16p_ATP_rheostatbiocrnpyler_566124;
    r15_ATP_rheostatbiocrnpyler_566124_k = 0.03;
  r15_1_ATP_rheostatbiocrnpyler_566124: complex_enzyme_ald_tpi_molecule_f16p_ATP_rheostatbiocrnpyler_566124 => enzyme_ald_tpi_ATP_rheostatbiocrnpyler_566124 + molecule_f16p_ATP_rheostatbiocrnpyler_566124; r15_1_ATP_rheostatbiocrnpyler_566124_k*complex_enzyme_ald_tpi_molecule_f16p_ATP_rheostatbiocrnpyler_566124;
    r15_1_ATP_rheostatbiocrnpyler_566124_k = 0.003;
  r17_ATP_rheostatbiocrnpyler_566124: complex_enzyme_ald_tpi_molecule_f16p_ATP_rheostatbiocrnpyler_566124 => complex_enzyme_ald_tpi_2x_molecule_g3p_ATP_rheostatbiocrnpyler_566124; r17_ATP_rheostatbiocrnpyler_566124_k*complex_enzyme_ald_tpi_molecule_f16p_ATP_rheostatbiocrnpyler_566124;
    r17_ATP_rheostatbiocrnpyler_566124_k = 36000;
  r18_ATP_rheostatbiocrnpyler_566124: complex_enzyme_ald_tpi_2x_molecule_g3p_ATP_rheostatbiocrnpyler_566124 => enzyme_ald_tpi_ATP_rheostatbiocrnpyler_566124 + 2 molecule_g3p_ATP_rheostatbiocrnpyler_566124; r18_ATP_rheostatbiocrnpyler_566124_k*complex_enzyme_ald_tpi_2x_molecule_g3p_ATP_rheostatbiocrnpyler_566124;
    r18_ATP_rheostatbiocrnpyler_566124_k = 0.03;
  r18_1_ATP_rheostatbiocrnpyler_566124: enzyme_ald_tpi_ATP_rheostatbiocrnpyler_566124 + 2 molecule_g3p_ATP_rheostatbiocrnpyler_566124 => complex_enzyme_ald_tpi_2x_molecule_g3p_ATP_rheostatbiocrnpyler_566124; r18_1_ATP_rheostatbiocrnpyler_566124_k*enzyme_ald_tpi_ATP_rheostatbiocrnpyler_566124*molecule_g3p_ATP_rheostatbiocrnpyler_566124^2;
    r18_1_ATP_rheostatbiocrnpyler_566124_k = 0.003;
  r20_ATP_rheostatbiocrnpyler_566124: enzyme_gapN_ATP_rheostatbiocrnpyler_566124 + 2 metabolite_nadp_ATP_rheostatbiocrnpyler_566124 + 2 molecule_g3p_ATP_rheostatbiocrnpyler_566124 => complex_enzyme_gapN_2x_metabolite_nadp_2x_molecule_g3p_ATP_rheostatbiocrnpyler_566124; r20_ATP_rheostatbiocrnpyler_566124_k*enzyme_gapN_ATP_rheostatbiocrnpyler_566124*metabolite_nadp_ATP_rheostatbiocrnpyler_566124^2*molecule_g3p_ATP_rheostatbiocrnpyler_566124^2;
    r20_ATP_rheostatbiocrnpyler_566124_k = 0.03;
  r20_1_ATP_rheostatbiocrnpyler_566124: complex_enzyme_gapN_2x_metabolite_nadp_2x_molecule_g3p_ATP_rheostatbiocrnpyler_566124 => enzyme_gapN_ATP_rheostatbiocrnpyler_566124 + 2 metabolite_nadp_ATP_rheostatbiocrnpyler_566124 + 2 molecule_g3p_ATP_rheostatbiocrnpyler_566124; r20_1_ATP_rheostatbiocrnpyler_566124_k*complex_enzyme_gapN_2x_metabolite_nadp_2x_molecule_g3p_ATP_rheostatbiocrnpyler_566124;
    r20_1_ATP_rheostatbiocrnpyler_566124_k = 0.003;
  r22_ATP_rheostatbiocrnpyler_566124: complex_enzyme_gapN_2x_metabolite_nadp_2x_molecule_g3p_ATP_rheostatbiocrnpyler_566124 => complex_enzyme_gapN_2x_metabolite_nadph_2x_molecule_3pg_ATP_rheostatbiocrnpyler_566124; r22_ATP_rheostatbiocrnpyler_566124_k*complex_enzyme_gapN_2x_metabolite_nadp_2x_molecule_g3p_ATP_rheostatbiocrnpyler_566124;
    r22_ATP_rheostatbiocrnpyler_566124_k = 36000;
  r23_ATP_rheostatbiocrnpyler_566124: complex_enzyme_gapN_2x_metabolite_nadph_2x_molecule_3pg_ATP_rheostatbiocrnpyler_566124 => enzyme_gapN_ATP_rheostatbiocrnpyler_566124 + 2 molecule_3pg_ATP_rheostatbiocrnpyler_566124 + 2 metabolite_nadph_ATP_rheostatbiocrnpyler_566124; r23_ATP_rheostatbiocrnpyler_566124_k*complex_enzyme_gapN_2x_metabolite_nadph_2x_molecule_3pg_ATP_rheostatbiocrnpyler_566124;
    r23_ATP_rheostatbiocrnpyler_566124_k = 0.03;
  r23_1_ATP_rheostatbiocrnpyler_566124: enzyme_gapN_ATP_rheostatbiocrnpyler_566124 + 2 molecule_3pg_ATP_rheostatbiocrnpyler_566124 + 2 metabolite_nadph_ATP_rheostatbiocrnpyler_566124 => complex_enzyme_gapN_2x_metabolite_nadph_2x_molecule_3pg_ATP_rheostatbiocrnpyler_566124; r23_1_ATP_rheostatbiocrnpyler_566124_k*enzyme_gapN_ATP_rheostatbiocrnpyler_566124*molecule_3pg_ATP_rheostatbiocrnpyler_566124^2*metabolite_nadph_ATP_rheostatbiocrnpyler_566124^2;
    r23_1_ATP_rheostatbiocrnpyler_566124_k = 0.003;
  r25_ATP_rheostatbiocrnpyler_566124: enzyme_mGapDH_ATP_rheostatbiocrnpyler_566124 + P_virE2biocrnpyler_669103_1_combined + 2 metabolite_nadp_ATP_rheostatbiocrnpyler_566124 + 2 molecule_g3p_ATP_rheostatbiocrnpyler_566124 => complex_enzyme_mGapDH_2x_metabolite_nadp_metabolite_pi_2x_molecule_g3p_ATP_rheostatbiocrnpyler_566124; r25_ATP_rheostatbiocrnpyler_566124_k*enzyme_mGapDH_ATP_rheostatbiocrnpyler_566124*P_virE2biocrnpyler_669103_1_combined*metabolite_nadp_ATP_rheostatbiocrnpyler_566124^2*molecule_g3p_ATP_rheostatbiocrnpyler_566124^2;
    r25_ATP_rheostatbiocrnpyler_566124_k = 0.03;
  r25_1_ATP_rheostatbiocrnpyler_566124: complex_enzyme_mGapDH_2x_metabolite_nadp_metabolite_pi_2x_molecule_g3p_ATP_rheostatbiocrnpyler_566124 => enzyme_mGapDH_ATP_rheostatbiocrnpyler_566124 + P_virE2biocrnpyler_669103_1_combined + 2 metabolite_nadp_ATP_rheostatbiocrnpyler_566124 + 2 molecule_g3p_ATP_rheostatbiocrnpyler_566124; r25_1_ATP_rheostatbiocrnpyler_566124_k*complex_enzyme_mGapDH_2x_metabolite_nadp_metabolite_pi_2x_molecule_g3p_ATP_rheostatbiocrnpyler_566124;
    r25_1_ATP_rheostatbiocrnpyler_566124_k = 0.003;
  r27_ATP_rheostatbiocrnpyler_566124: complex_enzyme_mGapDH_2x_metabolite_nadp_metabolite_pi_2x_molecule_g3p_ATP_rheostatbiocrnpyler_566124 => complex_enzyme_mGapDH_2x_metabolite_nadph_molecule_13bpg_ATP_rheostatbiocrnpyler_566124; r27_ATP_rheostatbiocrnpyler_566124_k*complex_enzyme_mGapDH_2x_metabolite_nadp_metabolite_pi_2x_molecule_g3p_ATP_rheostatbiocrnpyler_566124;
    r27_ATP_rheostatbiocrnpyler_566124_k = 36000;
  r28_ATP_rheostatbiocrnpyler_566124: complex_enzyme_mGapDH_2x_metabolite_nadph_molecule_13bpg_ATP_rheostatbiocrnpyler_566124 => enzyme_mGapDH_ATP_rheostatbiocrnpyler_566124 + molecule_13bpg_ATP_rheostatbiocrnpyler_566124 + 2 metabolite_nadph_ATP_rheostatbiocrnpyler_566124; r28_ATP_rheostatbiocrnpyler_566124_k*complex_enzyme_mGapDH_2x_metabolite_nadph_molecule_13bpg_ATP_rheostatbiocrnpyler_566124;
    r28_ATP_rheostatbiocrnpyler_566124_k = 0.03;
  r28_1_ATP_rheostatbiocrnpyler_566124: enzyme_mGapDH_ATP_rheostatbiocrnpyler_566124 + molecule_13bpg_ATP_rheostatbiocrnpyler_566124 + 2 metabolite_nadph_ATP_rheostatbiocrnpyler_566124 => complex_enzyme_mGapDH_2x_metabolite_nadph_molecule_13bpg_ATP_rheostatbiocrnpyler_566124; r28_1_ATP_rheostatbiocrnpyler_566124_k*enzyme_mGapDH_ATP_rheostatbiocrnpyler_566124*molecule_13bpg_ATP_rheostatbiocrnpyler_566124*metabolite_nadph_ATP_rheostatbiocrnpyler_566124^2;
    r28_1_ATP_rheostatbiocrnpyler_566124_k = 0.003;
  r30_ATP_rheostatbiocrnpyler_566124: enzyme_pgk_ATP_rheostatbiocrnpyler_566124 + ADP_virE2biocrnpyler_669103_1_combined + molecule_13bpg_ATP_rheostatbiocrnpyler_566124 => complex_enzyme_pgk_metabolite_adp_molecule_13bpg_ATP_rheostatbiocrnpyler_566124; r30_ATP_rheostatbiocrnpyler_566124_k*enzyme_pgk_ATP_rheostatbiocrnpyler_566124*ADP_virE2biocrnpyler_669103_1_combined*molecule_13bpg_ATP_rheostatbiocrnpyler_566124;
    r30_ATP_rheostatbiocrnpyler_566124_k = 0.03;
  r30_1_ATP_rheostatbiocrnpyler_566124: complex_enzyme_pgk_metabolite_adp_molecule_13bpg_ATP_rheostatbiocrnpyler_566124 => enzyme_pgk_ATP_rheostatbiocrnpyler_566124 + ADP_virE2biocrnpyler_669103_1_combined + molecule_13bpg_ATP_rheostatbiocrnpyler_566124; r30_1_ATP_rheostatbiocrnpyler_566124_k*complex_enzyme_pgk_metabolite_adp_molecule_13bpg_ATP_rheostatbiocrnpyler_566124;
    r30_1_ATP_rheostatbiocrnpyler_566124_k = 0.003;
  r32_ATP_rheostatbiocrnpyler_566124: complex_enzyme_pgk_metabolite_adp_molecule_13bpg_ATP_rheostatbiocrnpyler_566124 => complex_enzyme_pgk_metabolite_atp_2x_molecule_3pg_ATP_rheostatbiocrnpyler_566124; r32_ATP_rheostatbiocrnpyler_566124_k*complex_enzyme_pgk_metabolite_adp_molecule_13bpg_ATP_rheostatbiocrnpyler_566124;
    r32_ATP_rheostatbiocrnpyler_566124_k = 36000;
  r33_ATP_rheostatbiocrnpyler_566124: complex_enzyme_pgk_metabolite_atp_2x_molecule_3pg_ATP_rheostatbiocrnpyler_566124 => enzyme_pgk_ATP_rheostatbiocrnpyler_566124 + 2 molecule_3pg_ATP_rheostatbiocrnpyler_566124 + ATP_virE2biocrnpyler_669103_1_combined; r33_ATP_rheostatbiocrnpyler_566124_k*complex_enzyme_pgk_metabolite_atp_2x_molecule_3pg_ATP_rheostatbiocrnpyler_566124;
    r33_ATP_rheostatbiocrnpyler_566124_k = 0.03;
  r33_1_ATP_rheostatbiocrnpyler_566124: enzyme_pgk_ATP_rheostatbiocrnpyler_566124 + 2 molecule_3pg_ATP_rheostatbiocrnpyler_566124 + ATP_virE2biocrnpyler_669103_1_combined => complex_enzyme_pgk_metabolite_atp_2x_molecule_3pg_ATP_rheostatbiocrnpyler_566124; r33_1_ATP_rheostatbiocrnpyler_566124_k*enzyme_pgk_ATP_rheostatbiocrnpyler_566124*molecule_3pg_ATP_rheostatbiocrnpyler_566124^2*ATP_virE2biocrnpyler_669103_1_combined;
    r33_1_ATP_rheostatbiocrnpyler_566124_k = 0.003;
  r35_ATP_rheostatbiocrnpyler_566124: enzyme_pgm_ATP_rheostatbiocrnpyler_566124 + 2 molecule_3pg_ATP_rheostatbiocrnpyler_566124 => complex_enzyme_pgm_2x_molecule_3pg_ATP_rheostatbiocrnpyler_566124; r35_ATP_rheostatbiocrnpyler_566124_k*enzyme_pgm_ATP_rheostatbiocrnpyler_566124*molecule_3pg_ATP_rheostatbiocrnpyler_566124^2;
    r35_ATP_rheostatbiocrnpyler_566124_k = 0.03;
  r35_1_ATP_rheostatbiocrnpyler_566124: complex_enzyme_pgm_2x_molecule_3pg_ATP_rheostatbiocrnpyler_566124 => enzyme_pgm_ATP_rheostatbiocrnpyler_566124 + 2 molecule_3pg_ATP_rheostatbiocrnpyler_566124; r35_1_ATP_rheostatbiocrnpyler_566124_k*complex_enzyme_pgm_2x_molecule_3pg_ATP_rheostatbiocrnpyler_566124;
    r35_1_ATP_rheostatbiocrnpyler_566124_k = 0.003;
  r37_ATP_rheostatbiocrnpyler_566124: complex_enzyme_pgm_2x_molecule_3pg_ATP_rheostatbiocrnpyler_566124 => complex_enzyme_pgm_2x_molecule_2pg_ATP_rheostatbiocrnpyler_566124; r37_ATP_rheostatbiocrnpyler_566124_k*complex_enzyme_pgm_2x_molecule_3pg_ATP_rheostatbiocrnpyler_566124;
    r37_ATP_rheostatbiocrnpyler_566124_k = 36000;
  r38_ATP_rheostatbiocrnpyler_566124: complex_enzyme_pgm_2x_molecule_2pg_ATP_rheostatbiocrnpyler_566124 => enzyme_pgm_ATP_rheostatbiocrnpyler_566124 + 2 molecule_2pg_ATP_rheostatbiocrnpyler_566124; r38_ATP_rheostatbiocrnpyler_566124_k*complex_enzyme_pgm_2x_molecule_2pg_ATP_rheostatbiocrnpyler_566124;
    r38_ATP_rheostatbiocrnpyler_566124_k = 0.03;
  r38_1_ATP_rheostatbiocrnpyler_566124: enzyme_pgm_ATP_rheostatbiocrnpyler_566124 + 2 molecule_2pg_ATP_rheostatbiocrnpyler_566124 => complex_enzyme_pgm_2x_molecule_2pg_ATP_rheostatbiocrnpyler_566124; r38_1_ATP_rheostatbiocrnpyler_566124_k*enzyme_pgm_ATP_rheostatbiocrnpyler_566124*molecule_2pg_ATP_rheostatbiocrnpyler_566124^2;
    r38_1_ATP_rheostatbiocrnpyler_566124_k = 0.003;
  r40_ATP_rheostatbiocrnpyler_566124: enzyme_eno_ATP_rheostatbiocrnpyler_566124 + 2 molecule_2pg_ATP_rheostatbiocrnpyler_566124 => complex_enzyme_eno_2x_molecule_2pg_ATP_rheostatbiocrnpyler_566124; r40_ATP_rheostatbiocrnpyler_566124_k*enzyme_eno_ATP_rheostatbiocrnpyler_566124*molecule_2pg_ATP_rheostatbiocrnpyler_566124^2;
    r40_ATP_rheostatbiocrnpyler_566124_k = 0.03;
  r40_1_ATP_rheostatbiocrnpyler_566124: complex_enzyme_eno_2x_molecule_2pg_ATP_rheostatbiocrnpyler_566124 => enzyme_eno_ATP_rheostatbiocrnpyler_566124 + 2 molecule_2pg_ATP_rheostatbiocrnpyler_566124; r40_1_ATP_rheostatbiocrnpyler_566124_k*complex_enzyme_eno_2x_molecule_2pg_ATP_rheostatbiocrnpyler_566124;
    r40_1_ATP_rheostatbiocrnpyler_566124_k = 0.003;
  r42_ATP_rheostatbiocrnpyler_566124: complex_enzyme_eno_2x_molecule_2pg_ATP_rheostatbiocrnpyler_566124 => complex_enzyme_eno_2x_molecule_pep_ATP_rheostatbiocrnpyler_566124; r42_ATP_rheostatbiocrnpyler_566124_k*complex_enzyme_eno_2x_molecule_2pg_ATP_rheostatbiocrnpyler_566124;
    r42_ATP_rheostatbiocrnpyler_566124_k = 36000;
  r43_ATP_rheostatbiocrnpyler_566124: complex_enzyme_eno_2x_molecule_pep_ATP_rheostatbiocrnpyler_566124 => enzyme_eno_ATP_rheostatbiocrnpyler_566124 + 2 molecule_pep_ATP_rheostatbiocrnpyler_566124; r43_ATP_rheostatbiocrnpyler_566124_k*complex_enzyme_eno_2x_molecule_pep_ATP_rheostatbiocrnpyler_566124;
    r43_ATP_rheostatbiocrnpyler_566124_k = 0.03;
  r43_1_ATP_rheostatbiocrnpyler_566124: enzyme_eno_ATP_rheostatbiocrnpyler_566124 + 2 molecule_pep_ATP_rheostatbiocrnpyler_566124 => complex_enzyme_eno_2x_molecule_pep_ATP_rheostatbiocrnpyler_566124; r43_1_ATP_rheostatbiocrnpyler_566124_k*enzyme_eno_ATP_rheostatbiocrnpyler_566124*molecule_pep_ATP_rheostatbiocrnpyler_566124^2;
    r43_1_ATP_rheostatbiocrnpyler_566124_k = 0.003;
  r45_ATP_rheostatbiocrnpyler_566124: enzyme_pyk_ATP_rheostatbiocrnpyler_566124 + 2 ADP_virE2biocrnpyler_669103_1_combined + 2 molecule_pep_ATP_rheostatbiocrnpyler_566124 => complex_enzyme_pyk_2x_metabolite_adp_2x_molecule_pep_ATP_rheostatbiocrnpyler_566124; r45_ATP_rheostatbiocrnpyler_566124_k*enzyme_pyk_ATP_rheostatbiocrnpyler_566124*ADP_virE2biocrnpyler_669103_1_combined^2*molecule_pep_ATP_rheostatbiocrnpyler_566124^2;
    r45_ATP_rheostatbiocrnpyler_566124_k = 0.03;
  r45_1_ATP_rheostatbiocrnpyler_566124: complex_enzyme_pyk_2x_metabolite_adp_2x_molecule_pep_ATP_rheostatbiocrnpyler_566124 => enzyme_pyk_ATP_rheostatbiocrnpyler_566124 + 2 ADP_virE2biocrnpyler_669103_1_combined + 2 molecule_pep_ATP_rheostatbiocrnpyler_566124; r45_1_ATP_rheostatbiocrnpyler_566124_k*complex_enzyme_pyk_2x_metabolite_adp_2x_molecule_pep_ATP_rheostatbiocrnpyler_566124;
    r45_1_ATP_rheostatbiocrnpyler_566124_k = 0.003;
  r47_ATP_rheostatbiocrnpyler_566124: complex_enzyme_pyk_2x_metabolite_adp_2x_molecule_pep_ATP_rheostatbiocrnpyler_566124 => complex_enzyme_pyk_2x_metabolite_atp_2x_molecule_pyruvate_ATP_rheostatbiocrnpyler_566124; r47_ATP_rheostatbiocrnpyler_566124_k*complex_enzyme_pyk_2x_metabolite_adp_2x_molecule_pep_ATP_rheostatbiocrnpyler_566124;
    r47_ATP_rheostatbiocrnpyler_566124_k = 36000;
  r48_ATP_rheostatbiocrnpyler_566124: complex_enzyme_pyk_2x_metabolite_atp_2x_molecule_pyruvate_ATP_rheostatbiocrnpyler_566124 => enzyme_pyk_ATP_rheostatbiocrnpyler_566124 + 2 molecule_pyruvate_ATP_rheostatbiocrnpyler_566124 + 2 ATP_virE2biocrnpyler_669103_1_combined; r48_ATP_rheostatbiocrnpyler_566124_k*complex_enzyme_pyk_2x_metabolite_atp_2x_molecule_pyruvate_ATP_rheostatbiocrnpyler_566124;
    r48_ATP_rheostatbiocrnpyler_566124_k = 0.03;
  r48_1_ATP_rheostatbiocrnpyler_566124: enzyme_pyk_ATP_rheostatbiocrnpyler_566124 + 2 molecule_pyruvate_ATP_rheostatbiocrnpyler_566124 + 2 ATP_virE2biocrnpyler_669103_1_combined => complex_enzyme_pyk_2x_metabolite_atp_2x_molecule_pyruvate_ATP_rheostatbiocrnpyler_566124; r48_1_ATP_rheostatbiocrnpyler_566124_k*enzyme_pyk_ATP_rheostatbiocrnpyler_566124*molecule_pyruvate_ATP_rheostatbiocrnpyler_566124^2*ATP_virE2biocrnpyler_669103_1_combined^2;
    r48_1_ATP_rheostatbiocrnpyler_566124_k = 0.003;
  r50_ATP_rheostatbiocrnpyler_566124: enzyme_alsS_ATP_rheostatbiocrnpyler_566124 + 2 molecule_pyruvate_ATP_rheostatbiocrnpyler_566124 => complex_enzyme_alsS_2x_molecule_pyruvate_ATP_rheostatbiocrnpyler_566124; r50_ATP_rheostatbiocrnpyler_566124_k*enzyme_alsS_ATP_rheostatbiocrnpyler_566124*molecule_pyruvate_ATP_rheostatbiocrnpyler_566124^2;
    r50_ATP_rheostatbiocrnpyler_566124_k = 0.03;
  r50_1_ATP_rheostatbiocrnpyler_566124: complex_enzyme_alsS_2x_molecule_pyruvate_ATP_rheostatbiocrnpyler_566124 => enzyme_alsS_ATP_rheostatbiocrnpyler_566124 + 2 molecule_pyruvate_ATP_rheostatbiocrnpyler_566124; r50_1_ATP_rheostatbiocrnpyler_566124_k*complex_enzyme_alsS_2x_molecule_pyruvate_ATP_rheostatbiocrnpyler_566124;
    r50_1_ATP_rheostatbiocrnpyler_566124_k = 0.003;
  r52_ATP_rheostatbiocrnpyler_566124: complex_enzyme_alsS_2x_molecule_pyruvate_ATP_rheostatbiocrnpyler_566124 => complex_enzyme_alsS_molecule_acetolac_ATP_rheostatbiocrnpyler_566124; r52_ATP_rheostatbiocrnpyler_566124_k*complex_enzyme_alsS_2x_molecule_pyruvate_ATP_rheostatbiocrnpyler_566124;
    r52_ATP_rheostatbiocrnpyler_566124_k = 36000;
  r53_ATP_rheostatbiocrnpyler_566124: complex_enzyme_alsS_molecule_acetolac_ATP_rheostatbiocrnpyler_566124 => enzyme_alsS_ATP_rheostatbiocrnpyler_566124 + molecule_acetolac_ATP_rheostatbiocrnpyler_566124; r53_ATP_rheostatbiocrnpyler_566124_k*complex_enzyme_alsS_molecule_acetolac_ATP_rheostatbiocrnpyler_566124;
    r53_ATP_rheostatbiocrnpyler_566124_k = 0.03;
  r53_1_ATP_rheostatbiocrnpyler_566124: enzyme_alsS_ATP_rheostatbiocrnpyler_566124 + molecule_acetolac_ATP_rheostatbiocrnpyler_566124 => complex_enzyme_alsS_molecule_acetolac_ATP_rheostatbiocrnpyler_566124; r53_1_ATP_rheostatbiocrnpyler_566124_k*enzyme_alsS_ATP_rheostatbiocrnpyler_566124*molecule_acetolac_ATP_rheostatbiocrnpyler_566124;
    r53_1_ATP_rheostatbiocrnpyler_566124_k = 0.003;
  r55_ATP_rheostatbiocrnpyler_566124: enzyme_IlvC_ATP_rheostatbiocrnpyler_566124 + metabolite_nadph_ATP_rheostatbiocrnpyler_566124 + molecule_acetolac_ATP_rheostatbiocrnpyler_566124 => complex_enzyme_IlvC_metabolite_nadph_molecule_acetolac_ATP_rheostatbiocrnpyler_566124; r55_ATP_rheostatbiocrnpyler_566124_k*enzyme_IlvC_ATP_rheostatbiocrnpyler_566124*metabolite_nadph_ATP_rheostatbiocrnpyler_566124*molecule_acetolac_ATP_rheostatbiocrnpyler_566124;
    r55_ATP_rheostatbiocrnpyler_566124_k = 0.03;
  r55_1_ATP_rheostatbiocrnpyler_566124: complex_enzyme_IlvC_metabolite_nadph_molecule_acetolac_ATP_rheostatbiocrnpyler_566124 => enzyme_IlvC_ATP_rheostatbiocrnpyler_566124 + metabolite_nadph_ATP_rheostatbiocrnpyler_566124 + molecule_acetolac_ATP_rheostatbiocrnpyler_566124; r55_1_ATP_rheostatbiocrnpyler_566124_k*complex_enzyme_IlvC_metabolite_nadph_molecule_acetolac_ATP_rheostatbiocrnpyler_566124;
    r55_1_ATP_rheostatbiocrnpyler_566124_k = 0.003;
  r57_ATP_rheostatbiocrnpyler_566124: complex_enzyme_IlvC_metabolite_nadph_molecule_acetolac_ATP_rheostatbiocrnpyler_566124 => complex_enzyme_IlvC_metabolite_nadp_molecule_23dih3mebut_ATP_rheostatbiocrnpyler_566124; r57_ATP_rheostatbiocrnpyler_566124_k*complex_enzyme_IlvC_metabolite_nadph_molecule_acetolac_ATP_rheostatbiocrnpyler_566124;
    r57_ATP_rheostatbiocrnpyler_566124_k = 36000;
  r58_ATP_rheostatbiocrnpyler_566124: complex_enzyme_IlvC_metabolite_nadp_molecule_23dih3mebut_ATP_rheostatbiocrnpyler_566124 => enzyme_IlvC_ATP_rheostatbiocrnpyler_566124 + molecule_23dih3mebut_ATP_rheostatbiocrnpyler_566124 + metabolite_nadp_ATP_rheostatbiocrnpyler_566124; r58_ATP_rheostatbiocrnpyler_566124_k*complex_enzyme_IlvC_metabolite_nadp_molecule_23dih3mebut_ATP_rheostatbiocrnpyler_566124;
    r58_ATP_rheostatbiocrnpyler_566124_k = 0.03;
  r58_1_ATP_rheostatbiocrnpyler_566124: enzyme_IlvC_ATP_rheostatbiocrnpyler_566124 + molecule_23dih3mebut_ATP_rheostatbiocrnpyler_566124 + metabolite_nadp_ATP_rheostatbiocrnpyler_566124 => complex_enzyme_IlvC_metabolite_nadp_molecule_23dih3mebut_ATP_rheostatbiocrnpyler_566124; r58_1_ATP_rheostatbiocrnpyler_566124_k*enzyme_IlvC_ATP_rheostatbiocrnpyler_566124*molecule_23dih3mebut_ATP_rheostatbiocrnpyler_566124*metabolite_nadp_ATP_rheostatbiocrnpyler_566124;
    r58_1_ATP_rheostatbiocrnpyler_566124_k = 0.003;
  r60_ATP_rheostatbiocrnpyler_566124: enzyme_IlvD_ATP_rheostatbiocrnpyler_566124 + molecule_23dih3mebut_ATP_rheostatbiocrnpyler_566124 => complex_enzyme_IlvD_molecule_23dih3mebut_ATP_rheostatbiocrnpyler_566124; r60_ATP_rheostatbiocrnpyler_566124_k*enzyme_IlvD_ATP_rheostatbiocrnpyler_566124*molecule_23dih3mebut_ATP_rheostatbiocrnpyler_566124;
    r60_ATP_rheostatbiocrnpyler_566124_k = 0.03;
  r60_1_ATP_rheostatbiocrnpyler_566124: complex_enzyme_IlvD_molecule_23dih3mebut_ATP_rheostatbiocrnpyler_566124 => enzyme_IlvD_ATP_rheostatbiocrnpyler_566124 + molecule_23dih3mebut_ATP_rheostatbiocrnpyler_566124; r60_1_ATP_rheostatbiocrnpyler_566124_k*complex_enzyme_IlvD_molecule_23dih3mebut_ATP_rheostatbiocrnpyler_566124;
    r60_1_ATP_rheostatbiocrnpyler_566124_k = 0.003;
  r62_ATP_rheostatbiocrnpyler_566124: complex_enzyme_IlvD_molecule_23dih3mebut_ATP_rheostatbiocrnpyler_566124 => complex_enzyme_IlvD_molecule_3me2oxo_ATP_rheostatbiocrnpyler_566124; r62_ATP_rheostatbiocrnpyler_566124_k*complex_enzyme_IlvD_molecule_23dih3mebut_ATP_rheostatbiocrnpyler_566124;
    r62_ATP_rheostatbiocrnpyler_566124_k = 36000;
  r63_ATP_rheostatbiocrnpyler_566124: complex_enzyme_IlvD_molecule_3me2oxo_ATP_rheostatbiocrnpyler_566124 => enzyme_IlvD_ATP_rheostatbiocrnpyler_566124 + molecule_3me2oxo_ATP_rheostatbiocrnpyler_566124; r63_ATP_rheostatbiocrnpyler_566124_k*complex_enzyme_IlvD_molecule_3me2oxo_ATP_rheostatbiocrnpyler_566124;
    r63_ATP_rheostatbiocrnpyler_566124_k = 0.03;
  r63_1_ATP_rheostatbiocrnpyler_566124: enzyme_IlvD_ATP_rheostatbiocrnpyler_566124 + molecule_3me2oxo_ATP_rheostatbiocrnpyler_566124 => complex_enzyme_IlvD_molecule_3me2oxo_ATP_rheostatbiocrnpyler_566124; r63_1_ATP_rheostatbiocrnpyler_566124_k*enzyme_IlvD_ATP_rheostatbiocrnpyler_566124*molecule_3me2oxo_ATP_rheostatbiocrnpyler_566124;
    r63_1_ATP_rheostatbiocrnpyler_566124_k = 0.003;
  r65_ATP_rheostatbiocrnpyler_566124: enzyme_kivD_ATP_rheostatbiocrnpyler_566124 + molecule_3me2oxo_ATP_rheostatbiocrnpyler_566124 => complex_enzyme_kivD_molecule_3me2oxo_ATP_rheostatbiocrnpyler_566124; r65_ATP_rheostatbiocrnpyler_566124_k*enzyme_kivD_ATP_rheostatbiocrnpyler_566124*molecule_3me2oxo_ATP_rheostatbiocrnpyler_566124;
    r65_ATP_rheostatbiocrnpyler_566124_k = 0.03;
  r65_1_ATP_rheostatbiocrnpyler_566124: complex_enzyme_kivD_molecule_3me2oxo_ATP_rheostatbiocrnpyler_566124 => enzyme_kivD_ATP_rheostatbiocrnpyler_566124 + molecule_3me2oxo_ATP_rheostatbiocrnpyler_566124; r65_1_ATP_rheostatbiocrnpyler_566124_k*complex_enzyme_kivD_molecule_3me2oxo_ATP_rheostatbiocrnpyler_566124;
    r65_1_ATP_rheostatbiocrnpyler_566124_k = 0.003;
  r67_ATP_rheostatbiocrnpyler_566124: complex_enzyme_kivD_molecule_3me2oxo_ATP_rheostatbiocrnpyler_566124 => complex_enzyme_kivD_molecule_isobutanal_ATP_rheostatbiocrnpyler_566124; r67_ATP_rheostatbiocrnpyler_566124_k*complex_enzyme_kivD_molecule_3me2oxo_ATP_rheostatbiocrnpyler_566124;
    r67_ATP_rheostatbiocrnpyler_566124_k = 36000;
  r68_ATP_rheostatbiocrnpyler_566124: complex_enzyme_kivD_molecule_isobutanal_ATP_rheostatbiocrnpyler_566124 => enzyme_kivD_ATP_rheostatbiocrnpyler_566124 + molecule_isobutanal_ATP_rheostatbiocrnpyler_566124; r68_ATP_rheostatbiocrnpyler_566124_k*complex_enzyme_kivD_molecule_isobutanal_ATP_rheostatbiocrnpyler_566124;
    r68_ATP_rheostatbiocrnpyler_566124_k = 0.03;
  r68_1_ATP_rheostatbiocrnpyler_566124: enzyme_kivD_ATP_rheostatbiocrnpyler_566124 + molecule_isobutanal_ATP_rheostatbiocrnpyler_566124 => complex_enzyme_kivD_molecule_isobutanal_ATP_rheostatbiocrnpyler_566124; r68_1_ATP_rheostatbiocrnpyler_566124_k*enzyme_kivD_ATP_rheostatbiocrnpyler_566124*molecule_isobutanal_ATP_rheostatbiocrnpyler_566124;
    r68_1_ATP_rheostatbiocrnpyler_566124_k = 0.003;
  r70_ATP_rheostatbiocrnpyler_566124: enzyme_yahk_ATP_rheostatbiocrnpyler_566124 + metabolite_nadph_ATP_rheostatbiocrnpyler_566124 + molecule_isobutanal_ATP_rheostatbiocrnpyler_566124 => complex_enzyme_yahk_metabolite_nadph_molecule_isobutanal_ATP_rheostatbiocrnpyler_566124; r70_ATP_rheostatbiocrnpyler_566124_k*enzyme_yahk_ATP_rheostatbiocrnpyler_566124*metabolite_nadph_ATP_rheostatbiocrnpyler_566124*molecule_isobutanal_ATP_rheostatbiocrnpyler_566124;
    r70_ATP_rheostatbiocrnpyler_566124_k = 0.03;
  r70_1_ATP_rheostatbiocrnpyler_566124: complex_enzyme_yahk_metabolite_nadph_molecule_isobutanal_ATP_rheostatbiocrnpyler_566124 => enzyme_yahk_ATP_rheostatbiocrnpyler_566124 + metabolite_nadph_ATP_rheostatbiocrnpyler_566124 + molecule_isobutanal_ATP_rheostatbiocrnpyler_566124; r70_1_ATP_rheostatbiocrnpyler_566124_k*complex_enzyme_yahk_metabolite_nadph_molecule_isobutanal_ATP_rheostatbiocrnpyler_566124;
    r70_1_ATP_rheostatbiocrnpyler_566124_k = 0.003;
  r72_ATP_rheostatbiocrnpyler_566124: complex_enzyme_yahk_metabolite_nadph_molecule_isobutanal_ATP_rheostatbiocrnpyler_566124 => complex_enzyme_yahk_metabolite_nadp_molecule_isobutanol_ATP_rheostatbiocrnpyler_566124; r72_ATP_rheostatbiocrnpyler_566124_k*complex_enzyme_yahk_metabolite_nadph_molecule_isobutanal_ATP_rheostatbiocrnpyler_566124;
    r72_ATP_rheostatbiocrnpyler_566124_k = 36000;
  r73_ATP_rheostatbiocrnpyler_566124: complex_enzyme_yahk_metabolite_nadp_molecule_isobutanol_ATP_rheostatbiocrnpyler_566124 => enzyme_yahk_ATP_rheostatbiocrnpyler_566124 + molecule_isobutanol_ATP_rheostatbiocrnpyler_566124 + metabolite_nadp_ATP_rheostatbiocrnpyler_566124; r73_ATP_rheostatbiocrnpyler_566124_k*complex_enzyme_yahk_metabolite_nadp_molecule_isobutanol_ATP_rheostatbiocrnpyler_566124;
    r73_ATP_rheostatbiocrnpyler_566124_k = 0.03;
  r73_1_ATP_rheostatbiocrnpyler_566124: enzyme_yahk_ATP_rheostatbiocrnpyler_566124 + molecule_isobutanol_ATP_rheostatbiocrnpyler_566124 + metabolite_nadp_ATP_rheostatbiocrnpyler_566124 => complex_enzyme_yahk_metabolite_nadp_molecule_isobutanol_ATP_rheostatbiocrnpyler_566124; r73_1_ATP_rheostatbiocrnpyler_566124_k*enzyme_yahk_ATP_rheostatbiocrnpyler_566124*molecule_isobutanol_ATP_rheostatbiocrnpyler_566124*metabolite_nadp_ATP_rheostatbiocrnpyler_566124;
    r73_1_ATP_rheostatbiocrnpyler_566124_k = 0.003;

  // Unit definitions:
  unit square_metre = metre^2;
end
