// SBML level 3 version 2

model combined_model_of__combined_model_of__external_reservoir_model_combined_model_of__atc_membrane_dnaexp_membrane_combined_model_of__biocrnpyler_318323()
  // model units - substance: mole, time: second, volume: litre, area: square_metre, length: metre, extent: mole

  // Compartments:
  compartment cell_1_internal_combined = 3e-6 litre;
  compartment cell_1_external_combined_1 = 0.0001 litre;

  // Species:
  species atc_e_external_reservoir_model_1_combined in cell_1_external_combined_1 = 10000/cell_1_external_combined_1;
  species atc_i in cell_1_internal_combined = 0;
  species ssDNA_e in cell_1_external_combined_1 = 0;
  species ssDNA in cell_1_internal_combined = 50/cell_1_internal_combined;
  species VirE2_b in cell_1_internal_combined = 0;
  species VirE2_b_ssDNA in cell_1_internal_combined = 0;
  species dna_g_biocrnpyler_318323 in cell_1_internal_combined = 1/cell_1_internal_combined;
  species tetR_biocrnpyler_318323 in cell_1_internal_combined = 10/cell_1_internal_combined;
  species rna_g_biocrnpyler_318323 in cell_1_internal_combined = 0;
  species VirE2_f_biocrnpyler_318323 in cell_1_internal_combined = 0;
  species ATP_biocrnpyler_318323 in cell_1_internal_combined = 28/cell_1_internal_combined;
  species ADP_biocrnpyler_318323 in cell_1_internal_combined = 0;
  species atc_i_biocrnpyler_318323 in cell_1_internal_combined = 0;
  species complex_atc_i_tetR__biocrnpyler_318323 in cell_1_internal_combined = 0;
  species VirE2_b_biocrnpyler_318323 in cell_1_internal_combined = 0;
  species complex_dna_g_tetR__biocrnpyler_318323 in cell_1_internal_combined = 0;
  species complex_atc_i_dna_g_tetR__biocrnpyler_318323 in cell_1_internal_combined = 0;
  species P_biocrnpyler_318323 in cell_1_internal_combined = 0;

  // Parameters:
  kb = 0.002 per_second;
  kd = 1e-5 per_second;
  kb1 = 0.002 per_second;
  kd1 = 1e-5 per_second;
  kd2 = 0.01 per_second;

  // Reactions:
  r1: atc_e_external_reservoir_model_1_combined -> atc_i; kb*atc_e_external_reservoir_model_1_combined - kd*atc_i;
  R1: VirE2_b + ssDNA -> VirE2_b_ssDNA; kb1*VirE2_b*ssDNA - kd1*VirE2_b_ssDNA;
  R2: VirE2_b_ssDNA => ssDNA_e + VirE2_b; kd2*VirE2_b_ssDNA;
  r0_biocrnpyler_318323: atc_i_biocrnpyler_318323 + tetR_biocrnpyler_318323 => complex_atc_i_tetR__biocrnpyler_318323; r0_biocrnpyler_318323_k_forward*atc_i_biocrnpyler_318323*tetR_biocrnpyler_318323;
    r0_biocrnpyler_318323_k_forward = 0.0002;
  r0rev_biocrnpyler_318323: complex_atc_i_tetR__biocrnpyler_318323 => atc_i_biocrnpyler_318323 + tetR_biocrnpyler_318323; r0rev_biocrnpyler_318323_k_reverse*complex_atc_i_tetR__biocrnpyler_318323;
    r0rev_biocrnpyler_318323_k_reverse = 2e-9;
  r1_biocrnpyler_318323: dna_g_biocrnpyler_318323 + tetR_biocrnpyler_318323 => complex_dna_g_tetR__biocrnpyler_318323; r1_biocrnpyler_318323_k_forward*dna_g_biocrnpyler_318323*tetR_biocrnpyler_318323;
    r1_biocrnpyler_318323_k_forward = 4e-5;
  r1rev_biocrnpyler_318323: complex_dna_g_tetR__biocrnpyler_318323 => dna_g_biocrnpyler_318323 + tetR_biocrnpyler_318323; r1rev_biocrnpyler_318323_k_reverse*complex_dna_g_tetR__biocrnpyler_318323;
    r1rev_biocrnpyler_318323_k_reverse = 1e-12;
  r2_biocrnpyler_318323: complex_dna_g_tetR__biocrnpyler_318323 + atc_i_biocrnpyler_318323 => complex_atc_i_dna_g_tetR__biocrnpyler_318323; r2_biocrnpyler_318323_k_forward*complex_dna_g_tetR__biocrnpyler_318323*atc_i_biocrnpyler_318323;
    r2_biocrnpyler_318323_k_forward = 6e-6;
  r2rev_biocrnpyler_318323: complex_atc_i_dna_g_tetR__biocrnpyler_318323 => complex_dna_g_tetR__biocrnpyler_318323 + atc_i_biocrnpyler_318323; r2rev_biocrnpyler_318323_k_reverse*complex_atc_i_dna_g_tetR__biocrnpyler_318323;
    r2rev_biocrnpyler_318323_k_reverse = 3e-9;
  r3_biocrnpyler_318323: complex_atc_i_dna_g_tetR__biocrnpyler_318323 => dna_g_biocrnpyler_318323 + complex_atc_i_tetR__biocrnpyler_318323; r3_biocrnpyler_318323_k_forward*complex_atc_i_dna_g_tetR__biocrnpyler_318323;
    r3_biocrnpyler_318323_k_forward = 0.005;
  r3rev_biocrnpyler_318323: dna_g_biocrnpyler_318323 + complex_atc_i_tetR__biocrnpyler_318323 => complex_atc_i_dna_g_tetR__biocrnpyler_318323; r3rev_biocrnpyler_318323_k_reverse*dna_g_biocrnpyler_318323*complex_atc_i_tetR__biocrnpyler_318323;
    r3rev_biocrnpyler_318323_k_reverse = 1e-10;
  r4_biocrnpyler_318323: dna_g_biocrnpyler_318323 => dna_g_biocrnpyler_318323 + rna_g_biocrnpyler_318323; r4_biocrnpyler_318323_k_forward*dna_g_biocrnpyler_318323;
    r4_biocrnpyler_318323_k_forward = 0.0031875;
  r5_biocrnpyler_318323: rna_g_biocrnpyler_318323 + ATP_biocrnpyler_318323 => rna_g_biocrnpyler_318323 + ADP_biocrnpyler_318323 + VirE2_f_biocrnpyler_318323 + P_biocrnpyler_318323; k*rna_g_biocrnpyler_318323*ATP_biocrnpyler_318323^n/(K^n + ATP_biocrnpyler_318323^n);
    k = 0.001; K = 1; n = 1;
  r6_biocrnpyler_318323: VirE2_f_biocrnpyler_318323 => VirE2_b_biocrnpyler_318323; r6_biocrnpyler_318323_k_forward*VirE2_f_biocrnpyler_318323;
    r6_biocrnpyler_318323_k_forward = 0.001;
  r6rev_biocrnpyler_318323: VirE2_b_biocrnpyler_318323 => VirE2_f_biocrnpyler_318323; r6rev_biocrnpyler_318323_k_reverse*VirE2_b_biocrnpyler_318323;
    r6rev_biocrnpyler_318323_k_reverse = 1e-10;
  r7_biocrnpyler_318323: rna_g_biocrnpyler_318323 => ; r7_biocrnpyler_318323_k_forward*rna_g_biocrnpyler_318323;
    r7_biocrnpyler_318323_k_forward = 0.001;
  r8_biocrnpyler_318323: VirE2_f_biocrnpyler_318323 => ; r8_biocrnpyler_318323_k_forward*VirE2_f_biocrnpyler_318323;
    r8_biocrnpyler_318323_k_forward = 1e-5;

  // Unit definitions:
  unit square_metre = metre^2;
  unit per_second = 1 / second;
  unit substance = dimensionless;
end
