// SBML level 3 version 2

model biocrnpyler_318323()
  // model units - substance: mole, time: second, volume: litre, area: square_metre, length: metre, extent: mole

  // Compartments:
  compartment default = 1e-6;

  // Species:
  species dna_g in default = 0;
  species tetR in default = 0;
  species rna_g in default = 0;
  species VirE2_f in default = 0;
  species ATP in default = 0;
  species ADP in default = 0;
  species atc_i in default = 0;
  species complex_atc_i_tetR_ in default = 0;
  species VirE2_b in default = 0;
  species complex_dna_g_tetR_ in default = 0;
  species complex_atc_i_dna_g_tetR_ in default = 0;
  species P in default = 0;

  // Reactions:
  r0: atc_i + tetR => complex_atc_i_tetR_; r0_k_forward*atc_i*tetR;
    r0_k_forward = 0.0002;
  r0rev: complex_atc_i_tetR_ => atc_i + tetR; r0rev_k_reverse*complex_atc_i_tetR_;
    r0rev_k_reverse = 2e-9;
  r1: dna_g + tetR => complex_dna_g_tetR_; r1_k_forward*dna_g*tetR;
    r1_k_forward = 4e-5;
  r1rev: complex_dna_g_tetR_ => dna_g + tetR; r1rev_k_reverse*complex_dna_g_tetR_;
    r1rev_k_reverse = 1e-12;
  r2: complex_dna_g_tetR_ + atc_i => complex_atc_i_dna_g_tetR_; r2_k_forward*complex_dna_g_tetR_*atc_i;
    r2_k_forward = 6e-6;
  r2rev: complex_atc_i_dna_g_tetR_ => complex_dna_g_tetR_ + atc_i; r2rev_k_reverse*complex_atc_i_dna_g_tetR_;
    r2rev_k_reverse = 3e-9;
  r3: complex_atc_i_dna_g_tetR_ => dna_g + complex_atc_i_tetR_; r3_k_forward*complex_atc_i_dna_g_tetR_;
    r3_k_forward = 0.005;
  r3rev: dna_g + complex_atc_i_tetR_ => complex_atc_i_dna_g_tetR_; r3rev_k_reverse*dna_g*complex_atc_i_tetR_;
    r3rev_k_reverse = 1e-10;
  r4: dna_g => dna_g + rna_g; r4_k_forward*dna_g;
    r4_k_forward = 0.0031875;
  r5: rna_g + ATP => rna_g + ADP + VirE2_f + P; k*rna_g*ATP^n/(K^n + ATP^n);
    k = 0.001; K = 1; n = 1;
  r6: VirE2_f => VirE2_b; r6_k_forward*VirE2_f;
    r6_k_forward = 0.001;
  r6rev: VirE2_b => VirE2_f; r6rev_k_reverse*VirE2_b;
    r6rev_k_reverse = 1e-10;
  r7: rna_g => ; r7_k_forward*rna_g;
    r7_k_forward = 0.001;
  r8: VirE2_f => ; r8_k_forward*VirE2_f;
    r8_k_forward = 1e-5;

  // Unit definitions:
  unit square_metre = metre^2;
end
