// SBML level 3 version 2

model biocrnpyler_367767()
  // model units - substance: mole, time: second, volume: litre, area: square_metre, length: metre, extent: mole

  // Compartments:
  compartment default = 1e-6;

  // Species:
  species dna_f in default = 0;
  species tetR in default = 0;
  species rna_f in default = 0;
  species exsA in default = 0;
  species ATP in default = 0;
  species ADP in default = 0;
  species atc_i_cell2 in default = 0;
  species complex_atc_i_cell2_tetR in default = 0;
  species complex_dna_f_tetR in default = 0;
  species complex_atc_i_cell2_dna_f_tetR in default = 0;
  species P in default = 0;

  // Reactions:
  r0cell2: atc_i_cell2 + tetR => complex_atc_i_cell2_tetR; r0cell2_k*atc_i_cell2*tetR;
    r0cell2_k = 2e-5;
  r0_1: complex_atc_i_cell2_tetR => atc_i_cell2 + tetR; r0_1_k*complex_atc_i_cell2_tetR; r0_1 is "r0_1cell2";
    r0_1_k = 2e-9;
  r2: dna_f + tetR => complex_dna_f_tetR; r2_k*dna_f*tetR;
    r2_k = 4e-7;
  r2_1: complex_dna_f_tetR => dna_f + tetR; r2_1_k*complex_dna_f_tetR;
    r2_1_k = 1e-12;
  r4: complex_dna_f_tetR + atc_i_cell2 => complex_atc_i_cell2_dna_f_tetR; r4_k*complex_dna_f_tetR*atc_i_cell2;
    r4_k = 6e-8;
  r4_1: complex_atc_i_cell2_dna_f_tetR => complex_dna_f_tetR + atc_i_cell2; r4_1_k*complex_atc_i_cell2_dna_f_tetR;
    r4_1_k = 3e-9;
  r6: complex_atc_i_cell2_dna_f_tetR => dna_f + complex_atc_i_cell2_tetR; r6_k*complex_atc_i_cell2_dna_f_tetR;
    r6_k = 5e-5;
  r6_1: dna_f + complex_atc_i_cell2_tetR => complex_atc_i_cell2_dna_f_tetR; r6_1_k*dna_f*complex_atc_i_cell2_tetR;
    r6_1_k = 1e-10;
  r8: dna_f => dna_f + rna_f; r8_k*dna_f;
    r8_k = 0.001875;
  r9: rna_f + ATP => rna_f + ADP + exsA + P; r9_k*rna_f*ATP^n/(ATP^n + K);
    r9_k = 0.0005; n = 1; K = 1;
  r10: rna_f => ; r10_k*rna_f;
    r10_k = 0.001;

  // Unit definitions:
  unit square_metre = metre^2;
end
