// SBML level 3 version 2

model biocrnpyler_798952()
  // model units - substance: mole, time: second, volume: litre, area: square_metre, length: metre, extent: mole

  // Compartments:
  compartment default = 1e-6;

  // Species:
  species dna_h in default = 0;
  species rna_h in default = 0;
  species exsA in default = 0;
  species ATP in default = 0;
  species ADP in default = 0;
  species P in default = 0;
  species complex_dna_h_exsA in default = 0;
  species gfp in default = 0;

  // Reactions:
  r0: dna_h + exsA => complex_dna_h_exsA; r0_k*dna_h*exsA;
    r0_k = 4e-5;
  r0_1: complex_dna_h_exsA => dna_h + exsA; r0_1_k*complex_dna_h_exsA;
    r0_1_k = 1e-12;
  r2: complex_dna_h_exsA => complex_dna_h_exsA + rna_h; r2_k*complex_dna_h_exsA;
    r2_k = 0.001875;
  r3: rna_h + ATP => rna_h + ADP + gfp + P; r3_k*rna_h*ATP^n/(ATP^n + K);
    r3_k = 0.0005; n = 1; K = 1;
  r4: rna_h => ; r4_k*rna_h;
    r4_k = 0.001;

  // Unit definitions:
  unit square_metre = metre^2;
end
