// SBML level 3 version 2

model combined_model_of__combined_model_of__external_reservoir_model_combined_model_of__atc_membrane2_combined_model_of__combined_model_of__biocrnpyler_585441_biocrnpyler_34510()
  // model units - substance: mole, time: second, volume: litre, area: square_metre, length: metre, extent: mole

  // Compartments:
  compartment cell_external = 0.0001 litre;
  compartment cell_2_internal_combined = 1e-6 litre;

  // Species:
  species atc_e_external_reservoir_model_1_combined in cell_external = 10000;
  species ssDNA_comp1 in cell_2_internal_combined = 10;
  species dna_f_exsAbiocrnpyler_585441_combined_model_of__biocrnpyler_585441_biocrnpyler_34510 in cell_2_internal_combined = 1;
  species tetR_exsAbiocrnpyler_585441_combined_model_of__biocrnpyler_585441_biocrnpyler_34510 in cell_2_internal_combined = 10;
  species rna_f_exsAbiocrnpyler_585441_combined_model_of__biocrnpyler_585441_biocrnpyler_34510 in cell_2_internal_combined = 0;
  species exsA_exsAbiocrnpyler_585441_combined_model_of__biocrnpyler_585441_biocrnpyler_34510 in cell_2_internal_combined = 0;
  species atc_i_cell2_1_combined in cell_2_internal_combined = 0;
  species complex_atc_i_cell2_tetR_exsAbiocrnpyler_585441_combined_model_of__biocrnpyler_585441_biocrnpyler_34510 in cell_2_internal_combined = 0;
  species complex_dna_f_tetR_exsAbiocrnpyler_585441_combined_model_of__biocrnpyler_585441_biocrnpyler_34510 in cell_2_internal_combined = 0;
  species complex_atc_i_cell2_dna_f_tetR_exsAbiocrnpyler_585441_combined_model_of__biocrnpyler_585441_biocrnpyler_34510 in cell_2_internal_combined = 0;
  species enzyme_hex_ATP_rheostatbiocrnpyler_34510_combined_model_of__biocrnpyler_585441_biocrnpyler_34510 in cell_2_internal_combined = 0.2;
  species ATP_exsAbiocrnpyler_585441_1_combined_combined_model_of__biocrnpyler_585441_biocrnpyler_34510 in cell_2_internal_combined = 15;
  species molecule_glucose_ATP_rheostatbiocrnpyler_34510_combined_model_of__biocrnpyler_585441_biocrnpyler_34510 in cell_2_internal_combined = 30;
  species molecule_g6p_ATP_rheostatbiocrnpyler_34510_combined_model_of__biocrnpyler_585441_biocrnpyler_34510 in cell_2_internal_combined = 0;
  species ADP_exsAbiocrnpyler_585441_1_combined_combined_model_of__biocrnpyler_585441_biocrnpyler_34510 in cell_2_internal_combined = 0;
  species complex_enzyme_hex_metabolite_atp_molecule_glucose_ATP_rheostatbiocrnpyler_34510_combined_model_of__biocrnpyler_585441_biocrnpyler_34510 in cell_2_internal_combined = 0;
  species complex_enzyme_hex_metabolite_adp_molecule_g6p_ATP_rheostatbiocrnpyler_34510_combined_model_of__biocrnpyler_585441_biocrnpyler_34510 in cell_2_internal_combined = 0;
  species enzyme_pgi_ATP_rheostatbiocrnpyler_34510_combined_model_of__biocrnpyler_585441_biocrnpyler_34510 in cell_2_internal_combined = 0.2;
  species molecule_f6p_ATP_rheostatbiocrnpyler_34510_combined_model_of__biocrnpyler_585441_biocrnpyler_34510 in cell_2_internal_combined = 0;
  species complex_enzyme_pgi_molecule_g6p_ATP_rheostatbiocrnpyler_34510_combined_model_of__biocrnpyler_585441_biocrnpyler_34510 in cell_2_internal_combined = 0;
  species complex_enzyme_pgi_molecule_f6p_ATP_rheostatbiocrnpyler_34510_combined_model_of__biocrnpyler_585441_biocrnpyler_34510 in cell_2_internal_combined = 0;
  species enzyme_pfk_ATP_rheostatbiocrnpyler_34510_combined_model_of__biocrnpyler_585441_biocrnpyler_34510 in cell_2_internal_combined = 0.2;
  species molecule_f16p_ATP_rheostatbiocrnpyler_34510_combined_model_of__biocrnpyler_585441_biocrnpyler_34510 in cell_2_internal_combined = 0;
  species complex_enzyme_pfk_metabolite_atp_molecule_f6p_ATP_rheostatbiocrnpyler_34510_combined_model_of__biocrnpyler_585441_biocrnpyler_34510 in cell_2_internal_combined = 0;
  species complex_enzyme_pfk_metabolite_adp_molecule_f16p_ATP_rheostatbiocrnpyler_34510_combined_model_of__biocrnpyler_585441_biocrnpyler_34510 in cell_2_internal_combined = 0;
  species enzyme_ald_tpi_ATP_rheostatbiocrnpyler_34510_combined_model_of__biocrnpyler_585441_biocrnpyler_34510 in cell_2_internal_combined = 0.2;
  species molecule_g3p_ATP_rheostatbiocrnpyler_34510_combined_model_of__biocrnpyler_585441_biocrnpyler_34510 in cell_2_internal_combined = 0;
  species complex_enzyme_ald_tpi_molecule_f16p_ATP_rheostatbiocrnpyler_34510_combined_model_of__biocrnpyler_585441_biocrnpyler_34510 in cell_2_internal_combined = 0;
  species complex_enzyme_ald_tpi_2x_molecule_g3p_ATP_rheostatbiocrnpyler_34510_combined_model_of__biocrnpyler_585441_biocrnpyler_34510 in cell_2_internal_combined = 0;
  species enzyme_gapN_ATP_rheostatbiocrnpyler_34510_combined_model_of__biocrnpyler_585441_biocrnpyler_34510 in cell_2_internal_combined = 0.2;
  species metabolite_nadp_ATP_rheostatbiocrnpyler_34510_combined_model_of__biocrnpyler_585441_biocrnpyler_34510 in cell_2_internal_combined = 30;
  species molecule_3pg_ATP_rheostatbiocrnpyler_34510_combined_model_of__biocrnpyler_585441_biocrnpyler_34510 in cell_2_internal_combined = 0;
  species metabolite_nadph_ATP_rheostatbiocrnpyler_34510_combined_model_of__biocrnpyler_585441_biocrnpyler_34510 in cell_2_internal_combined = 0;
  species complex_enzyme_gapN_2x_metabolite_nadp_2x_molecule_g3p_ATP_rheostatbiocrnpyler_34510_combined_model_of__biocrnpyler_585441_biocrnpyler_34510 in cell_2_internal_combined = 0;
  species complex_enzyme_gapN_2x_metabolite_nadph_2x_molecule_3pg_ATP_rheostatbiocrnpyler_34510_combined_model_of__biocrnpyler_585441_biocrnpyler_34510 in cell_2_internal_combined = 0;
  species enzyme_mGapDH_ATP_rheostatbiocrnpyler_34510_combined_model_of__biocrnpyler_585441_biocrnpyler_34510 in cell_2_internal_combined = 0.2;
  species P_exsAbiocrnpyler_585441_1_combined_combined_model_of__biocrnpyler_585441_biocrnpyler_34510 in cell_2_internal_combined = 30;
  species molecule_13bpg_ATP_rheostatbiocrnpyler_34510_combined_model_of__biocrnpyler_585441_biocrnpyler_34510 in cell_2_internal_combined = 0;
  species complex_enzyme_mGapDH_2x_metabolite_nadp_metabolite_pi_2x_molecule_g3p_ATP_rheostatbiocrnpyler_34510_combined_model_of__biocrnpyler_585441_biocrnpyler_34510 in cell_2_internal_combined = 0;
  species complex_enzyme_mGapDH_2x_metabolite_nadph_molecule_13bpg_ATP_rheostatbiocrnpyler_34510_combined_model_of__biocrnpyler_585441_biocrnpyler_34510 in cell_2_internal_combined = 0;
  species enzyme_pgk_ATP_rheostatbiocrnpyler_34510_combined_model_of__biocrnpyler_585441_biocrnpyler_34510 in cell_2_internal_combined = 0.2;
  species complex_enzyme_pgk_metabolite_adp_molecule_13bpg_ATP_rheostatbiocrnpyler_34510_combined_model_of__biocrnpyler_585441_biocrnpyler_34510 in cell_2_internal_combined = 0;
  species complex_enzyme_pgk_metabolite_atp_2x_molecule_3pg_ATP_rheostatbiocrnpyler_34510_combined_model_of__biocrnpyler_585441_biocrnpyler_34510 in cell_2_internal_combined = 0;
  species enzyme_pgm_ATP_rheostatbiocrnpyler_34510_combined_model_of__biocrnpyler_585441_biocrnpyler_34510 in cell_2_internal_combined = 0.2;
  species molecule_2pg_ATP_rheostatbiocrnpyler_34510_combined_model_of__biocrnpyler_585441_biocrnpyler_34510 in cell_2_internal_combined = 0;
  species complex_enzyme_pgm_2x_molecule_3pg_ATP_rheostatbiocrnpyler_34510_combined_model_of__biocrnpyler_585441_biocrnpyler_34510 in cell_2_internal_combined = 0;
  species complex_enzyme_pgm_2x_molecule_2pg_ATP_rheostatbiocrnpyler_34510_combined_model_of__biocrnpyler_585441_biocrnpyler_34510 in cell_2_internal_combined = 0;
  species enzyme_eno_ATP_rheostatbiocrnpyler_34510_combined_model_of__biocrnpyler_585441_biocrnpyler_34510 in cell_2_internal_combined = 0.2;
  species molecule_pep_ATP_rheostatbiocrnpyler_34510_combined_model_of__biocrnpyler_585441_biocrnpyler_34510 in cell_2_internal_combined = 0;
  species complex_enzyme_eno_2x_molecule_2pg_ATP_rheostatbiocrnpyler_34510_combined_model_of__biocrnpyler_585441_biocrnpyler_34510 in cell_2_internal_combined = 0;
  species complex_enzyme_eno_2x_molecule_pep_ATP_rheostatbiocrnpyler_34510_combined_model_of__biocrnpyler_585441_biocrnpyler_34510 in cell_2_internal_combined = 0;
  species enzyme_pyk_ATP_rheostatbiocrnpyler_34510_combined_model_of__biocrnpyler_585441_biocrnpyler_34510 in cell_2_internal_combined = 0.2;
  species molecule_pyruvate_ATP_rheostatbiocrnpyler_34510_combined_model_of__biocrnpyler_585441_biocrnpyler_34510 in cell_2_internal_combined = 0;
  species complex_enzyme_pyk_2x_metabolite_adp_2x_molecule_pep_ATP_rheostatbiocrnpyler_34510_combined_model_of__biocrnpyler_585441_biocrnpyler_34510 in cell_2_internal_combined = 0;
  species complex_enzyme_pyk_2x_metabolite_atp_2x_molecule_pyruvate_ATP_rheostatbiocrnpyler_34510_combined_model_of__biocrnpyler_585441_biocrnpyler_34510 in cell_2_internal_combined = 0;
  species enzyme_alsS_ATP_rheostatbiocrnpyler_34510_combined_model_of__biocrnpyler_585441_biocrnpyler_34510 in cell_2_internal_combined = 0.2;
  species molecule_acetolac_ATP_rheostatbiocrnpyler_34510_combined_model_of__biocrnpyler_585441_biocrnpyler_34510 in cell_2_internal_combined = 0;
  species complex_enzyme_alsS_2x_molecule_pyruvate_ATP_rheostatbiocrnpyler_34510_combined_model_of__biocrnpyler_585441_biocrnpyler_34510 in cell_2_internal_combined = 0;
  species complex_enzyme_alsS_molecule_acetolac_ATP_rheostatbiocrnpyler_34510_combined_model_of__biocrnpyler_585441_biocrnpyler_34510 in cell_2_internal_combined = 0;
  species enzyme_IlvC_ATP_rheostatbiocrnpyler_34510_combined_model_of__biocrnpyler_585441_biocrnpyler_34510 in cell_2_internal_combined = 0.2;
  species molecule_23dih3mebut_ATP_rheostatbiocrnpyler_34510_combined_model_of__biocrnpyler_585441_biocrnpyler_34510 in cell_2_internal_combined = 0;
  species complex_enzyme_IlvC_metabolite_nadph_molecule_acetolac_ATP_rheostatbiocrnpyler_34510_combined_model_of__biocrnpyler_585441_biocrnpyler_34510 in cell_2_internal_combined = 0;
  species complex_enzyme_IlvC_metabolite_nadp_molecule_23dih3mebut_ATP_rheostatbiocrnpyler_34510_combined_model_of__biocrnpyler_585441_biocrnpyler_34510 in cell_2_internal_combined = 0;
  species enzyme_IlvD_ATP_rheostatbiocrnpyler_34510_combined_model_of__biocrnpyler_585441_biocrnpyler_34510 in cell_2_internal_combined = 0.2;
  species molecule_3me2oxo_ATP_rheostatbiocrnpyler_34510_combined_model_of__biocrnpyler_585441_biocrnpyler_34510 in cell_2_internal_combined = 0;
  species complex_enzyme_IlvD_molecule_23dih3mebut_ATP_rheostatbiocrnpyler_34510_combined_model_of__biocrnpyler_585441_biocrnpyler_34510 in cell_2_internal_combined = 0;
  species complex_enzyme_IlvD_molecule_3me2oxo_ATP_rheostatbiocrnpyler_34510_combined_model_of__biocrnpyler_585441_biocrnpyler_34510 in cell_2_internal_combined = 0;
  species enzyme_kivD_ATP_rheostatbiocrnpyler_34510_combined_model_of__biocrnpyler_585441_biocrnpyler_34510 in cell_2_internal_combined = 0.2;
  species molecule_isobutanal_ATP_rheostatbiocrnpyler_34510_combined_model_of__biocrnpyler_585441_biocrnpyler_34510 in cell_2_internal_combined = 0;
  species complex_enzyme_kivD_molecule_3me2oxo_ATP_rheostatbiocrnpyler_34510_combined_model_of__biocrnpyler_585441_biocrnpyler_34510 in cell_2_internal_combined = 0;
  species complex_enzyme_kivD_molecule_isobutanal_ATP_rheostatbiocrnpyler_34510_combined_model_of__biocrnpyler_585441_biocrnpyler_34510 in cell_2_internal_combined = 0;
  species enzyme_yahk_ATP_rheostatbiocrnpyler_34510_combined_model_of__biocrnpyler_585441_biocrnpyler_34510 in cell_2_internal_combined = 0.2;
  species molecule_isobutanol_ATP_rheostatbiocrnpyler_34510_combined_model_of__biocrnpyler_585441_biocrnpyler_34510 in cell_2_internal_combined = 0;
  species complex_enzyme_yahk_metabolite_nadph_molecule_isobutanal_ATP_rheostatbiocrnpyler_34510_combined_model_of__biocrnpyler_585441_biocrnpyler_34510 in cell_2_internal_combined = 0;
  species complex_enzyme_yahk_metabolite_nadp_molecule_isobutanol_ATP_rheostatbiocrnpyler_34510_combined_model_of__biocrnpyler_585441_biocrnpyler_34510 in cell_2_internal_combined = 0;

  // Parameters:
  kb = 0.002 per_second;
  kd = 1e-5 per_second;

  // Reactions:
  r1_cell2: atc_e_external_reservoir_model_1_combined -> atc_i_cell2_1_combined; kb*atc_e_external_reservoir_model_1_combined - kd*atc_i_cell2_1_combined;
  r0_exsAbiocrnpyler_585441_combined_model_of__biocrnpyler_585441_biocrnpyler_34510: atc_i_cell2_1_combined + tetR_exsAbiocrnpyler_585441_combined_model_of__biocrnpyler_585441_biocrnpyler_34510 => complex_atc_i_cell2_tetR_exsAbiocrnpyler_585441_combined_model_of__biocrnpyler_585441_biocrnpyler_34510; r0_exsAbiocrnpyler_585441_combined_model_of__biocrnpyler_585441_biocrnpyler_34510_k*atc_i_cell2_1_combined*tetR_exsAbiocrnpyler_585441_combined_model_of__biocrnpyler_585441_biocrnpyler_34510; r0_exsAbiocrnpyler_585441_combined_model_of__biocrnpyler_585441_biocrnpyler_34510 is "r0cell2";
    r0_exsAbiocrnpyler_585441_combined_model_of__biocrnpyler_585441_biocrnpyler_34510_k = 2e-5;
  r0_1_exsAbiocrnpyler_585441_combined_model_of__biocrnpyler_585441_biocrnpyler_34510: complex_atc_i_cell2_tetR_exsAbiocrnpyler_585441_combined_model_of__biocrnpyler_585441_biocrnpyler_34510 => atc_i_cell2_1_combined + tetR_exsAbiocrnpyler_585441_combined_model_of__biocrnpyler_585441_biocrnpyler_34510; r0_1_exsAbiocrnpyler_585441_combined_model_of__biocrnpyler_585441_biocrnpyler_34510_k*complex_atc_i_cell2_tetR_exsAbiocrnpyler_585441_combined_model_of__biocrnpyler_585441_biocrnpyler_34510; r0_1_exsAbiocrnpyler_585441_combined_model_of__biocrnpyler_585441_biocrnpyler_34510 is "r0_1cell2";
    r0_1_exsAbiocrnpyler_585441_combined_model_of__biocrnpyler_585441_biocrnpyler_34510_k = 2e-9;
  r2_exsAbiocrnpyler_585441_combined_model_of__biocrnpyler_585441_biocrnpyler_34510: dna_f_exsAbiocrnpyler_585441_combined_model_of__biocrnpyler_585441_biocrnpyler_34510 + tetR_exsAbiocrnpyler_585441_combined_model_of__biocrnpyler_585441_biocrnpyler_34510 => complex_dna_f_tetR_exsAbiocrnpyler_585441_combined_model_of__biocrnpyler_585441_biocrnpyler_34510; r2_exsAbiocrnpyler_585441_combined_model_of__biocrnpyler_585441_biocrnpyler_34510_k*dna_f_exsAbiocrnpyler_585441_combined_model_of__biocrnpyler_585441_biocrnpyler_34510*tetR_exsAbiocrnpyler_585441_combined_model_of__biocrnpyler_585441_biocrnpyler_34510;
    r2_exsAbiocrnpyler_585441_combined_model_of__biocrnpyler_585441_biocrnpyler_34510_k = 4e-7;
  r2_1_exsAbiocrnpyler_585441_combined_model_of__biocrnpyler_585441_biocrnpyler_34510: complex_dna_f_tetR_exsAbiocrnpyler_585441_combined_model_of__biocrnpyler_585441_biocrnpyler_34510 => dna_f_exsAbiocrnpyler_585441_combined_model_of__biocrnpyler_585441_biocrnpyler_34510 + tetR_exsAbiocrnpyler_585441_combined_model_of__biocrnpyler_585441_biocrnpyler_34510; r2_1_exsAbiocrnpyler_585441_combined_model_of__biocrnpyler_585441_biocrnpyler_34510_k*complex_dna_f_tetR_exsAbiocrnpyler_585441_combined_model_of__biocrnpyler_585441_biocrnpyler_34510;
    r2_1_exsAbiocrnpyler_585441_combined_model_of__biocrnpyler_585441_biocrnpyler_34510_k = 1e-12;
  r4_exsAbiocrnpyler_585441_combined_model_of__biocrnpyler_585441_biocrnpyler_34510: complex_dna_f_tetR_exsAbiocrnpyler_585441_combined_model_of__biocrnpyler_585441_biocrnpyler_34510 + atc_i_cell2_1_combined => complex_atc_i_cell2_dna_f_tetR_exsAbiocrnpyler_585441_combined_model_of__biocrnpyler_585441_biocrnpyler_34510; r4_exsAbiocrnpyler_585441_combined_model_of__biocrnpyler_585441_biocrnpyler_34510_k*complex_dna_f_tetR_exsAbiocrnpyler_585441_combined_model_of__biocrnpyler_585441_biocrnpyler_34510*atc_i_cell2_1_combined;
    r4_exsAbiocrnpyler_585441_combined_model_of__biocrnpyler_585441_biocrnpyler_34510_k = 6e-8;
  r4_1_exsAbiocrnpyler_585441_combined_model_of__biocrnpyler_585441_biocrnpyler_34510: complex_atc_i_cell2_dna_f_tetR_exsAbiocrnpyler_585441_combined_model_of__biocrnpyler_585441_biocrnpyler_34510 => complex_dna_f_tetR_exsAbiocrnpyler_585441_combined_model_of__biocrnpyler_585441_biocrnpyler_34510 + atc_i_cell2_1_combined; r4_1_exsAbiocrnpyler_585441_combined_model_of__biocrnpyler_585441_biocrnpyler_34510_k*complex_atc_i_cell2_dna_f_tetR_exsAbiocrnpyler_585441_combined_model_of__biocrnpyler_585441_biocrnpyler_34510;
    r4_1_exsAbiocrnpyler_585441_combined_model_of__biocrnpyler_585441_biocrnpyler_34510_k = 3e-9;
  r6_exsAbiocrnpyler_585441_combined_model_of__biocrnpyler_585441_biocrnpyler_34510: complex_atc_i_cell2_dna_f_tetR_exsAbiocrnpyler_585441_combined_model_of__biocrnpyler_585441_biocrnpyler_34510 => dna_f_exsAbiocrnpyler_585441_combined_model_of__biocrnpyler_585441_biocrnpyler_34510 + complex_atc_i_cell2_tetR_exsAbiocrnpyler_585441_combined_model_of__biocrnpyler_585441_biocrnpyler_34510; r6_exsAbiocrnpyler_585441_combined_model_of__biocrnpyler_585441_biocrnpyler_34510_k*complex_atc_i_cell2_dna_f_tetR_exsAbiocrnpyler_585441_combined_model_of__biocrnpyler_585441_biocrnpyler_34510;
    r6_exsAbiocrnpyler_585441_combined_model_of__biocrnpyler_585441_biocrnpyler_34510_k = 5e-5;
  r6_1_exsAbiocrnpyler_585441_combined_model_of__biocrnpyler_585441_biocrnpyler_34510: dna_f_exsAbiocrnpyler_585441_combined_model_of__biocrnpyler_585441_biocrnpyler_34510 + complex_atc_i_cell2_tetR_exsAbiocrnpyler_585441_combined_model_of__biocrnpyler_585441_biocrnpyler_34510 => complex_atc_i_cell2_dna_f_tetR_exsAbiocrnpyler_585441_combined_model_of__biocrnpyler_585441_biocrnpyler_34510; r6_1_exsAbiocrnpyler_585441_combined_model_of__biocrnpyler_585441_biocrnpyler_34510_k*dna_f_exsAbiocrnpyler_585441_combined_model_of__biocrnpyler_585441_biocrnpyler_34510*complex_atc_i_cell2_tetR_exsAbiocrnpyler_585441_combined_model_of__biocrnpyler_585441_biocrnpyler_34510;
    r6_1_exsAbiocrnpyler_585441_combined_model_of__biocrnpyler_585441_biocrnpyler_34510_k = 1e-10;
  r8_exsAbiocrnpyler_585441_combined_model_of__biocrnpyler_585441_biocrnpyler_34510: dna_f_exsAbiocrnpyler_585441_combined_model_of__biocrnpyler_585441_biocrnpyler_34510 => dna_f_exsAbiocrnpyler_585441_combined_model_of__biocrnpyler_585441_biocrnpyler_34510 + rna_f_exsAbiocrnpyler_585441_combined_model_of__biocrnpyler_585441_biocrnpyler_34510; r8_exsAbiocrnpyler_585441_combined_model_of__biocrnpyler_585441_biocrnpyler_34510_k*dna_f_exsAbiocrnpyler_585441_combined_model_of__biocrnpyler_585441_biocrnpyler_34510;
    r8_exsAbiocrnpyler_585441_combined_model_of__biocrnpyler_585441_biocrnpyler_34510_k = 0.001875;
  r9_exsAbiocrnpyler_585441_combined_model_of__biocrnpyler_585441_biocrnpyler_34510: rna_f_exsAbiocrnpyler_585441_combined_model_of__biocrnpyler_585441_biocrnpyler_34510 + ATP_exsAbiocrnpyler_585441_1_combined_combined_model_of__biocrnpyler_585441_biocrnpyler_34510 => rna_f_exsAbiocrnpyler_585441_combined_model_of__biocrnpyler_585441_biocrnpyler_34510 + ADP_exsAbiocrnpyler_585441_1_combined_combined_model_of__biocrnpyler_585441_biocrnpyler_34510 + exsA_exsAbiocrnpyler_585441_combined_model_of__biocrnpyler_585441_biocrnpyler_34510 + P_exsAbiocrnpyler_585441_1_combined_combined_model_of__biocrnpyler_585441_biocrnpyler_34510; r9_exsAbiocrnpyler_585441_combined_model_of__biocrnpyler_585441_biocrnpyler_34510_k*rna_f_exsAbiocrnpyler_585441_combined_model_of__biocrnpyler_585441_biocrnpyler_34510*ATP_exsAbiocrnpyler_585441_1_combined_combined_model_of__biocrnpyler_585441_biocrnpyler_34510^n/(ATP_exsAbiocrnpyler_585441_1_combined_combined_model_of__biocrnpyler_585441_biocrnpyler_34510^n + K);
    r9_exsAbiocrnpyler_585441_combined_model_of__biocrnpyler_585441_biocrnpyler_34510_k = 0.0005; n = 1; K = 1;
  r10_exsAbiocrnpyler_585441_combined_model_of__biocrnpyler_585441_biocrnpyler_34510: rna_f_exsAbiocrnpyler_585441_combined_model_of__biocrnpyler_585441_biocrnpyler_34510 => ; r10_exsAbiocrnpyler_585441_combined_model_of__biocrnpyler_585441_biocrnpyler_34510_k*rna_f_exsAbiocrnpyler_585441_combined_model_of__biocrnpyler_585441_biocrnpyler_34510;
    r10_exsAbiocrnpyler_585441_combined_model_of__biocrnpyler_585441_biocrnpyler_34510_k = 0.001;
  r0_ATP_rheostatbiocrnpyler_34510_combined_model_of__biocrnpyler_585441_biocrnpyler_34510: enzyme_hex_ATP_rheostatbiocrnpyler_34510_combined_model_of__biocrnpyler_585441_biocrnpyler_34510 + ATP_exsAbiocrnpyler_585441_1_combined_combined_model_of__biocrnpyler_585441_biocrnpyler_34510 + molecule_glucose_ATP_rheostatbiocrnpyler_34510_combined_model_of__biocrnpyler_585441_biocrnpyler_34510 => complex_enzyme_hex_metabolite_atp_molecule_glucose_ATP_rheostatbiocrnpyler_34510_combined_model_of__biocrnpyler_585441_biocrnpyler_34510; r0_ATP_rheostatbiocrnpyler_34510_combined_model_of__biocrnpyler_585441_biocrnpyler_34510_k*enzyme_hex_ATP_rheostatbiocrnpyler_34510_combined_model_of__biocrnpyler_585441_biocrnpyler_34510*ATP_exsAbiocrnpyler_585441_1_combined_combined_model_of__biocrnpyler_585441_biocrnpyler_34510*molecule_glucose_ATP_rheostatbiocrnpyler_34510_combined_model_of__biocrnpyler_585441_biocrnpyler_34510;
    r0_ATP_rheostatbiocrnpyler_34510_combined_model_of__biocrnpyler_585441_biocrnpyler_34510_k = 100;
  r0_1_ATP_rheostatbiocrnpyler_34510_combined_model_of__biocrnpyler_585441_biocrnpyler_34510: complex_enzyme_hex_metabolite_atp_molecule_glucose_ATP_rheostatbiocrnpyler_34510_combined_model_of__biocrnpyler_585441_biocrnpyler_34510 => enzyme_hex_ATP_rheostatbiocrnpyler_34510_combined_model_of__biocrnpyler_585441_biocrnpyler_34510 + ATP_exsAbiocrnpyler_585441_1_combined_combined_model_of__biocrnpyler_585441_biocrnpyler_34510 + molecule_glucose_ATP_rheostatbiocrnpyler_34510_combined_model_of__biocrnpyler_585441_biocrnpyler_34510; r0_1_ATP_rheostatbiocrnpyler_34510_combined_model_of__biocrnpyler_585441_biocrnpyler_34510_k*complex_enzyme_hex_metabolite_atp_molecule_glucose_ATP_rheostatbiocrnpyler_34510_combined_model_of__biocrnpyler_585441_biocrnpyler_34510;
    r0_1_ATP_rheostatbiocrnpyler_34510_combined_model_of__biocrnpyler_585441_biocrnpyler_34510_k = 10;
  r2_ATP_rheostatbiocrnpyler_34510_combined_model_of__biocrnpyler_585441_biocrnpyler_34510: complex_enzyme_hex_metabolite_atp_molecule_glucose_ATP_rheostatbiocrnpyler_34510_combined_model_of__biocrnpyler_585441_biocrnpyler_34510 => complex_enzyme_hex_metabolite_adp_molecule_g6p_ATP_rheostatbiocrnpyler_34510_combined_model_of__biocrnpyler_585441_biocrnpyler_34510; r2_ATP_rheostatbiocrnpyler_34510_combined_model_of__biocrnpyler_585441_biocrnpyler_34510_k*complex_enzyme_hex_metabolite_atp_molecule_glucose_ATP_rheostatbiocrnpyler_34510_combined_model_of__biocrnpyler_585441_biocrnpyler_34510;
    r2_ATP_rheostatbiocrnpyler_34510_combined_model_of__biocrnpyler_585441_biocrnpyler_34510_k = 36000;
  r3_ATP_rheostatbiocrnpyler_34510_combined_model_of__biocrnpyler_585441_biocrnpyler_34510: complex_enzyme_hex_metabolite_adp_molecule_g6p_ATP_rheostatbiocrnpyler_34510_combined_model_of__biocrnpyler_585441_biocrnpyler_34510 => enzyme_hex_ATP_rheostatbiocrnpyler_34510_combined_model_of__biocrnpyler_585441_biocrnpyler_34510 + molecule_g6p_ATP_rheostatbiocrnpyler_34510_combined_model_of__biocrnpyler_585441_biocrnpyler_34510 + ADP_exsAbiocrnpyler_585441_1_combined_combined_model_of__biocrnpyler_585441_biocrnpyler_34510; r3_ATP_rheostatbiocrnpyler_34510_combined_model_of__biocrnpyler_585441_biocrnpyler_34510_k*complex_enzyme_hex_metabolite_adp_molecule_g6p_ATP_rheostatbiocrnpyler_34510_combined_model_of__biocrnpyler_585441_biocrnpyler_34510;
    r3_ATP_rheostatbiocrnpyler_34510_combined_model_of__biocrnpyler_585441_biocrnpyler_34510_k = 100;
  r3_1_ATP_rheostatbiocrnpyler_34510_combined_model_of__biocrnpyler_585441_biocrnpyler_34510: enzyme_hex_ATP_rheostatbiocrnpyler_34510_combined_model_of__biocrnpyler_585441_biocrnpyler_34510 + molecule_g6p_ATP_rheostatbiocrnpyler_34510_combined_model_of__biocrnpyler_585441_biocrnpyler_34510 + ADP_exsAbiocrnpyler_585441_1_combined_combined_model_of__biocrnpyler_585441_biocrnpyler_34510 => complex_enzyme_hex_metabolite_adp_molecule_g6p_ATP_rheostatbiocrnpyler_34510_combined_model_of__biocrnpyler_585441_biocrnpyler_34510; r3_1_ATP_rheostatbiocrnpyler_34510_combined_model_of__biocrnpyler_585441_biocrnpyler_34510_k*enzyme_hex_ATP_rheostatbiocrnpyler_34510_combined_model_of__biocrnpyler_585441_biocrnpyler_34510*molecule_g6p_ATP_rheostatbiocrnpyler_34510_combined_model_of__biocrnpyler_585441_biocrnpyler_34510*ADP_exsAbiocrnpyler_585441_1_combined_combined_model_of__biocrnpyler_585441_biocrnpyler_34510;
    r3_1_ATP_rheostatbiocrnpyler_34510_combined_model_of__biocrnpyler_585441_biocrnpyler_34510_k = 10;
  r5_ATP_rheostatbiocrnpyler_34510_combined_model_of__biocrnpyler_585441_biocrnpyler_34510: enzyme_pgi_ATP_rheostatbiocrnpyler_34510_combined_model_of__biocrnpyler_585441_biocrnpyler_34510 + molecule_g6p_ATP_rheostatbiocrnpyler_34510_combined_model_of__biocrnpyler_585441_biocrnpyler_34510 => complex_enzyme_pgi_molecule_g6p_ATP_rheostatbiocrnpyler_34510_combined_model_of__biocrnpyler_585441_biocrnpyler_34510; r5_ATP_rheostatbiocrnpyler_34510_combined_model_of__biocrnpyler_585441_biocrnpyler_34510_k*enzyme_pgi_ATP_rheostatbiocrnpyler_34510_combined_model_of__biocrnpyler_585441_biocrnpyler_34510*molecule_g6p_ATP_rheostatbiocrnpyler_34510_combined_model_of__biocrnpyler_585441_biocrnpyler_34510;
    r5_ATP_rheostatbiocrnpyler_34510_combined_model_of__biocrnpyler_585441_biocrnpyler_34510_k = 100;
  r5_1_ATP_rheostatbiocrnpyler_34510_combined_model_of__biocrnpyler_585441_biocrnpyler_34510: complex_enzyme_pgi_molecule_g6p_ATP_rheostatbiocrnpyler_34510_combined_model_of__biocrnpyler_585441_biocrnpyler_34510 => enzyme_pgi_ATP_rheostatbiocrnpyler_34510_combined_model_of__biocrnpyler_585441_biocrnpyler_34510 + molecule_g6p_ATP_rheostatbiocrnpyler_34510_combined_model_of__biocrnpyler_585441_biocrnpyler_34510; r5_1_ATP_rheostatbiocrnpyler_34510_combined_model_of__biocrnpyler_585441_biocrnpyler_34510_k*complex_enzyme_pgi_molecule_g6p_ATP_rheostatbiocrnpyler_34510_combined_model_of__biocrnpyler_585441_biocrnpyler_34510;
    r5_1_ATP_rheostatbiocrnpyler_34510_combined_model_of__biocrnpyler_585441_biocrnpyler_34510_k = 10;
  r7_ATP_rheostatbiocrnpyler_34510_combined_model_of__biocrnpyler_585441_biocrnpyler_34510: complex_enzyme_pgi_molecule_g6p_ATP_rheostatbiocrnpyler_34510_combined_model_of__biocrnpyler_585441_biocrnpyler_34510 => complex_enzyme_pgi_molecule_f6p_ATP_rheostatbiocrnpyler_34510_combined_model_of__biocrnpyler_585441_biocrnpyler_34510; r7_ATP_rheostatbiocrnpyler_34510_combined_model_of__biocrnpyler_585441_biocrnpyler_34510_k*complex_enzyme_pgi_molecule_g6p_ATP_rheostatbiocrnpyler_34510_combined_model_of__biocrnpyler_585441_biocrnpyler_34510;
    r7_ATP_rheostatbiocrnpyler_34510_combined_model_of__biocrnpyler_585441_biocrnpyler_34510_k = 36000;
  r8_ATP_rheostatbiocrnpyler_34510_combined_model_of__biocrnpyler_585441_biocrnpyler_34510: complex_enzyme_pgi_molecule_f6p_ATP_rheostatbiocrnpyler_34510_combined_model_of__biocrnpyler_585441_biocrnpyler_34510 => enzyme_pgi_ATP_rheostatbiocrnpyler_34510_combined_model_of__biocrnpyler_585441_biocrnpyler_34510 + molecule_f6p_ATP_rheostatbiocrnpyler_34510_combined_model_of__biocrnpyler_585441_biocrnpyler_34510; r8_ATP_rheostatbiocrnpyler_34510_combined_model_of__biocrnpyler_585441_biocrnpyler_34510_k*complex_enzyme_pgi_molecule_f6p_ATP_rheostatbiocrnpyler_34510_combined_model_of__biocrnpyler_585441_biocrnpyler_34510;
    r8_ATP_rheostatbiocrnpyler_34510_combined_model_of__biocrnpyler_585441_biocrnpyler_34510_k = 100;
  r8_1_ATP_rheostatbiocrnpyler_34510_combined_model_of__biocrnpyler_585441_biocrnpyler_34510: enzyme_pgi_ATP_rheostatbiocrnpyler_34510_combined_model_of__biocrnpyler_585441_biocrnpyler_34510 + molecule_f6p_ATP_rheostatbiocrnpyler_34510_combined_model_of__biocrnpyler_585441_biocrnpyler_34510 => complex_enzyme_pgi_molecule_f6p_ATP_rheostatbiocrnpyler_34510_combined_model_of__biocrnpyler_585441_biocrnpyler_34510; r8_1_ATP_rheostatbiocrnpyler_34510_combined_model_of__biocrnpyler_585441_biocrnpyler_34510_k*enzyme_pgi_ATP_rheostatbiocrnpyler_34510_combined_model_of__biocrnpyler_585441_biocrnpyler_34510*molecule_f6p_ATP_rheostatbiocrnpyler_34510_combined_model_of__biocrnpyler_585441_biocrnpyler_34510;
    r8_1_ATP_rheostatbiocrnpyler_34510_combined_model_of__biocrnpyler_585441_biocrnpyler_34510_k = 10;
  r10_ATP_rheostatbiocrnpyler_34510_combined_model_of__biocrnpyler_585441_biocrnpyler_34510: enzyme_pfk_ATP_rheostatbiocrnpyler_34510_combined_model_of__biocrnpyler_585441_biocrnpyler_34510 + ATP_exsAbiocrnpyler_585441_1_combined_combined_model_of__biocrnpyler_585441_biocrnpyler_34510 + molecule_f6p_ATP_rheostatbiocrnpyler_34510_combined_model_of__biocrnpyler_585441_biocrnpyler_34510 => complex_enzyme_pfk_metabolite_atp_molecule_f6p_ATP_rheostatbiocrnpyler_34510_combined_model_of__biocrnpyler_585441_biocrnpyler_34510; r10_ATP_rheostatbiocrnpyler_34510_combined_model_of__biocrnpyler_585441_biocrnpyler_34510_k*enzyme_pfk_ATP_rheostatbiocrnpyler_34510_combined_model_of__biocrnpyler_585441_biocrnpyler_34510*ATP_exsAbiocrnpyler_585441_1_combined_combined_model_of__biocrnpyler_585441_biocrnpyler_34510*molecule_f6p_ATP_rheostatbiocrnpyler_34510_combined_model_of__biocrnpyler_585441_biocrnpyler_34510;
    r10_ATP_rheostatbiocrnpyler_34510_combined_model_of__biocrnpyler_585441_biocrnpyler_34510_k = 100;
  r10_1_ATP_rheostatbiocrnpyler_34510_combined_model_of__biocrnpyler_585441_biocrnpyler_34510: complex_enzyme_pfk_metabolite_atp_molecule_f6p_ATP_rheostatbiocrnpyler_34510_combined_model_of__biocrnpyler_585441_biocrnpyler_34510 => enzyme_pfk_ATP_rheostatbiocrnpyler_34510_combined_model_of__biocrnpyler_585441_biocrnpyler_34510 + ATP_exsAbiocrnpyler_585441_1_combined_combined_model_of__biocrnpyler_585441_biocrnpyler_34510 + molecule_f6p_ATP_rheostatbiocrnpyler_34510_combined_model_of__biocrnpyler_585441_biocrnpyler_34510; r10_1_ATP_rheostatbiocrnpyler_34510_combined_model_of__biocrnpyler_585441_biocrnpyler_34510_k*complex_enzyme_pfk_metabolite_atp_molecule_f6p_ATP_rheostatbiocrnpyler_34510_combined_model_of__biocrnpyler_585441_biocrnpyler_34510;
    r10_1_ATP_rheostatbiocrnpyler_34510_combined_model_of__biocrnpyler_585441_biocrnpyler_34510_k = 10;
  r12_ATP_rheostatbiocrnpyler_34510_combined_model_of__biocrnpyler_585441_biocrnpyler_34510: complex_enzyme_pfk_metabolite_atp_molecule_f6p_ATP_rheostatbiocrnpyler_34510_combined_model_of__biocrnpyler_585441_biocrnpyler_34510 => complex_enzyme_pfk_metabolite_adp_molecule_f16p_ATP_rheostatbiocrnpyler_34510_combined_model_of__biocrnpyler_585441_biocrnpyler_34510; r12_ATP_rheostatbiocrnpyler_34510_combined_model_of__biocrnpyler_585441_biocrnpyler_34510_k*complex_enzyme_pfk_metabolite_atp_molecule_f6p_ATP_rheostatbiocrnpyler_34510_combined_model_of__biocrnpyler_585441_biocrnpyler_34510;
    r12_ATP_rheostatbiocrnpyler_34510_combined_model_of__biocrnpyler_585441_biocrnpyler_34510_k = 36000;
  r13_ATP_rheostatbiocrnpyler_34510_combined_model_of__biocrnpyler_585441_biocrnpyler_34510: complex_enzyme_pfk_metabolite_adp_molecule_f16p_ATP_rheostatbiocrnpyler_34510_combined_model_of__biocrnpyler_585441_biocrnpyler_34510 => enzyme_pfk_ATP_rheostatbiocrnpyler_34510_combined_model_of__biocrnpyler_585441_biocrnpyler_34510 + molecule_f16p_ATP_rheostatbiocrnpyler_34510_combined_model_of__biocrnpyler_585441_biocrnpyler_34510 + ADP_exsAbiocrnpyler_585441_1_combined_combined_model_of__biocrnpyler_585441_biocrnpyler_34510; r13_ATP_rheostatbiocrnpyler_34510_combined_model_of__biocrnpyler_585441_biocrnpyler_34510_k*complex_enzyme_pfk_metabolite_adp_molecule_f16p_ATP_rheostatbiocrnpyler_34510_combined_model_of__biocrnpyler_585441_biocrnpyler_34510;
    r13_ATP_rheostatbiocrnpyler_34510_combined_model_of__biocrnpyler_585441_biocrnpyler_34510_k = 100;
  r13_1_ATP_rheostatbiocrnpyler_34510_combined_model_of__biocrnpyler_585441_biocrnpyler_34510: enzyme_pfk_ATP_rheostatbiocrnpyler_34510_combined_model_of__biocrnpyler_585441_biocrnpyler_34510 + molecule_f16p_ATP_rheostatbiocrnpyler_34510_combined_model_of__biocrnpyler_585441_biocrnpyler_34510 + ADP_exsAbiocrnpyler_585441_1_combined_combined_model_of__biocrnpyler_585441_biocrnpyler_34510 => complex_enzyme_pfk_metabolite_adp_molecule_f16p_ATP_rheostatbiocrnpyler_34510_combined_model_of__biocrnpyler_585441_biocrnpyler_34510; r13_1_ATP_rheostatbiocrnpyler_34510_combined_model_of__biocrnpyler_585441_biocrnpyler_34510_k*enzyme_pfk_ATP_rheostatbiocrnpyler_34510_combined_model_of__biocrnpyler_585441_biocrnpyler_34510*molecule_f16p_ATP_rheostatbiocrnpyler_34510_combined_model_of__biocrnpyler_585441_biocrnpyler_34510*ADP_exsAbiocrnpyler_585441_1_combined_combined_model_of__biocrnpyler_585441_biocrnpyler_34510;
    r13_1_ATP_rheostatbiocrnpyler_34510_combined_model_of__biocrnpyler_585441_biocrnpyler_34510_k = 10;
  r15_ATP_rheostatbiocrnpyler_34510_combined_model_of__biocrnpyler_585441_biocrnpyler_34510: enzyme_ald_tpi_ATP_rheostatbiocrnpyler_34510_combined_model_of__biocrnpyler_585441_biocrnpyler_34510 + molecule_f16p_ATP_rheostatbiocrnpyler_34510_combined_model_of__biocrnpyler_585441_biocrnpyler_34510 => complex_enzyme_ald_tpi_molecule_f16p_ATP_rheostatbiocrnpyler_34510_combined_model_of__biocrnpyler_585441_biocrnpyler_34510; r15_ATP_rheostatbiocrnpyler_34510_combined_model_of__biocrnpyler_585441_biocrnpyler_34510_k*enzyme_ald_tpi_ATP_rheostatbiocrnpyler_34510_combined_model_of__biocrnpyler_585441_biocrnpyler_34510*molecule_f16p_ATP_rheostatbiocrnpyler_34510_combined_model_of__biocrnpyler_585441_biocrnpyler_34510;
    r15_ATP_rheostatbiocrnpyler_34510_combined_model_of__biocrnpyler_585441_biocrnpyler_34510_k = 100;
  r15_1_ATP_rheostatbiocrnpyler_34510_combined_model_of__biocrnpyler_585441_biocrnpyler_34510: complex_enzyme_ald_tpi_molecule_f16p_ATP_rheostatbiocrnpyler_34510_combined_model_of__biocrnpyler_585441_biocrnpyler_34510 => enzyme_ald_tpi_ATP_rheostatbiocrnpyler_34510_combined_model_of__biocrnpyler_585441_biocrnpyler_34510 + molecule_f16p_ATP_rheostatbiocrnpyler_34510_combined_model_of__biocrnpyler_585441_biocrnpyler_34510; r15_1_ATP_rheostatbiocrnpyler_34510_combined_model_of__biocrnpyler_585441_biocrnpyler_34510_k*complex_enzyme_ald_tpi_molecule_f16p_ATP_rheostatbiocrnpyler_34510_combined_model_of__biocrnpyler_585441_biocrnpyler_34510;
    r15_1_ATP_rheostatbiocrnpyler_34510_combined_model_of__biocrnpyler_585441_biocrnpyler_34510_k = 10;
  r17_ATP_rheostatbiocrnpyler_34510_combined_model_of__biocrnpyler_585441_biocrnpyler_34510: complex_enzyme_ald_tpi_molecule_f16p_ATP_rheostatbiocrnpyler_34510_combined_model_of__biocrnpyler_585441_biocrnpyler_34510 => complex_enzyme_ald_tpi_2x_molecule_g3p_ATP_rheostatbiocrnpyler_34510_combined_model_of__biocrnpyler_585441_biocrnpyler_34510; r17_ATP_rheostatbiocrnpyler_34510_combined_model_of__biocrnpyler_585441_biocrnpyler_34510_k*complex_enzyme_ald_tpi_molecule_f16p_ATP_rheostatbiocrnpyler_34510_combined_model_of__biocrnpyler_585441_biocrnpyler_34510;
    r17_ATP_rheostatbiocrnpyler_34510_combined_model_of__biocrnpyler_585441_biocrnpyler_34510_k = 36000;
  r18_ATP_rheostatbiocrnpyler_34510_combined_model_of__biocrnpyler_585441_biocrnpyler_34510: complex_enzyme_ald_tpi_2x_molecule_g3p_ATP_rheostatbiocrnpyler_34510_combined_model_of__biocrnpyler_585441_biocrnpyler_34510 => enzyme_ald_tpi_ATP_rheostatbiocrnpyler_34510_combined_model_of__biocrnpyler_585441_biocrnpyler_34510 + 2 molecule_g3p_ATP_rheostatbiocrnpyler_34510_combined_model_of__biocrnpyler_585441_biocrnpyler_34510; r18_ATP_rheostatbiocrnpyler_34510_combined_model_of__biocrnpyler_585441_biocrnpyler_34510_k*complex_enzyme_ald_tpi_2x_molecule_g3p_ATP_rheostatbiocrnpyler_34510_combined_model_of__biocrnpyler_585441_biocrnpyler_34510;
    r18_ATP_rheostatbiocrnpyler_34510_combined_model_of__biocrnpyler_585441_biocrnpyler_34510_k = 100;
  r18_1_ATP_rheostatbiocrnpyler_34510_combined_model_of__biocrnpyler_585441_biocrnpyler_34510: enzyme_ald_tpi_ATP_rheostatbiocrnpyler_34510_combined_model_of__biocrnpyler_585441_biocrnpyler_34510 + 2 molecule_g3p_ATP_rheostatbiocrnpyler_34510_combined_model_of__biocrnpyler_585441_biocrnpyler_34510 => complex_enzyme_ald_tpi_2x_molecule_g3p_ATP_rheostatbiocrnpyler_34510_combined_model_of__biocrnpyler_585441_biocrnpyler_34510; r18_1_ATP_rheostatbiocrnpyler_34510_combined_model_of__biocrnpyler_585441_biocrnpyler_34510_k*enzyme_ald_tpi_ATP_rheostatbiocrnpyler_34510_combined_model_of__biocrnpyler_585441_biocrnpyler_34510*molecule_g3p_ATP_rheostatbiocrnpyler_34510_combined_model_of__biocrnpyler_585441_biocrnpyler_34510^2;
    r18_1_ATP_rheostatbiocrnpyler_34510_combined_model_of__biocrnpyler_585441_biocrnpyler_34510_k = 10;
  r20_ATP_rheostatbiocrnpyler_34510_combined_model_of__biocrnpyler_585441_biocrnpyler_34510: enzyme_gapN_ATP_rheostatbiocrnpyler_34510_combined_model_of__biocrnpyler_585441_biocrnpyler_34510 + 2 metabolite_nadp_ATP_rheostatbiocrnpyler_34510_combined_model_of__biocrnpyler_585441_biocrnpyler_34510 + 2 molecule_g3p_ATP_rheostatbiocrnpyler_34510_combined_model_of__biocrnpyler_585441_biocrnpyler_34510 => complex_enzyme_gapN_2x_metabolite_nadp_2x_molecule_g3p_ATP_rheostatbiocrnpyler_34510_combined_model_of__biocrnpyler_585441_biocrnpyler_34510; r20_ATP_rheostatbiocrnpyler_34510_combined_model_of__biocrnpyler_585441_biocrnpyler_34510_k*enzyme_gapN_ATP_rheostatbiocrnpyler_34510_combined_model_of__biocrnpyler_585441_biocrnpyler_34510*metabolite_nadp_ATP_rheostatbiocrnpyler_34510_combined_model_of__biocrnpyler_585441_biocrnpyler_34510^2*molecule_g3p_ATP_rheostatbiocrnpyler_34510_combined_model_of__biocrnpyler_585441_biocrnpyler_34510^2;
    r20_ATP_rheostatbiocrnpyler_34510_combined_model_of__biocrnpyler_585441_biocrnpyler_34510_k = 100;
  r20_1_ATP_rheostatbiocrnpyler_34510_combined_model_of__biocrnpyler_585441_biocrnpyler_34510: complex_enzyme_gapN_2x_metabolite_nadp_2x_molecule_g3p_ATP_rheostatbiocrnpyler_34510_combined_model_of__biocrnpyler_585441_biocrnpyler_34510 => enzyme_gapN_ATP_rheostatbiocrnpyler_34510_combined_model_of__biocrnpyler_585441_biocrnpyler_34510 + 2 metabolite_nadp_ATP_rheostatbiocrnpyler_34510_combined_model_of__biocrnpyler_585441_biocrnpyler_34510 + 2 molecule_g3p_ATP_rheostatbiocrnpyler_34510_combined_model_of__biocrnpyler_585441_biocrnpyler_34510; r20_1_ATP_rheostatbiocrnpyler_34510_combined_model_of__biocrnpyler_585441_biocrnpyler_34510_k*complex_enzyme_gapN_2x_metabolite_nadp_2x_molecule_g3p_ATP_rheostatbiocrnpyler_34510_combined_model_of__biocrnpyler_585441_biocrnpyler_34510;
    r20_1_ATP_rheostatbiocrnpyler_34510_combined_model_of__biocrnpyler_585441_biocrnpyler_34510_k = 10;
  r22_ATP_rheostatbiocrnpyler_34510_combined_model_of__biocrnpyler_585441_biocrnpyler_34510: complex_enzyme_gapN_2x_metabolite_nadp_2x_molecule_g3p_ATP_rheostatbiocrnpyler_34510_combined_model_of__biocrnpyler_585441_biocrnpyler_34510 => complex_enzyme_gapN_2x_metabolite_nadph_2x_molecule_3pg_ATP_rheostatbiocrnpyler_34510_combined_model_of__biocrnpyler_585441_biocrnpyler_34510; r22_ATP_rheostatbiocrnpyler_34510_combined_model_of__biocrnpyler_585441_biocrnpyler_34510_k*complex_enzyme_gapN_2x_metabolite_nadp_2x_molecule_g3p_ATP_rheostatbiocrnpyler_34510_combined_model_of__biocrnpyler_585441_biocrnpyler_34510;
    r22_ATP_rheostatbiocrnpyler_34510_combined_model_of__biocrnpyler_585441_biocrnpyler_34510_k = 36000;
  r23_ATP_rheostatbiocrnpyler_34510_combined_model_of__biocrnpyler_585441_biocrnpyler_34510: complex_enzyme_gapN_2x_metabolite_nadph_2x_molecule_3pg_ATP_rheostatbiocrnpyler_34510_combined_model_of__biocrnpyler_585441_biocrnpyler_34510 => enzyme_gapN_ATP_rheostatbiocrnpyler_34510_combined_model_of__biocrnpyler_585441_biocrnpyler_34510 + 2 molecule_3pg_ATP_rheostatbiocrnpyler_34510_combined_model_of__biocrnpyler_585441_biocrnpyler_34510 + 2 metabolite_nadph_ATP_rheostatbiocrnpyler_34510_combined_model_of__biocrnpyler_585441_biocrnpyler_34510; r23_ATP_rheostatbiocrnpyler_34510_combined_model_of__biocrnpyler_585441_biocrnpyler_34510_k*complex_enzyme_gapN_2x_metabolite_nadph_2x_molecule_3pg_ATP_rheostatbiocrnpyler_34510_combined_model_of__biocrnpyler_585441_biocrnpyler_34510;
    r23_ATP_rheostatbiocrnpyler_34510_combined_model_of__biocrnpyler_585441_biocrnpyler_34510_k = 100;
  r23_1_ATP_rheostatbiocrnpyler_34510_combined_model_of__biocrnpyler_585441_biocrnpyler_34510: enzyme_gapN_ATP_rheostatbiocrnpyler_34510_combined_model_of__biocrnpyler_585441_biocrnpyler_34510 + 2 molecule_3pg_ATP_rheostatbiocrnpyler_34510_combined_model_of__biocrnpyler_585441_biocrnpyler_34510 + 2 metabolite_nadph_ATP_rheostatbiocrnpyler_34510_combined_model_of__biocrnpyler_585441_biocrnpyler_34510 => complex_enzyme_gapN_2x_metabolite_nadph_2x_molecule_3pg_ATP_rheostatbiocrnpyler_34510_combined_model_of__biocrnpyler_585441_biocrnpyler_34510; r23_1_ATP_rheostatbiocrnpyler_34510_combined_model_of__biocrnpyler_585441_biocrnpyler_34510_k*enzyme_gapN_ATP_rheostatbiocrnpyler_34510_combined_model_of__biocrnpyler_585441_biocrnpyler_34510*molecule_3pg_ATP_rheostatbiocrnpyler_34510_combined_model_of__biocrnpyler_585441_biocrnpyler_34510^2*metabolite_nadph_ATP_rheostatbiocrnpyler_34510_combined_model_of__biocrnpyler_585441_biocrnpyler_34510^2;
    r23_1_ATP_rheostatbiocrnpyler_34510_combined_model_of__biocrnpyler_585441_biocrnpyler_34510_k = 10;
  r25_ATP_rheostatbiocrnpyler_34510_combined_model_of__biocrnpyler_585441_biocrnpyler_34510: enzyme_mGapDH_ATP_rheostatbiocrnpyler_34510_combined_model_of__biocrnpyler_585441_biocrnpyler_34510 + P_exsAbiocrnpyler_585441_1_combined_combined_model_of__biocrnpyler_585441_biocrnpyler_34510 + 2 metabolite_nadp_ATP_rheostatbiocrnpyler_34510_combined_model_of__biocrnpyler_585441_biocrnpyler_34510 + 2 molecule_g3p_ATP_rheostatbiocrnpyler_34510_combined_model_of__biocrnpyler_585441_biocrnpyler_34510 => complex_enzyme_mGapDH_2x_metabolite_nadp_metabolite_pi_2x_molecule_g3p_ATP_rheostatbiocrnpyler_34510_combined_model_of__biocrnpyler_585441_biocrnpyler_34510; r25_ATP_rheostatbiocrnpyler_34510_combined_model_of__biocrnpyler_585441_biocrnpyler_34510_k*enzyme_mGapDH_ATP_rheostatbiocrnpyler_34510_combined_model_of__biocrnpyler_585441_biocrnpyler_34510*P_exsAbiocrnpyler_585441_1_combined_combined_model_of__biocrnpyler_585441_biocrnpyler_34510*metabolite_nadp_ATP_rheostatbiocrnpyler_34510_combined_model_of__biocrnpyler_585441_biocrnpyler_34510^2*molecule_g3p_ATP_rheostatbiocrnpyler_34510_combined_model_of__biocrnpyler_585441_biocrnpyler_34510^2;
    r25_ATP_rheostatbiocrnpyler_34510_combined_model_of__biocrnpyler_585441_biocrnpyler_34510_k = 100;
  r25_1_ATP_rheostatbiocrnpyler_34510_combined_model_of__biocrnpyler_585441_biocrnpyler_34510: complex_enzyme_mGapDH_2x_metabolite_nadp_metabolite_pi_2x_molecule_g3p_ATP_rheostatbiocrnpyler_34510_combined_model_of__biocrnpyler_585441_biocrnpyler_34510 => enzyme_mGapDH_ATP_rheostatbiocrnpyler_34510_combined_model_of__biocrnpyler_585441_biocrnpyler_34510 + P_exsAbiocrnpyler_585441_1_combined_combined_model_of__biocrnpyler_585441_biocrnpyler_34510 + 2 metabolite_nadp_ATP_rheostatbiocrnpyler_34510_combined_model_of__biocrnpyler_585441_biocrnpyler_34510 + 2 molecule_g3p_ATP_rheostatbiocrnpyler_34510_combined_model_of__biocrnpyler_585441_biocrnpyler_34510; r25_1_ATP_rheostatbiocrnpyler_34510_combined_model_of__biocrnpyler_585441_biocrnpyler_34510_k*complex_enzyme_mGapDH_2x_metabolite_nadp_metabolite_pi_2x_molecule_g3p_ATP_rheostatbiocrnpyler_34510_combined_model_of__biocrnpyler_585441_biocrnpyler_34510;
    r25_1_ATP_rheostatbiocrnpyler_34510_combined_model_of__biocrnpyler_585441_biocrnpyler_34510_k = 10;
  r27_ATP_rheostatbiocrnpyler_34510_combined_model_of__biocrnpyler_585441_biocrnpyler_34510: complex_enzyme_mGapDH_2x_metabolite_nadp_metabolite_pi_2x_molecule_g3p_ATP_rheostatbiocrnpyler_34510_combined_model_of__biocrnpyler_585441_biocrnpyler_34510 => complex_enzyme_mGapDH_2x_metabolite_nadph_molecule_13bpg_ATP_rheostatbiocrnpyler_34510_combined_model_of__biocrnpyler_585441_biocrnpyler_34510; r27_ATP_rheostatbiocrnpyler_34510_combined_model_of__biocrnpyler_585441_biocrnpyler_34510_k*complex_enzyme_mGapDH_2x_metabolite_nadp_metabolite_pi_2x_molecule_g3p_ATP_rheostatbiocrnpyler_34510_combined_model_of__biocrnpyler_585441_biocrnpyler_34510;
    r27_ATP_rheostatbiocrnpyler_34510_combined_model_of__biocrnpyler_585441_biocrnpyler_34510_k = 36000;
  r28_ATP_rheostatbiocrnpyler_34510_combined_model_of__biocrnpyler_585441_biocrnpyler_34510: complex_enzyme_mGapDH_2x_metabolite_nadph_molecule_13bpg_ATP_rheostatbiocrnpyler_34510_combined_model_of__biocrnpyler_585441_biocrnpyler_34510 => enzyme_mGapDH_ATP_rheostatbiocrnpyler_34510_combined_model_of__biocrnpyler_585441_biocrnpyler_34510 + molecule_13bpg_ATP_rheostatbiocrnpyler_34510_combined_model_of__biocrnpyler_585441_biocrnpyler_34510 + 2 metabolite_nadph_ATP_rheostatbiocrnpyler_34510_combined_model_of__biocrnpyler_585441_biocrnpyler_34510; r28_ATP_rheostatbiocrnpyler_34510_combined_model_of__biocrnpyler_585441_biocrnpyler_34510_k*complex_enzyme_mGapDH_2x_metabolite_nadph_molecule_13bpg_ATP_rheostatbiocrnpyler_34510_combined_model_of__biocrnpyler_585441_biocrnpyler_34510;
    r28_ATP_rheostatbiocrnpyler_34510_combined_model_of__biocrnpyler_585441_biocrnpyler_34510_k = 100;
  r28_1_ATP_rheostatbiocrnpyler_34510_combined_model_of__biocrnpyler_585441_biocrnpyler_34510: enzyme_mGapDH_ATP_rheostatbiocrnpyler_34510_combined_model_of__biocrnpyler_585441_biocrnpyler_34510 + molecule_13bpg_ATP_rheostatbiocrnpyler_34510_combined_model_of__biocrnpyler_585441_biocrnpyler_34510 + 2 metabolite_nadph_ATP_rheostatbiocrnpyler_34510_combined_model_of__biocrnpyler_585441_biocrnpyler_34510 => complex_enzyme_mGapDH_2x_metabolite_nadph_molecule_13bpg_ATP_rheostatbiocrnpyler_34510_combined_model_of__biocrnpyler_585441_biocrnpyler_34510; r28_1_ATP_rheostatbiocrnpyler_34510_combined_model_of__biocrnpyler_585441_biocrnpyler_34510_k*enzyme_mGapDH_ATP_rheostatbiocrnpyler_34510_combined_model_of__biocrnpyler_585441_biocrnpyler_34510*molecule_13bpg_ATP_rheostatbiocrnpyler_34510_combined_model_of__biocrnpyler_585441_biocrnpyler_34510*metabolite_nadph_ATP_rheostatbiocrnpyler_34510_combined_model_of__biocrnpyler_585441_biocrnpyler_34510^2;
    r28_1_ATP_rheostatbiocrnpyler_34510_combined_model_of__biocrnpyler_585441_biocrnpyler_34510_k = 10;
  r30_ATP_rheostatbiocrnpyler_34510_combined_model_of__biocrnpyler_585441_biocrnpyler_34510: enzyme_pgk_ATP_rheostatbiocrnpyler_34510_combined_model_of__biocrnpyler_585441_biocrnpyler_34510 + ADP_exsAbiocrnpyler_585441_1_combined_combined_model_of__biocrnpyler_585441_biocrnpyler_34510 + molecule_13bpg_ATP_rheostatbiocrnpyler_34510_combined_model_of__biocrnpyler_585441_biocrnpyler_34510 => complex_enzyme_pgk_metabolite_adp_molecule_13bpg_ATP_rheostatbiocrnpyler_34510_combined_model_of__biocrnpyler_585441_biocrnpyler_34510; r30_ATP_rheostatbiocrnpyler_34510_combined_model_of__biocrnpyler_585441_biocrnpyler_34510_k*enzyme_pgk_ATP_rheostatbiocrnpyler_34510_combined_model_of__biocrnpyler_585441_biocrnpyler_34510*ADP_exsAbiocrnpyler_585441_1_combined_combined_model_of__biocrnpyler_585441_biocrnpyler_34510*molecule_13bpg_ATP_rheostatbiocrnpyler_34510_combined_model_of__biocrnpyler_585441_biocrnpyler_34510;
    r30_ATP_rheostatbiocrnpyler_34510_combined_model_of__biocrnpyler_585441_biocrnpyler_34510_k = 100;
  r30_1_ATP_rheostatbiocrnpyler_34510_combined_model_of__biocrnpyler_585441_biocrnpyler_34510: complex_enzyme_pgk_metabolite_adp_molecule_13bpg_ATP_rheostatbiocrnpyler_34510_combined_model_of__biocrnpyler_585441_biocrnpyler_34510 => enzyme_pgk_ATP_rheostatbiocrnpyler_34510_combined_model_of__biocrnpyler_585441_biocrnpyler_34510 + ADP_exsAbiocrnpyler_585441_1_combined_combined_model_of__biocrnpyler_585441_biocrnpyler_34510 + molecule_13bpg_ATP_rheostatbiocrnpyler_34510_combined_model_of__biocrnpyler_585441_biocrnpyler_34510; r30_1_ATP_rheostatbiocrnpyler_34510_combined_model_of__biocrnpyler_585441_biocrnpyler_34510_k*complex_enzyme_pgk_metabolite_adp_molecule_13bpg_ATP_rheostatbiocrnpyler_34510_combined_model_of__biocrnpyler_585441_biocrnpyler_34510;
    r30_1_ATP_rheostatbiocrnpyler_34510_combined_model_of__biocrnpyler_585441_biocrnpyler_34510_k = 10;
  r32_ATP_rheostatbiocrnpyler_34510_combined_model_of__biocrnpyler_585441_biocrnpyler_34510: complex_enzyme_pgk_metabolite_adp_molecule_13bpg_ATP_rheostatbiocrnpyler_34510_combined_model_of__biocrnpyler_585441_biocrnpyler_34510 => complex_enzyme_pgk_metabolite_atp_2x_molecule_3pg_ATP_rheostatbiocrnpyler_34510_combined_model_of__biocrnpyler_585441_biocrnpyler_34510; r32_ATP_rheostatbiocrnpyler_34510_combined_model_of__biocrnpyler_585441_biocrnpyler_34510_k*complex_enzyme_pgk_metabolite_adp_molecule_13bpg_ATP_rheostatbiocrnpyler_34510_combined_model_of__biocrnpyler_585441_biocrnpyler_34510;
    r32_ATP_rheostatbiocrnpyler_34510_combined_model_of__biocrnpyler_585441_biocrnpyler_34510_k = 36000;
  r33_ATP_rheostatbiocrnpyler_34510_combined_model_of__biocrnpyler_585441_biocrnpyler_34510: complex_enzyme_pgk_metabolite_atp_2x_molecule_3pg_ATP_rheostatbiocrnpyler_34510_combined_model_of__biocrnpyler_585441_biocrnpyler_34510 => enzyme_pgk_ATP_rheostatbiocrnpyler_34510_combined_model_of__biocrnpyler_585441_biocrnpyler_34510 + 2 molecule_3pg_ATP_rheostatbiocrnpyler_34510_combined_model_of__biocrnpyler_585441_biocrnpyler_34510 + ATP_exsAbiocrnpyler_585441_1_combined_combined_model_of__biocrnpyler_585441_biocrnpyler_34510; r33_ATP_rheostatbiocrnpyler_34510_combined_model_of__biocrnpyler_585441_biocrnpyler_34510_k*complex_enzyme_pgk_metabolite_atp_2x_molecule_3pg_ATP_rheostatbiocrnpyler_34510_combined_model_of__biocrnpyler_585441_biocrnpyler_34510;
    r33_ATP_rheostatbiocrnpyler_34510_combined_model_of__biocrnpyler_585441_biocrnpyler_34510_k = 100;
  r33_1_ATP_rheostatbiocrnpyler_34510_combined_model_of__biocrnpyler_585441_biocrnpyler_34510: enzyme_pgk_ATP_rheostatbiocrnpyler_34510_combined_model_of__biocrnpyler_585441_biocrnpyler_34510 + 2 molecule_3pg_ATP_rheostatbiocrnpyler_34510_combined_model_of__biocrnpyler_585441_biocrnpyler_34510 + ATP_exsAbiocrnpyler_585441_1_combined_combined_model_of__biocrnpyler_585441_biocrnpyler_34510 => complex_enzyme_pgk_metabolite_atp_2x_molecule_3pg_ATP_rheostatbiocrnpyler_34510_combined_model_of__biocrnpyler_585441_biocrnpyler_34510; r33_1_ATP_rheostatbiocrnpyler_34510_combined_model_of__biocrnpyler_585441_biocrnpyler_34510_k*enzyme_pgk_ATP_rheostatbiocrnpyler_34510_combined_model_of__biocrnpyler_585441_biocrnpyler_34510*molecule_3pg_ATP_rheostatbiocrnpyler_34510_combined_model_of__biocrnpyler_585441_biocrnpyler_34510^2*ATP_exsAbiocrnpyler_585441_1_combined_combined_model_of__biocrnpyler_585441_biocrnpyler_34510;
    r33_1_ATP_rheostatbiocrnpyler_34510_combined_model_of__biocrnpyler_585441_biocrnpyler_34510_k = 10;
  r35_ATP_rheostatbiocrnpyler_34510_combined_model_of__biocrnpyler_585441_biocrnpyler_34510: enzyme_pgm_ATP_rheostatbiocrnpyler_34510_combined_model_of__biocrnpyler_585441_biocrnpyler_34510 + 2 molecule_3pg_ATP_rheostatbiocrnpyler_34510_combined_model_of__biocrnpyler_585441_biocrnpyler_34510 => complex_enzyme_pgm_2x_molecule_3pg_ATP_rheostatbiocrnpyler_34510_combined_model_of__biocrnpyler_585441_biocrnpyler_34510; r35_ATP_rheostatbiocrnpyler_34510_combined_model_of__biocrnpyler_585441_biocrnpyler_34510_k*enzyme_pgm_ATP_rheostatbiocrnpyler_34510_combined_model_of__biocrnpyler_585441_biocrnpyler_34510*molecule_3pg_ATP_rheostatbiocrnpyler_34510_combined_model_of__biocrnpyler_585441_biocrnpyler_34510^2;
    r35_ATP_rheostatbiocrnpyler_34510_combined_model_of__biocrnpyler_585441_biocrnpyler_34510_k = 100;
  r35_1_ATP_rheostatbiocrnpyler_34510_combined_model_of__biocrnpyler_585441_biocrnpyler_34510: complex_enzyme_pgm_2x_molecule_3pg_ATP_rheostatbiocrnpyler_34510_combined_model_of__biocrnpyler_585441_biocrnpyler_34510 => enzyme_pgm_ATP_rheostatbiocrnpyler_34510_combined_model_of__biocrnpyler_585441_biocrnpyler_34510 + 2 molecule_3pg_ATP_rheostatbiocrnpyler_34510_combined_model_of__biocrnpyler_585441_biocrnpyler_34510; r35_1_ATP_rheostatbiocrnpyler_34510_combined_model_of__biocrnpyler_585441_biocrnpyler_34510_k*complex_enzyme_pgm_2x_molecule_3pg_ATP_rheostatbiocrnpyler_34510_combined_model_of__biocrnpyler_585441_biocrnpyler_34510;
    r35_1_ATP_rheostatbiocrnpyler_34510_combined_model_of__biocrnpyler_585441_biocrnpyler_34510_k = 10;
  r37_ATP_rheostatbiocrnpyler_34510_combined_model_of__biocrnpyler_585441_biocrnpyler_34510: complex_enzyme_pgm_2x_molecule_3pg_ATP_rheostatbiocrnpyler_34510_combined_model_of__biocrnpyler_585441_biocrnpyler_34510 => complex_enzyme_pgm_2x_molecule_2pg_ATP_rheostatbiocrnpyler_34510_combined_model_of__biocrnpyler_585441_biocrnpyler_34510; r37_ATP_rheostatbiocrnpyler_34510_combined_model_of__biocrnpyler_585441_biocrnpyler_34510_k*complex_enzyme_pgm_2x_molecule_3pg_ATP_rheostatbiocrnpyler_34510_combined_model_of__biocrnpyler_585441_biocrnpyler_34510;
    r37_ATP_rheostatbiocrnpyler_34510_combined_model_of__biocrnpyler_585441_biocrnpyler_34510_k = 36000;
  r38_ATP_rheostatbiocrnpyler_34510_combined_model_of__biocrnpyler_585441_biocrnpyler_34510: complex_enzyme_pgm_2x_molecule_2pg_ATP_rheostatbiocrnpyler_34510_combined_model_of__biocrnpyler_585441_biocrnpyler_34510 => enzyme_pgm_ATP_rheostatbiocrnpyler_34510_combined_model_of__biocrnpyler_585441_biocrnpyler_34510 + 2 molecule_2pg_ATP_rheostatbiocrnpyler_34510_combined_model_of__biocrnpyler_585441_biocrnpyler_34510; r38_ATP_rheostatbiocrnpyler_34510_combined_model_of__biocrnpyler_585441_biocrnpyler_34510_k*complex_enzyme_pgm_2x_molecule_2pg_ATP_rheostatbiocrnpyler_34510_combined_model_of__biocrnpyler_585441_biocrnpyler_34510;
    r38_ATP_rheostatbiocrnpyler_34510_combined_model_of__biocrnpyler_585441_biocrnpyler_34510_k = 100;
  r38_1_ATP_rheostatbiocrnpyler_34510_combined_model_of__biocrnpyler_585441_biocrnpyler_34510: enzyme_pgm_ATP_rheostatbiocrnpyler_34510_combined_model_of__biocrnpyler_585441_biocrnpyler_34510 + 2 molecule_2pg_ATP_rheostatbiocrnpyler_34510_combined_model_of__biocrnpyler_585441_biocrnpyler_34510 => complex_enzyme_pgm_2x_molecule_2pg_ATP_rheostatbiocrnpyler_34510_combined_model_of__biocrnpyler_585441_biocrnpyler_34510; r38_1_ATP_rheostatbiocrnpyler_34510_combined_model_of__biocrnpyler_585441_biocrnpyler_34510_k*enzyme_pgm_ATP_rheostatbiocrnpyler_34510_combined_model_of__biocrnpyler_585441_biocrnpyler_34510*molecule_2pg_ATP_rheostatbiocrnpyler_34510_combined_model_of__biocrnpyler_585441_biocrnpyler_34510^2;
    r38_1_ATP_rheostatbiocrnpyler_34510_combined_model_of__biocrnpyler_585441_biocrnpyler_34510_k = 10;
  r40_ATP_rheostatbiocrnpyler_34510_combined_model_of__biocrnpyler_585441_biocrnpyler_34510: enzyme_eno_ATP_rheostatbiocrnpyler_34510_combined_model_of__biocrnpyler_585441_biocrnpyler_34510 + 2 molecule_2pg_ATP_rheostatbiocrnpyler_34510_combined_model_of__biocrnpyler_585441_biocrnpyler_34510 => complex_enzyme_eno_2x_molecule_2pg_ATP_rheostatbiocrnpyler_34510_combined_model_of__biocrnpyler_585441_biocrnpyler_34510; r40_ATP_rheostatbiocrnpyler_34510_combined_model_of__biocrnpyler_585441_biocrnpyler_34510_k*enzyme_eno_ATP_rheostatbiocrnpyler_34510_combined_model_of__biocrnpyler_585441_biocrnpyler_34510*molecule_2pg_ATP_rheostatbiocrnpyler_34510_combined_model_of__biocrnpyler_585441_biocrnpyler_34510^2;
    r40_ATP_rheostatbiocrnpyler_34510_combined_model_of__biocrnpyler_585441_biocrnpyler_34510_k = 100;
  r40_1_ATP_rheostatbiocrnpyler_34510_combined_model_of__biocrnpyler_585441_biocrnpyler_34510: complex_enzyme_eno_2x_molecule_2pg_ATP_rheostatbiocrnpyler_34510_combined_model_of__biocrnpyler_585441_biocrnpyler_34510 => enzyme_eno_ATP_rheostatbiocrnpyler_34510_combined_model_of__biocrnpyler_585441_biocrnpyler_34510 + 2 molecule_2pg_ATP_rheostatbiocrnpyler_34510_combined_model_of__biocrnpyler_585441_biocrnpyler_34510; r40_1_ATP_rheostatbiocrnpyler_34510_combined_model_of__biocrnpyler_585441_biocrnpyler_34510_k*complex_enzyme_eno_2x_molecule_2pg_ATP_rheostatbiocrnpyler_34510_combined_model_of__biocrnpyler_585441_biocrnpyler_34510;
    r40_1_ATP_rheostatbiocrnpyler_34510_combined_model_of__biocrnpyler_585441_biocrnpyler_34510_k = 10;
  r42_ATP_rheostatbiocrnpyler_34510_combined_model_of__biocrnpyler_585441_biocrnpyler_34510: complex_enzyme_eno_2x_molecule_2pg_ATP_rheostatbiocrnpyler_34510_combined_model_of__biocrnpyler_585441_biocrnpyler_34510 => complex_enzyme_eno_2x_molecule_pep_ATP_rheostatbiocrnpyler_34510_combined_model_of__biocrnpyler_585441_biocrnpyler_34510; r42_ATP_rheostatbiocrnpyler_34510_combined_model_of__biocrnpyler_585441_biocrnpyler_34510_k*complex_enzyme_eno_2x_molecule_2pg_ATP_rheostatbiocrnpyler_34510_combined_model_of__biocrnpyler_585441_biocrnpyler_34510;
    r42_ATP_rheostatbiocrnpyler_34510_combined_model_of__biocrnpyler_585441_biocrnpyler_34510_k = 36000;
  r43_ATP_rheostatbiocrnpyler_34510_combined_model_of__biocrnpyler_585441_biocrnpyler_34510: complex_enzyme_eno_2x_molecule_pep_ATP_rheostatbiocrnpyler_34510_combined_model_of__biocrnpyler_585441_biocrnpyler_34510 => enzyme_eno_ATP_rheostatbiocrnpyler_34510_combined_model_of__biocrnpyler_585441_biocrnpyler_34510 + 2 molecule_pep_ATP_rheostatbiocrnpyler_34510_combined_model_of__biocrnpyler_585441_biocrnpyler_34510; r43_ATP_rheostatbiocrnpyler_34510_combined_model_of__biocrnpyler_585441_biocrnpyler_34510_k*complex_enzyme_eno_2x_molecule_pep_ATP_rheostatbiocrnpyler_34510_combined_model_of__biocrnpyler_585441_biocrnpyler_34510;
    r43_ATP_rheostatbiocrnpyler_34510_combined_model_of__biocrnpyler_585441_biocrnpyler_34510_k = 100;
  r43_1_ATP_rheostatbiocrnpyler_34510_combined_model_of__biocrnpyler_585441_biocrnpyler_34510: enzyme_eno_ATP_rheostatbiocrnpyler_34510_combined_model_of__biocrnpyler_585441_biocrnpyler_34510 + 2 molecule_pep_ATP_rheostatbiocrnpyler_34510_combined_model_of__biocrnpyler_585441_biocrnpyler_34510 => complex_enzyme_eno_2x_molecule_pep_ATP_rheostatbiocrnpyler_34510_combined_model_of__biocrnpyler_585441_biocrnpyler_34510; r43_1_ATP_rheostatbiocrnpyler_34510_combined_model_of__biocrnpyler_585441_biocrnpyler_34510_k*enzyme_eno_ATP_rheostatbiocrnpyler_34510_combined_model_of__biocrnpyler_585441_biocrnpyler_34510*molecule_pep_ATP_rheostatbiocrnpyler_34510_combined_model_of__biocrnpyler_585441_biocrnpyler_34510^2;
    r43_1_ATP_rheostatbiocrnpyler_34510_combined_model_of__biocrnpyler_585441_biocrnpyler_34510_k = 10;
  r45_ATP_rheostatbiocrnpyler_34510_combined_model_of__biocrnpyler_585441_biocrnpyler_34510: enzyme_pyk_ATP_rheostatbiocrnpyler_34510_combined_model_of__biocrnpyler_585441_biocrnpyler_34510 + 2 ADP_exsAbiocrnpyler_585441_1_combined_combined_model_of__biocrnpyler_585441_biocrnpyler_34510 + 2 molecule_pep_ATP_rheostatbiocrnpyler_34510_combined_model_of__biocrnpyler_585441_biocrnpyler_34510 => complex_enzyme_pyk_2x_metabolite_adp_2x_molecule_pep_ATP_rheostatbiocrnpyler_34510_combined_model_of__biocrnpyler_585441_biocrnpyler_34510; r45_ATP_rheostatbiocrnpyler_34510_combined_model_of__biocrnpyler_585441_biocrnpyler_34510_k*enzyme_pyk_ATP_rheostatbiocrnpyler_34510_combined_model_of__biocrnpyler_585441_biocrnpyler_34510*ADP_exsAbiocrnpyler_585441_1_combined_combined_model_of__biocrnpyler_585441_biocrnpyler_34510^2*molecule_pep_ATP_rheostatbiocrnpyler_34510_combined_model_of__biocrnpyler_585441_biocrnpyler_34510^2;
    r45_ATP_rheostatbiocrnpyler_34510_combined_model_of__biocrnpyler_585441_biocrnpyler_34510_k = 100;
  r45_1_ATP_rheostatbiocrnpyler_34510_combined_model_of__biocrnpyler_585441_biocrnpyler_34510: complex_enzyme_pyk_2x_metabolite_adp_2x_molecule_pep_ATP_rheostatbiocrnpyler_34510_combined_model_of__biocrnpyler_585441_biocrnpyler_34510 => enzyme_pyk_ATP_rheostatbiocrnpyler_34510_combined_model_of__biocrnpyler_585441_biocrnpyler_34510 + 2 ADP_exsAbiocrnpyler_585441_1_combined_combined_model_of__biocrnpyler_585441_biocrnpyler_34510 + 2 molecule_pep_ATP_rheostatbiocrnpyler_34510_combined_model_of__biocrnpyler_585441_biocrnpyler_34510; r45_1_ATP_rheostatbiocrnpyler_34510_combined_model_of__biocrnpyler_585441_biocrnpyler_34510_k*complex_enzyme_pyk_2x_metabolite_adp_2x_molecule_pep_ATP_rheostatbiocrnpyler_34510_combined_model_of__biocrnpyler_585441_biocrnpyler_34510;
    r45_1_ATP_rheostatbiocrnpyler_34510_combined_model_of__biocrnpyler_585441_biocrnpyler_34510_k = 10;
  r47_ATP_rheostatbiocrnpyler_34510_combined_model_of__biocrnpyler_585441_biocrnpyler_34510: complex_enzyme_pyk_2x_metabolite_adp_2x_molecule_pep_ATP_rheostatbiocrnpyler_34510_combined_model_of__biocrnpyler_585441_biocrnpyler_34510 => complex_enzyme_pyk_2x_metabolite_atp_2x_molecule_pyruvate_ATP_rheostatbiocrnpyler_34510_combined_model_of__biocrnpyler_585441_biocrnpyler_34510; r47_ATP_rheostatbiocrnpyler_34510_combined_model_of__biocrnpyler_585441_biocrnpyler_34510_k*complex_enzyme_pyk_2x_metabolite_adp_2x_molecule_pep_ATP_rheostatbiocrnpyler_34510_combined_model_of__biocrnpyler_585441_biocrnpyler_34510;
    r47_ATP_rheostatbiocrnpyler_34510_combined_model_of__biocrnpyler_585441_biocrnpyler_34510_k = 36000;
  r48_ATP_rheostatbiocrnpyler_34510_combined_model_of__biocrnpyler_585441_biocrnpyler_34510: complex_enzyme_pyk_2x_metabolite_atp_2x_molecule_pyruvate_ATP_rheostatbiocrnpyler_34510_combined_model_of__biocrnpyler_585441_biocrnpyler_34510 => enzyme_pyk_ATP_rheostatbiocrnpyler_34510_combined_model_of__biocrnpyler_585441_biocrnpyler_34510 + 2 molecule_pyruvate_ATP_rheostatbiocrnpyler_34510_combined_model_of__biocrnpyler_585441_biocrnpyler_34510 + 2 ATP_exsAbiocrnpyler_585441_1_combined_combined_model_of__biocrnpyler_585441_biocrnpyler_34510; r48_ATP_rheostatbiocrnpyler_34510_combined_model_of__biocrnpyler_585441_biocrnpyler_34510_k*complex_enzyme_pyk_2x_metabolite_atp_2x_molecule_pyruvate_ATP_rheostatbiocrnpyler_34510_combined_model_of__biocrnpyler_585441_biocrnpyler_34510;
    r48_ATP_rheostatbiocrnpyler_34510_combined_model_of__biocrnpyler_585441_biocrnpyler_34510_k = 100;
  r48_1_ATP_rheostatbiocrnpyler_34510_combined_model_of__biocrnpyler_585441_biocrnpyler_34510: enzyme_pyk_ATP_rheostatbiocrnpyler_34510_combined_model_of__biocrnpyler_585441_biocrnpyler_34510 + 2 molecule_pyruvate_ATP_rheostatbiocrnpyler_34510_combined_model_of__biocrnpyler_585441_biocrnpyler_34510 + 2 ATP_exsAbiocrnpyler_585441_1_combined_combined_model_of__biocrnpyler_585441_biocrnpyler_34510 => complex_enzyme_pyk_2x_metabolite_atp_2x_molecule_pyruvate_ATP_rheostatbiocrnpyler_34510_combined_model_of__biocrnpyler_585441_biocrnpyler_34510; r48_1_ATP_rheostatbiocrnpyler_34510_combined_model_of__biocrnpyler_585441_biocrnpyler_34510_k*enzyme_pyk_ATP_rheostatbiocrnpyler_34510_combined_model_of__biocrnpyler_585441_biocrnpyler_34510*molecule_pyruvate_ATP_rheostatbiocrnpyler_34510_combined_model_of__biocrnpyler_585441_biocrnpyler_34510^2*ATP_exsAbiocrnpyler_585441_1_combined_combined_model_of__biocrnpyler_585441_biocrnpyler_34510^2;
    r48_1_ATP_rheostatbiocrnpyler_34510_combined_model_of__biocrnpyler_585441_biocrnpyler_34510_k = 10;
  r50_ATP_rheostatbiocrnpyler_34510_combined_model_of__biocrnpyler_585441_biocrnpyler_34510: enzyme_alsS_ATP_rheostatbiocrnpyler_34510_combined_model_of__biocrnpyler_585441_biocrnpyler_34510 + 2 molecule_pyruvate_ATP_rheostatbiocrnpyler_34510_combined_model_of__biocrnpyler_585441_biocrnpyler_34510 => complex_enzyme_alsS_2x_molecule_pyruvate_ATP_rheostatbiocrnpyler_34510_combined_model_of__biocrnpyler_585441_biocrnpyler_34510; r50_ATP_rheostatbiocrnpyler_34510_combined_model_of__biocrnpyler_585441_biocrnpyler_34510_k*enzyme_alsS_ATP_rheostatbiocrnpyler_34510_combined_model_of__biocrnpyler_585441_biocrnpyler_34510*molecule_pyruvate_ATP_rheostatbiocrnpyler_34510_combined_model_of__biocrnpyler_585441_biocrnpyler_34510^2;
    r50_ATP_rheostatbiocrnpyler_34510_combined_model_of__biocrnpyler_585441_biocrnpyler_34510_k = 100;
  r50_1_ATP_rheostatbiocrnpyler_34510_combined_model_of__biocrnpyler_585441_biocrnpyler_34510: complex_enzyme_alsS_2x_molecule_pyruvate_ATP_rheostatbiocrnpyler_34510_combined_model_of__biocrnpyler_585441_biocrnpyler_34510 => enzyme_alsS_ATP_rheostatbiocrnpyler_34510_combined_model_of__biocrnpyler_585441_biocrnpyler_34510 + 2 molecule_pyruvate_ATP_rheostatbiocrnpyler_34510_combined_model_of__biocrnpyler_585441_biocrnpyler_34510; r50_1_ATP_rheostatbiocrnpyler_34510_combined_model_of__biocrnpyler_585441_biocrnpyler_34510_k*complex_enzyme_alsS_2x_molecule_pyruvate_ATP_rheostatbiocrnpyler_34510_combined_model_of__biocrnpyler_585441_biocrnpyler_34510;
    r50_1_ATP_rheostatbiocrnpyler_34510_combined_model_of__biocrnpyler_585441_biocrnpyler_34510_k = 10;
  r52_ATP_rheostatbiocrnpyler_34510_combined_model_of__biocrnpyler_585441_biocrnpyler_34510: complex_enzyme_alsS_2x_molecule_pyruvate_ATP_rheostatbiocrnpyler_34510_combined_model_of__biocrnpyler_585441_biocrnpyler_34510 => complex_enzyme_alsS_molecule_acetolac_ATP_rheostatbiocrnpyler_34510_combined_model_of__biocrnpyler_585441_biocrnpyler_34510; r52_ATP_rheostatbiocrnpyler_34510_combined_model_of__biocrnpyler_585441_biocrnpyler_34510_k*complex_enzyme_alsS_2x_molecule_pyruvate_ATP_rheostatbiocrnpyler_34510_combined_model_of__biocrnpyler_585441_biocrnpyler_34510;
    r52_ATP_rheostatbiocrnpyler_34510_combined_model_of__biocrnpyler_585441_biocrnpyler_34510_k = 36000;
  r53_ATP_rheostatbiocrnpyler_34510_combined_model_of__biocrnpyler_585441_biocrnpyler_34510: complex_enzyme_alsS_molecule_acetolac_ATP_rheostatbiocrnpyler_34510_combined_model_of__biocrnpyler_585441_biocrnpyler_34510 => enzyme_alsS_ATP_rheostatbiocrnpyler_34510_combined_model_of__biocrnpyler_585441_biocrnpyler_34510 + molecule_acetolac_ATP_rheostatbiocrnpyler_34510_combined_model_of__biocrnpyler_585441_biocrnpyler_34510; r53_ATP_rheostatbiocrnpyler_34510_combined_model_of__biocrnpyler_585441_biocrnpyler_34510_k*complex_enzyme_alsS_molecule_acetolac_ATP_rheostatbiocrnpyler_34510_combined_model_of__biocrnpyler_585441_biocrnpyler_34510;
    r53_ATP_rheostatbiocrnpyler_34510_combined_model_of__biocrnpyler_585441_biocrnpyler_34510_k = 100;
  r53_1_ATP_rheostatbiocrnpyler_34510_combined_model_of__biocrnpyler_585441_biocrnpyler_34510: enzyme_alsS_ATP_rheostatbiocrnpyler_34510_combined_model_of__biocrnpyler_585441_biocrnpyler_34510 + molecule_acetolac_ATP_rheostatbiocrnpyler_34510_combined_model_of__biocrnpyler_585441_biocrnpyler_34510 => complex_enzyme_alsS_molecule_acetolac_ATP_rheostatbiocrnpyler_34510_combined_model_of__biocrnpyler_585441_biocrnpyler_34510; r53_1_ATP_rheostatbiocrnpyler_34510_combined_model_of__biocrnpyler_585441_biocrnpyler_34510_k*enzyme_alsS_ATP_rheostatbiocrnpyler_34510_combined_model_of__biocrnpyler_585441_biocrnpyler_34510*molecule_acetolac_ATP_rheostatbiocrnpyler_34510_combined_model_of__biocrnpyler_585441_biocrnpyler_34510;
    r53_1_ATP_rheostatbiocrnpyler_34510_combined_model_of__biocrnpyler_585441_biocrnpyler_34510_k = 10;
  r55_ATP_rheostatbiocrnpyler_34510_combined_model_of__biocrnpyler_585441_biocrnpyler_34510: enzyme_IlvC_ATP_rheostatbiocrnpyler_34510_combined_model_of__biocrnpyler_585441_biocrnpyler_34510 + metabolite_nadph_ATP_rheostatbiocrnpyler_34510_combined_model_of__biocrnpyler_585441_biocrnpyler_34510 + molecule_acetolac_ATP_rheostatbiocrnpyler_34510_combined_model_of__biocrnpyler_585441_biocrnpyler_34510 => complex_enzyme_IlvC_metabolite_nadph_molecule_acetolac_ATP_rheostatbiocrnpyler_34510_combined_model_of__biocrnpyler_585441_biocrnpyler_34510; r55_ATP_rheostatbiocrnpyler_34510_combined_model_of__biocrnpyler_585441_biocrnpyler_34510_k*enzyme_IlvC_ATP_rheostatbiocrnpyler_34510_combined_model_of__biocrnpyler_585441_biocrnpyler_34510*metabolite_nadph_ATP_rheostatbiocrnpyler_34510_combined_model_of__biocrnpyler_585441_biocrnpyler_34510*molecule_acetolac_ATP_rheostatbiocrnpyler_34510_combined_model_of__biocrnpyler_585441_biocrnpyler_34510;
    r55_ATP_rheostatbiocrnpyler_34510_combined_model_of__biocrnpyler_585441_biocrnpyler_34510_k = 100;
  r55_1_ATP_rheostatbiocrnpyler_34510_combined_model_of__biocrnpyler_585441_biocrnpyler_34510: complex_enzyme_IlvC_metabolite_nadph_molecule_acetolac_ATP_rheostatbiocrnpyler_34510_combined_model_of__biocrnpyler_585441_biocrnpyler_34510 => enzyme_IlvC_ATP_rheostatbiocrnpyler_34510_combined_model_of__biocrnpyler_585441_biocrnpyler_34510 + metabolite_nadph_ATP_rheostatbiocrnpyler_34510_combined_model_of__biocrnpyler_585441_biocrnpyler_34510 + molecule_acetolac_ATP_rheostatbiocrnpyler_34510_combined_model_of__biocrnpyler_585441_biocrnpyler_34510; r55_1_ATP_rheostatbiocrnpyler_34510_combined_model_of__biocrnpyler_585441_biocrnpyler_34510_k*complex_enzyme_IlvC_metabolite_nadph_molecule_acetolac_ATP_rheostatbiocrnpyler_34510_combined_model_of__biocrnpyler_585441_biocrnpyler_34510;
    r55_1_ATP_rheostatbiocrnpyler_34510_combined_model_of__biocrnpyler_585441_biocrnpyler_34510_k = 10;
  r57_ATP_rheostatbiocrnpyler_34510_combined_model_of__biocrnpyler_585441_biocrnpyler_34510: complex_enzyme_IlvC_metabolite_nadph_molecule_acetolac_ATP_rheostatbiocrnpyler_34510_combined_model_of__biocrnpyler_585441_biocrnpyler_34510 => complex_enzyme_IlvC_metabolite_nadp_molecule_23dih3mebut_ATP_rheostatbiocrnpyler_34510_combined_model_of__biocrnpyler_585441_biocrnpyler_34510; r57_ATP_rheostatbiocrnpyler_34510_combined_model_of__biocrnpyler_585441_biocrnpyler_34510_k*complex_enzyme_IlvC_metabolite_nadph_molecule_acetolac_ATP_rheostatbiocrnpyler_34510_combined_model_of__biocrnpyler_585441_biocrnpyler_34510;
    r57_ATP_rheostatbiocrnpyler_34510_combined_model_of__biocrnpyler_585441_biocrnpyler_34510_k = 36000;
  r58_ATP_rheostatbiocrnpyler_34510_combined_model_of__biocrnpyler_585441_biocrnpyler_34510: complex_enzyme_IlvC_metabolite_nadp_molecule_23dih3mebut_ATP_rheostatbiocrnpyler_34510_combined_model_of__biocrnpyler_585441_biocrnpyler_34510 => enzyme_IlvC_ATP_rheostatbiocrnpyler_34510_combined_model_of__biocrnpyler_585441_biocrnpyler_34510 + molecule_23dih3mebut_ATP_rheostatbiocrnpyler_34510_combined_model_of__biocrnpyler_585441_biocrnpyler_34510 + metabolite_nadp_ATP_rheostatbiocrnpyler_34510_combined_model_of__biocrnpyler_585441_biocrnpyler_34510; r58_ATP_rheostatbiocrnpyler_34510_combined_model_of__biocrnpyler_585441_biocrnpyler_34510_k*complex_enzyme_IlvC_metabolite_nadp_molecule_23dih3mebut_ATP_rheostatbiocrnpyler_34510_combined_model_of__biocrnpyler_585441_biocrnpyler_34510;
    r58_ATP_rheostatbiocrnpyler_34510_combined_model_of__biocrnpyler_585441_biocrnpyler_34510_k = 100;
  r58_1_ATP_rheostatbiocrnpyler_34510_combined_model_of__biocrnpyler_585441_biocrnpyler_34510: enzyme_IlvC_ATP_rheostatbiocrnpyler_34510_combined_model_of__biocrnpyler_585441_biocrnpyler_34510 + molecule_23dih3mebut_ATP_rheostatbiocrnpyler_34510_combined_model_of__biocrnpyler_585441_biocrnpyler_34510 + metabolite_nadp_ATP_rheostatbiocrnpyler_34510_combined_model_of__biocrnpyler_585441_biocrnpyler_34510 => complex_enzyme_IlvC_metabolite_nadp_molecule_23dih3mebut_ATP_rheostatbiocrnpyler_34510_combined_model_of__biocrnpyler_585441_biocrnpyler_34510; r58_1_ATP_rheostatbiocrnpyler_34510_combined_model_of__biocrnpyler_585441_biocrnpyler_34510_k*enzyme_IlvC_ATP_rheostatbiocrnpyler_34510_combined_model_of__biocrnpyler_585441_biocrnpyler_34510*molecule_23dih3mebut_ATP_rheostatbiocrnpyler_34510_combined_model_of__biocrnpyler_585441_biocrnpyler_34510*metabolite_nadp_ATP_rheostatbiocrnpyler_34510_combined_model_of__biocrnpyler_585441_biocrnpyler_34510;
    r58_1_ATP_rheostatbiocrnpyler_34510_combined_model_of__biocrnpyler_585441_biocrnpyler_34510_k = 10;
  r60_ATP_rheostatbiocrnpyler_34510_combined_model_of__biocrnpyler_585441_biocrnpyler_34510: enzyme_IlvD_ATP_rheostatbiocrnpyler_34510_combined_model_of__biocrnpyler_585441_biocrnpyler_34510 + molecule_23dih3mebut_ATP_rheostatbiocrnpyler_34510_combined_model_of__biocrnpyler_585441_biocrnpyler_34510 => complex_enzyme_IlvD_molecule_23dih3mebut_ATP_rheostatbiocrnpyler_34510_combined_model_of__biocrnpyler_585441_biocrnpyler_34510; r60_ATP_rheostatbiocrnpyler_34510_combined_model_of__biocrnpyler_585441_biocrnpyler_34510_k*enzyme_IlvD_ATP_rheostatbiocrnpyler_34510_combined_model_of__biocrnpyler_585441_biocrnpyler_34510*molecule_23dih3mebut_ATP_rheostatbiocrnpyler_34510_combined_model_of__biocrnpyler_585441_biocrnpyler_34510;
    r60_ATP_rheostatbiocrnpyler_34510_combined_model_of__biocrnpyler_585441_biocrnpyler_34510_k = 100;
  r60_1_ATP_rheostatbiocrnpyler_34510_combined_model_of__biocrnpyler_585441_biocrnpyler_34510: complex_enzyme_IlvD_molecule_23dih3mebut_ATP_rheostatbiocrnpyler_34510_combined_model_of__biocrnpyler_585441_biocrnpyler_34510 => enzyme_IlvD_ATP_rheostatbiocrnpyler_34510_combined_model_of__biocrnpyler_585441_biocrnpyler_34510 + molecule_23dih3mebut_ATP_rheostatbiocrnpyler_34510_combined_model_of__biocrnpyler_585441_biocrnpyler_34510; r60_1_ATP_rheostatbiocrnpyler_34510_combined_model_of__biocrnpyler_585441_biocrnpyler_34510_k*complex_enzyme_IlvD_molecule_23dih3mebut_ATP_rheostatbiocrnpyler_34510_combined_model_of__biocrnpyler_585441_biocrnpyler_34510;
    r60_1_ATP_rheostatbiocrnpyler_34510_combined_model_of__biocrnpyler_585441_biocrnpyler_34510_k = 10;
  r62_ATP_rheostatbiocrnpyler_34510_combined_model_of__biocrnpyler_585441_biocrnpyler_34510: complex_enzyme_IlvD_molecule_23dih3mebut_ATP_rheostatbiocrnpyler_34510_combined_model_of__biocrnpyler_585441_biocrnpyler_34510 => complex_enzyme_IlvD_molecule_3me2oxo_ATP_rheostatbiocrnpyler_34510_combined_model_of__biocrnpyler_585441_biocrnpyler_34510; r62_ATP_rheostatbiocrnpyler_34510_combined_model_of__biocrnpyler_585441_biocrnpyler_34510_k*complex_enzyme_IlvD_molecule_23dih3mebut_ATP_rheostatbiocrnpyler_34510_combined_model_of__biocrnpyler_585441_biocrnpyler_34510;
    r62_ATP_rheostatbiocrnpyler_34510_combined_model_of__biocrnpyler_585441_biocrnpyler_34510_k = 36000;
  r63_ATP_rheostatbiocrnpyler_34510_combined_model_of__biocrnpyler_585441_biocrnpyler_34510: complex_enzyme_IlvD_molecule_3me2oxo_ATP_rheostatbiocrnpyler_34510_combined_model_of__biocrnpyler_585441_biocrnpyler_34510 => enzyme_IlvD_ATP_rheostatbiocrnpyler_34510_combined_model_of__biocrnpyler_585441_biocrnpyler_34510 + molecule_3me2oxo_ATP_rheostatbiocrnpyler_34510_combined_model_of__biocrnpyler_585441_biocrnpyler_34510; r63_ATP_rheostatbiocrnpyler_34510_combined_model_of__biocrnpyler_585441_biocrnpyler_34510_k*complex_enzyme_IlvD_molecule_3me2oxo_ATP_rheostatbiocrnpyler_34510_combined_model_of__biocrnpyler_585441_biocrnpyler_34510;
    r63_ATP_rheostatbiocrnpyler_34510_combined_model_of__biocrnpyler_585441_biocrnpyler_34510_k = 100;
  r63_1_ATP_rheostatbiocrnpyler_34510_combined_model_of__biocrnpyler_585441_biocrnpyler_34510: enzyme_IlvD_ATP_rheostatbiocrnpyler_34510_combined_model_of__biocrnpyler_585441_biocrnpyler_34510 + molecule_3me2oxo_ATP_rheostatbiocrnpyler_34510_combined_model_of__biocrnpyler_585441_biocrnpyler_34510 => complex_enzyme_IlvD_molecule_3me2oxo_ATP_rheostatbiocrnpyler_34510_combined_model_of__biocrnpyler_585441_biocrnpyler_34510; r63_1_ATP_rheostatbiocrnpyler_34510_combined_model_of__biocrnpyler_585441_biocrnpyler_34510_k*enzyme_IlvD_ATP_rheostatbiocrnpyler_34510_combined_model_of__biocrnpyler_585441_biocrnpyler_34510*molecule_3me2oxo_ATP_rheostatbiocrnpyler_34510_combined_model_of__biocrnpyler_585441_biocrnpyler_34510;
    r63_1_ATP_rheostatbiocrnpyler_34510_combined_model_of__biocrnpyler_585441_biocrnpyler_34510_k = 10;
  r65_ATP_rheostatbiocrnpyler_34510_combined_model_of__biocrnpyler_585441_biocrnpyler_34510: enzyme_kivD_ATP_rheostatbiocrnpyler_34510_combined_model_of__biocrnpyler_585441_biocrnpyler_34510 + molecule_3me2oxo_ATP_rheostatbiocrnpyler_34510_combined_model_of__biocrnpyler_585441_biocrnpyler_34510 => complex_enzyme_kivD_molecule_3me2oxo_ATP_rheostatbiocrnpyler_34510_combined_model_of__biocrnpyler_585441_biocrnpyler_34510; r65_ATP_rheostatbiocrnpyler_34510_combined_model_of__biocrnpyler_585441_biocrnpyler_34510_k*enzyme_kivD_ATP_rheostatbiocrnpyler_34510_combined_model_of__biocrnpyler_585441_biocrnpyler_34510*molecule_3me2oxo_ATP_rheostatbiocrnpyler_34510_combined_model_of__biocrnpyler_585441_biocrnpyler_34510;
    r65_ATP_rheostatbiocrnpyler_34510_combined_model_of__biocrnpyler_585441_biocrnpyler_34510_k = 100;
  r65_1_ATP_rheostatbiocrnpyler_34510_combined_model_of__biocrnpyler_585441_biocrnpyler_34510: complex_enzyme_kivD_molecule_3me2oxo_ATP_rheostatbiocrnpyler_34510_combined_model_of__biocrnpyler_585441_biocrnpyler_34510 => enzyme_kivD_ATP_rheostatbiocrnpyler_34510_combined_model_of__biocrnpyler_585441_biocrnpyler_34510 + molecule_3me2oxo_ATP_rheostatbiocrnpyler_34510_combined_model_of__biocrnpyler_585441_biocrnpyler_34510; r65_1_ATP_rheostatbiocrnpyler_34510_combined_model_of__biocrnpyler_585441_biocrnpyler_34510_k*complex_enzyme_kivD_molecule_3me2oxo_ATP_rheostatbiocrnpyler_34510_combined_model_of__biocrnpyler_585441_biocrnpyler_34510;
    r65_1_ATP_rheostatbiocrnpyler_34510_combined_model_of__biocrnpyler_585441_biocrnpyler_34510_k = 10;
  r67_ATP_rheostatbiocrnpyler_34510_combined_model_of__biocrnpyler_585441_biocrnpyler_34510: complex_enzyme_kivD_molecule_3me2oxo_ATP_rheostatbiocrnpyler_34510_combined_model_of__biocrnpyler_585441_biocrnpyler_34510 => complex_enzyme_kivD_molecule_isobutanal_ATP_rheostatbiocrnpyler_34510_combined_model_of__biocrnpyler_585441_biocrnpyler_34510; r67_ATP_rheostatbiocrnpyler_34510_combined_model_of__biocrnpyler_585441_biocrnpyler_34510_k*complex_enzyme_kivD_molecule_3me2oxo_ATP_rheostatbiocrnpyler_34510_combined_model_of__biocrnpyler_585441_biocrnpyler_34510;
    r67_ATP_rheostatbiocrnpyler_34510_combined_model_of__biocrnpyler_585441_biocrnpyler_34510_k = 36000;
  r68_ATP_rheostatbiocrnpyler_34510_combined_model_of__biocrnpyler_585441_biocrnpyler_34510: complex_enzyme_kivD_molecule_isobutanal_ATP_rheostatbiocrnpyler_34510_combined_model_of__biocrnpyler_585441_biocrnpyler_34510 => enzyme_kivD_ATP_rheostatbiocrnpyler_34510_combined_model_of__biocrnpyler_585441_biocrnpyler_34510 + molecule_isobutanal_ATP_rheostatbiocrnpyler_34510_combined_model_of__biocrnpyler_585441_biocrnpyler_34510; r68_ATP_rheostatbiocrnpyler_34510_combined_model_of__biocrnpyler_585441_biocrnpyler_34510_k*complex_enzyme_kivD_molecule_isobutanal_ATP_rheostatbiocrnpyler_34510_combined_model_of__biocrnpyler_585441_biocrnpyler_34510;
    r68_ATP_rheostatbiocrnpyler_34510_combined_model_of__biocrnpyler_585441_biocrnpyler_34510_k = 100;
  r68_1_ATP_rheostatbiocrnpyler_34510_combined_model_of__biocrnpyler_585441_biocrnpyler_34510: enzyme_kivD_ATP_rheostatbiocrnpyler_34510_combined_model_of__biocrnpyler_585441_biocrnpyler_34510 + molecule_isobutanal_ATP_rheostatbiocrnpyler_34510_combined_model_of__biocrnpyler_585441_biocrnpyler_34510 => complex_enzyme_kivD_molecule_isobutanal_ATP_rheostatbiocrnpyler_34510_combined_model_of__biocrnpyler_585441_biocrnpyler_34510; r68_1_ATP_rheostatbiocrnpyler_34510_combined_model_of__biocrnpyler_585441_biocrnpyler_34510_k*enzyme_kivD_ATP_rheostatbiocrnpyler_34510_combined_model_of__biocrnpyler_585441_biocrnpyler_34510*molecule_isobutanal_ATP_rheostatbiocrnpyler_34510_combined_model_of__biocrnpyler_585441_biocrnpyler_34510;
    r68_1_ATP_rheostatbiocrnpyler_34510_combined_model_of__biocrnpyler_585441_biocrnpyler_34510_k = 10;
  r70_ATP_rheostatbiocrnpyler_34510_combined_model_of__biocrnpyler_585441_biocrnpyler_34510: enzyme_yahk_ATP_rheostatbiocrnpyler_34510_combined_model_of__biocrnpyler_585441_biocrnpyler_34510 + metabolite_nadph_ATP_rheostatbiocrnpyler_34510_combined_model_of__biocrnpyler_585441_biocrnpyler_34510 + molecule_isobutanal_ATP_rheostatbiocrnpyler_34510_combined_model_of__biocrnpyler_585441_biocrnpyler_34510 => complex_enzyme_yahk_metabolite_nadph_molecule_isobutanal_ATP_rheostatbiocrnpyler_34510_combined_model_of__biocrnpyler_585441_biocrnpyler_34510; r70_ATP_rheostatbiocrnpyler_34510_combined_model_of__biocrnpyler_585441_biocrnpyler_34510_k*enzyme_yahk_ATP_rheostatbiocrnpyler_34510_combined_model_of__biocrnpyler_585441_biocrnpyler_34510*metabolite_nadph_ATP_rheostatbiocrnpyler_34510_combined_model_of__biocrnpyler_585441_biocrnpyler_34510*molecule_isobutanal_ATP_rheostatbiocrnpyler_34510_combined_model_of__biocrnpyler_585441_biocrnpyler_34510;
    r70_ATP_rheostatbiocrnpyler_34510_combined_model_of__biocrnpyler_585441_biocrnpyler_34510_k = 100;
  r70_1_ATP_rheostatbiocrnpyler_34510_combined_model_of__biocrnpyler_585441_biocrnpyler_34510: complex_enzyme_yahk_metabolite_nadph_molecule_isobutanal_ATP_rheostatbiocrnpyler_34510_combined_model_of__biocrnpyler_585441_biocrnpyler_34510 => enzyme_yahk_ATP_rheostatbiocrnpyler_34510_combined_model_of__biocrnpyler_585441_biocrnpyler_34510 + metabolite_nadph_ATP_rheostatbiocrnpyler_34510_combined_model_of__biocrnpyler_585441_biocrnpyler_34510 + molecule_isobutanal_ATP_rheostatbiocrnpyler_34510_combined_model_of__biocrnpyler_585441_biocrnpyler_34510; r70_1_ATP_rheostatbiocrnpyler_34510_combined_model_of__biocrnpyler_585441_biocrnpyler_34510_k*complex_enzyme_yahk_metabolite_nadph_molecule_isobutanal_ATP_rheostatbiocrnpyler_34510_combined_model_of__biocrnpyler_585441_biocrnpyler_34510;
    r70_1_ATP_rheostatbiocrnpyler_34510_combined_model_of__biocrnpyler_585441_biocrnpyler_34510_k = 10;
  r72_ATP_rheostatbiocrnpyler_34510_combined_model_of__biocrnpyler_585441_biocrnpyler_34510: complex_enzyme_yahk_metabolite_nadph_molecule_isobutanal_ATP_rheostatbiocrnpyler_34510_combined_model_of__biocrnpyler_585441_biocrnpyler_34510 => complex_enzyme_yahk_metabolite_nadp_molecule_isobutanol_ATP_rheostatbiocrnpyler_34510_combined_model_of__biocrnpyler_585441_biocrnpyler_34510; r72_ATP_rheostatbiocrnpyler_34510_combined_model_of__biocrnpyler_585441_biocrnpyler_34510_k*complex_enzyme_yahk_metabolite_nadph_molecule_isobutanal_ATP_rheostatbiocrnpyler_34510_combined_model_of__biocrnpyler_585441_biocrnpyler_34510;
    r72_ATP_rheostatbiocrnpyler_34510_combined_model_of__biocrnpyler_585441_biocrnpyler_34510_k = 36000;
  r73_ATP_rheostatbiocrnpyler_34510_combined_model_of__biocrnpyler_585441_biocrnpyler_34510: complex_enzyme_yahk_metabolite_nadp_molecule_isobutanol_ATP_rheostatbiocrnpyler_34510_combined_model_of__biocrnpyler_585441_biocrnpyler_34510 => enzyme_yahk_ATP_rheostatbiocrnpyler_34510_combined_model_of__biocrnpyler_585441_biocrnpyler_34510 + molecule_isobutanol_ATP_rheostatbiocrnpyler_34510_combined_model_of__biocrnpyler_585441_biocrnpyler_34510 + metabolite_nadp_ATP_rheostatbiocrnpyler_34510_combined_model_of__biocrnpyler_585441_biocrnpyler_34510; r73_ATP_rheostatbiocrnpyler_34510_combined_model_of__biocrnpyler_585441_biocrnpyler_34510_k*complex_enzyme_yahk_metabolite_nadp_molecule_isobutanol_ATP_rheostatbiocrnpyler_34510_combined_model_of__biocrnpyler_585441_biocrnpyler_34510;
    r73_ATP_rheostatbiocrnpyler_34510_combined_model_of__biocrnpyler_585441_biocrnpyler_34510_k = 100;
  r73_1_ATP_rheostatbiocrnpyler_34510_combined_model_of__biocrnpyler_585441_biocrnpyler_34510: enzyme_yahk_ATP_rheostatbiocrnpyler_34510_combined_model_of__biocrnpyler_585441_biocrnpyler_34510 + molecule_isobutanol_ATP_rheostatbiocrnpyler_34510_combined_model_of__biocrnpyler_585441_biocrnpyler_34510 + metabolite_nadp_ATP_rheostatbiocrnpyler_34510_combined_model_of__biocrnpyler_585441_biocrnpyler_34510 => complex_enzyme_yahk_metabolite_nadp_molecule_isobutanol_ATP_rheostatbiocrnpyler_34510_combined_model_of__biocrnpyler_585441_biocrnpyler_34510; r73_1_ATP_rheostatbiocrnpyler_34510_combined_model_of__biocrnpyler_585441_biocrnpyler_34510_k*enzyme_yahk_ATP_rheostatbiocrnpyler_34510_combined_model_of__biocrnpyler_585441_biocrnpyler_34510*molecule_isobutanol_ATP_rheostatbiocrnpyler_34510_combined_model_of__biocrnpyler_585441_biocrnpyler_34510*metabolite_nadp_ATP_rheostatbiocrnpyler_34510_combined_model_of__biocrnpyler_585441_biocrnpyler_34510;
    r73_1_ATP_rheostatbiocrnpyler_34510_combined_model_of__biocrnpyler_585441_biocrnpyler_34510_k = 10;

  // Unit definitions:
  unit square_metre = metre^2;
  unit per_second = 1 / second;
  unit substance = dimensionless;
end
