// SBML level 3 version 2

model combined_model_of__combined_model_of__combined_model_of__external_reservoir_model_combined_model_of__atc_membrane_dnaexp_membrane_combined_model_of__combined_model_of__biocrnpyler_454852_biocrnpyler_317929_combined_model_of__combined_model_of__external_reservoir_model_combined_model_of__atc_membrane2_combined_model_of__combined_model_of__biocrnpyler_367767_biocrnpyler_317929_combined_model_of__combined_model_of__external_reservoir_model_combined_model_of__atc_membrane3_combined_model_of__combined_model_of__biocrnpyler_798952_biocrnpyler_317929()
  // model units - substance: mole, time: second, volume: litre, area: square_metre, length: metre, extent: mole

  // Compartments:
  compartment cell_1_internal_combined = 0.000203 litre;
  compartment cell_external_combined = 0.0001 litre;
  compartment cell_2_internal_combined = 1e-6 litre;
  compartment cell_3_internal_combined = 1e-6 litre;
  compartment cell_external_combined_1 = 0.0001 litre;

  // Species:
  species ssDNA_e in cell_external_combined = 0;
  species ssDNA in cell_1_internal_combined = 50;
  species VirE2_b_ssDNA in cell_1_internal_combined = 0;
  species dna_g_virE2biocrnpyler_454852_combined_model_of__biocrnpyler_454852_biocrnpyler_317929 in cell_1_internal_combined = 1;
  species tetR_virE2biocrnpyler_454852_combined_model_of__biocrnpyler_454852_biocrnpyler_317929 in cell_1_internal_combined = 10;
  species rna_g_virE2biocrnpyler_454852_combined_model_of__biocrnpyler_454852_biocrnpyler_317929 in cell_1_internal_combined = 0;
  species VirE2_f_virE2biocrnpyler_454852_combined_model_of__biocrnpyler_454852_biocrnpyler_317929 in cell_1_internal_combined = 0;
  species atc_i_1_combined in cell_1_internal_combined = 0;
  species complex_atc_i_tetR_virE2biocrnpyler_454852_combined_model_of__biocrnpyler_454852_biocrnpyler_317929 in cell_1_internal_combined = 0;
  species VirE2_b_1_combined in cell_1_internal_combined = 0;
  species complex_dna_g_tetR_virE2biocrnpyler_454852_combined_model_of__biocrnpyler_454852_biocrnpyler_317929 in cell_1_internal_combined = 0;
  species complex_atc_i_dna_g_tetR_virE2biocrnpyler_454852_combined_model_of__biocrnpyler_454852_biocrnpyler_317929 in cell_1_internal_combined = 0;
  species enzyme_hex_ATP_rheostatbiocrnpyler_317929_combined_model_of__biocrnpyler_454852_biocrnpyler_317929 in cell_1_internal_combined = 0.2;
  species ATP_virE2biocrnpyler_454852_1_combined_combined_model_of__biocrnpyler_454852_biocrnpyler_317929 in cell_1_internal_combined = 15;
  species molecule_glucose_ATP_rheostatbiocrnpyler_317929_combined_model_of__biocrnpyler_454852_biocrnpyler_317929 in cell_1_internal_combined = 30;
  species molecule_g6p_ATP_rheostatbiocrnpyler_317929_combined_model_of__biocrnpyler_454852_biocrnpyler_317929 in cell_1_internal_combined = 0;
  species ADP_virE2biocrnpyler_454852_1_combined_combined_model_of__biocrnpyler_454852_biocrnpyler_317929 in cell_1_internal_combined = 0;
  species complex_enzyme_hex_metabolite_atp_molecule_glucose_ATP_rheostatbiocrnpyler_317929_combined_model_of__biocrnpyler_454852_biocrnpyler_317929 in cell_1_internal_combined = 0;
  species complex_enzyme_hex_metabolite_adp_molecule_g6p_ATP_rheostatbiocrnpyler_317929_combined_model_of__biocrnpyler_454852_biocrnpyler_317929 in cell_1_internal_combined = 0;
  species enzyme_pgi_ATP_rheostatbiocrnpyler_317929_combined_model_of__biocrnpyler_454852_biocrnpyler_317929 in cell_1_internal_combined = 0.2;
  species molecule_f6p_ATP_rheostatbiocrnpyler_317929_combined_model_of__biocrnpyler_454852_biocrnpyler_317929 in cell_1_internal_combined = 0;
  species complex_enzyme_pgi_molecule_g6p_ATP_rheostatbiocrnpyler_317929_combined_model_of__biocrnpyler_454852_biocrnpyler_317929 in cell_1_internal_combined = 0;
  species complex_enzyme_pgi_molecule_f6p_ATP_rheostatbiocrnpyler_317929_combined_model_of__biocrnpyler_454852_biocrnpyler_317929 in cell_1_internal_combined = 0;
  species enzyme_pfk_ATP_rheostatbiocrnpyler_317929_combined_model_of__biocrnpyler_454852_biocrnpyler_317929 in cell_1_internal_combined = 0.2;
  species molecule_f16p_ATP_rheostatbiocrnpyler_317929_combined_model_of__biocrnpyler_454852_biocrnpyler_317929 in cell_1_internal_combined = 0;
  species complex_enzyme_pfk_metabolite_atp_molecule_f6p_ATP_rheostatbiocrnpyler_317929_combined_model_of__biocrnpyler_454852_biocrnpyler_317929 in cell_1_internal_combined = 0;
  species complex_enzyme_pfk_metabolite_adp_molecule_f16p_ATP_rheostatbiocrnpyler_317929_combined_model_of__biocrnpyler_454852_biocrnpyler_317929 in cell_1_internal_combined = 0;
  species enzyme_ald_tpi_ATP_rheostatbiocrnpyler_317929_combined_model_of__biocrnpyler_454852_biocrnpyler_317929 in cell_1_internal_combined = 0.2;
  species molecule_g3p_ATP_rheostatbiocrnpyler_317929_combined_model_of__biocrnpyler_454852_biocrnpyler_317929 in cell_1_internal_combined = 0;
  species complex_enzyme_ald_tpi_molecule_f16p_ATP_rheostatbiocrnpyler_317929_combined_model_of__biocrnpyler_454852_biocrnpyler_317929 in cell_1_internal_combined = 0;
  species complex_enzyme_ald_tpi_2x_molecule_g3p_ATP_rheostatbiocrnpyler_317929_combined_model_of__biocrnpyler_454852_biocrnpyler_317929 in cell_1_internal_combined = 0;
  species enzyme_gapN_ATP_rheostatbiocrnpyler_317929_combined_model_of__biocrnpyler_454852_biocrnpyler_317929 in cell_1_internal_combined = 0.2;
  species metabolite_nadp_ATP_rheostatbiocrnpyler_317929_combined_model_of__biocrnpyler_454852_biocrnpyler_317929 in cell_1_internal_combined = 30;
  species molecule_3pg_ATP_rheostatbiocrnpyler_317929_combined_model_of__biocrnpyler_454852_biocrnpyler_317929 in cell_1_internal_combined = 0;
  species metabolite_nadph_ATP_rheostatbiocrnpyler_317929_combined_model_of__biocrnpyler_454852_biocrnpyler_317929 in cell_1_internal_combined = 0;
  species complex_enzyme_gapN_2x_metabolite_nadp_2x_molecule_g3p_ATP_rheostatbiocrnpyler_317929_combined_model_of__biocrnpyler_454852_biocrnpyler_317929 in cell_1_internal_combined = 0;
  species complex_enzyme_gapN_2x_metabolite_nadph_2x_molecule_3pg_ATP_rheostatbiocrnpyler_317929_combined_model_of__biocrnpyler_454852_biocrnpyler_317929 in cell_1_internal_combined = 0;
  species enzyme_mGapDH_ATP_rheostatbiocrnpyler_317929_combined_model_of__biocrnpyler_454852_biocrnpyler_317929 in cell_1_internal_combined = 0.2;
  species P_virE2biocrnpyler_454852_1_combined_combined_model_of__biocrnpyler_454852_biocrnpyler_317929 in cell_1_internal_combined = 30;
  species molecule_13bpg_ATP_rheostatbiocrnpyler_317929_combined_model_of__biocrnpyler_454852_biocrnpyler_317929 in cell_1_internal_combined = 0;
  species complex_enzyme_mGapDH_2x_metabolite_nadp_metabolite_pi_2x_molecule_g3p_ATP_rheostatbiocrnpyler_317929_combined_model_of__biocrnpyler_454852_biocrnpyler_317929 in cell_1_internal_combined = 0;
  species complex_enzyme_mGapDH_2x_metabolite_nadph_molecule_13bpg_ATP_rheostatbiocrnpyler_317929_combined_model_of__biocrnpyler_454852_biocrnpyler_317929 in cell_1_internal_combined = 0;
  species enzyme_pgk_ATP_rheostatbiocrnpyler_317929_combined_model_of__biocrnpyler_454852_biocrnpyler_317929 in cell_1_internal_combined = 0.2;
  species complex_enzyme_pgk_metabolite_adp_molecule_13bpg_ATP_rheostatbiocrnpyler_317929_combined_model_of__biocrnpyler_454852_biocrnpyler_317929 in cell_1_internal_combined = 0;
  species complex_enzyme_pgk_metabolite_atp_2x_molecule_3pg_ATP_rheostatbiocrnpyler_317929_combined_model_of__biocrnpyler_454852_biocrnpyler_317929 in cell_1_internal_combined = 0;
  species enzyme_pgm_ATP_rheostatbiocrnpyler_317929_combined_model_of__biocrnpyler_454852_biocrnpyler_317929 in cell_1_internal_combined = 0.2;
  species molecule_2pg_ATP_rheostatbiocrnpyler_317929_combined_model_of__biocrnpyler_454852_biocrnpyler_317929 in cell_1_internal_combined = 0;
  species complex_enzyme_pgm_2x_molecule_3pg_ATP_rheostatbiocrnpyler_317929_combined_model_of__biocrnpyler_454852_biocrnpyler_317929 in cell_1_internal_combined = 0;
  species complex_enzyme_pgm_2x_molecule_2pg_ATP_rheostatbiocrnpyler_317929_combined_model_of__biocrnpyler_454852_biocrnpyler_317929 in cell_1_internal_combined = 0;
  species enzyme_eno_ATP_rheostatbiocrnpyler_317929_combined_model_of__biocrnpyler_454852_biocrnpyler_317929 in cell_1_internal_combined = 0.2;
  species molecule_pep_ATP_rheostatbiocrnpyler_317929_combined_model_of__biocrnpyler_454852_biocrnpyler_317929 in cell_1_internal_combined = 0;
  species complex_enzyme_eno_2x_molecule_2pg_ATP_rheostatbiocrnpyler_317929_combined_model_of__biocrnpyler_454852_biocrnpyler_317929 in cell_1_internal_combined = 0;
  species complex_enzyme_eno_2x_molecule_pep_ATP_rheostatbiocrnpyler_317929_combined_model_of__biocrnpyler_454852_biocrnpyler_317929 in cell_1_internal_combined = 0;
  species enzyme_pyk_ATP_rheostatbiocrnpyler_317929_combined_model_of__biocrnpyler_454852_biocrnpyler_317929 in cell_1_internal_combined = 0.2;
  species molecule_pyruvate_ATP_rheostatbiocrnpyler_317929_combined_model_of__biocrnpyler_454852_biocrnpyler_317929 in cell_1_internal_combined = 0;
  species complex_enzyme_pyk_2x_metabolite_adp_2x_molecule_pep_ATP_rheostatbiocrnpyler_317929_combined_model_of__biocrnpyler_454852_biocrnpyler_317929 in cell_1_internal_combined = 0;
  species complex_enzyme_pyk_2x_metabolite_atp_2x_molecule_pyruvate_ATP_rheostatbiocrnpyler_317929_combined_model_of__biocrnpyler_454852_biocrnpyler_317929 in cell_1_internal_combined = 0;
  species enzyme_alsS_ATP_rheostatbiocrnpyler_317929_combined_model_of__biocrnpyler_454852_biocrnpyler_317929 in cell_1_internal_combined = 0.2;
  species molecule_acetolac_ATP_rheostatbiocrnpyler_317929_combined_model_of__biocrnpyler_454852_biocrnpyler_317929 in cell_1_internal_combined = 0;
  species complex_enzyme_alsS_2x_molecule_pyruvate_ATP_rheostatbiocrnpyler_317929_combined_model_of__biocrnpyler_454852_biocrnpyler_317929 in cell_1_internal_combined = 0;
  species complex_enzyme_alsS_molecule_acetolac_ATP_rheostatbiocrnpyler_317929_combined_model_of__biocrnpyler_454852_biocrnpyler_317929 in cell_1_internal_combined = 0;
  species enzyme_IlvC_ATP_rheostatbiocrnpyler_317929_combined_model_of__biocrnpyler_454852_biocrnpyler_317929 in cell_1_internal_combined = 0.2;
  species molecule_23dih3mebut_ATP_rheostatbiocrnpyler_317929_combined_model_of__biocrnpyler_454852_biocrnpyler_317929 in cell_1_internal_combined = 0;
  species complex_enzyme_IlvC_metabolite_nadph_molecule_acetolac_ATP_rheostatbiocrnpyler_317929_combined_model_of__biocrnpyler_454852_biocrnpyler_317929 in cell_1_internal_combined = 0;
  species complex_enzyme_IlvC_metabolite_nadp_molecule_23dih3mebut_ATP_rheostatbiocrnpyler_317929_combined_model_of__biocrnpyler_454852_biocrnpyler_317929 in cell_1_internal_combined = 0;
  species enzyme_IlvD_ATP_rheostatbiocrnpyler_317929_combined_model_of__biocrnpyler_454852_biocrnpyler_317929 in cell_1_internal_combined = 0.2;
  species molecule_3me2oxo_ATP_rheostatbiocrnpyler_317929_combined_model_of__biocrnpyler_454852_biocrnpyler_317929 in cell_1_internal_combined = 0;
  species complex_enzyme_IlvD_molecule_23dih3mebut_ATP_rheostatbiocrnpyler_317929_combined_model_of__biocrnpyler_454852_biocrnpyler_317929 in cell_1_internal_combined = 0;
  species complex_enzyme_IlvD_molecule_3me2oxo_ATP_rheostatbiocrnpyler_317929_combined_model_of__biocrnpyler_454852_biocrnpyler_317929 in cell_1_internal_combined = 0;
  species enzyme_kivD_ATP_rheostatbiocrnpyler_317929_combined_model_of__biocrnpyler_454852_biocrnpyler_317929 in cell_1_internal_combined = 0.2;
  species molecule_isobutanal_ATP_rheostatbiocrnpyler_317929_combined_model_of__biocrnpyler_454852_biocrnpyler_317929 in cell_1_internal_combined = 0;
  species complex_enzyme_kivD_molecule_3me2oxo_ATP_rheostatbiocrnpyler_317929_combined_model_of__biocrnpyler_454852_biocrnpyler_317929 in cell_1_internal_combined = 0;
  species complex_enzyme_kivD_molecule_isobutanal_ATP_rheostatbiocrnpyler_317929_combined_model_of__biocrnpyler_454852_biocrnpyler_317929 in cell_1_internal_combined = 0;
  species enzyme_yahk_ATP_rheostatbiocrnpyler_317929_combined_model_of__biocrnpyler_454852_biocrnpyler_317929 in cell_1_internal_combined = 0.2;
  species molecule_isobutanol_ATP_rheostatbiocrnpyler_317929_combined_model_of__biocrnpyler_454852_biocrnpyler_317929 in cell_1_internal_combined = 0;
  species complex_enzyme_yahk_metabolite_nadph_molecule_isobutanal_ATP_rheostatbiocrnpyler_317929_combined_model_of__biocrnpyler_454852_biocrnpyler_317929 in cell_1_internal_combined = 0;
  species complex_enzyme_yahk_metabolite_nadp_molecule_isobutanol_ATP_rheostatbiocrnpyler_317929_combined_model_of__biocrnpyler_454852_biocrnpyler_317929 in cell_1_internal_combined = 0;
  species ssDNA_comp1 in cell_2_internal_combined = 10;
  species dna_f_exsAbiocrnpyler_367767_combined_model_of__biocrnpyler_367767_biocrnpyler_317929 in cell_2_internal_combined = 1;
  species tetR_exsAbiocrnpyler_367767_combined_model_of__biocrnpyler_367767_biocrnpyler_317929 in cell_2_internal_combined = 10;
  species rna_f_exsAbiocrnpyler_367767_combined_model_of__biocrnpyler_367767_biocrnpyler_317929 in cell_2_internal_combined = 0;
  species exsA_exsAbiocrnpyler_367767_combined_model_of__biocrnpyler_367767_biocrnpyler_317929 in cell_2_internal_combined = 0;
  species atc_i_cell2_1_combined in cell_2_internal_combined = 0;
  species complex_atc_i_cell2_tetR_exsAbiocrnpyler_367767_combined_model_of__biocrnpyler_367767_biocrnpyler_317929 in cell_2_internal_combined = 0;
  species complex_dna_f_tetR_exsAbiocrnpyler_367767_combined_model_of__biocrnpyler_367767_biocrnpyler_317929 in cell_2_internal_combined = 0;
  species complex_atc_i_cell2_dna_f_tetR_exsAbiocrnpyler_367767_combined_model_of__biocrnpyler_367767_biocrnpyler_317929 in cell_2_internal_combined = 0;
  species enzyme_hex_ATP_rheostatbiocrnpyler_317929_combined_model_of__biocrnpyler_367767_biocrnpyler_317929 in cell_2_internal_combined = 0.2;
  species ATP_exsAbiocrnpyler_367767_1_combined_combined_model_of__biocrnpyler_367767_biocrnpyler_317929 in cell_2_internal_combined = 10;
  species molecule_glucose_ATP_rheostatbiocrnpyler_317929_combined_model_of__biocrnpyler_367767_biocrnpyler_317929 in cell_2_internal_combined = 30;
  species molecule_g6p_ATP_rheostatbiocrnpyler_317929_combined_model_of__biocrnpyler_367767_biocrnpyler_317929 in cell_2_internal_combined = 0;
  species ADP_exsAbiocrnpyler_367767_1_combined_combined_model_of__biocrnpyler_367767_biocrnpyler_317929 in cell_2_internal_combined = 0;
  species complex_enzyme_hex_metabolite_atp_molecule_glucose_ATP_rheostatbiocrnpyler_317929_combined_model_of__biocrnpyler_367767_biocrnpyler_317929 in cell_2_internal_combined = 0;
  species complex_enzyme_hex_metabolite_adp_molecule_g6p_ATP_rheostatbiocrnpyler_317929_combined_model_of__biocrnpyler_367767_biocrnpyler_317929 in cell_2_internal_combined = 0;
  species enzyme_pgi_ATP_rheostatbiocrnpyler_317929_combined_model_of__biocrnpyler_367767_biocrnpyler_317929 in cell_2_internal_combined = 0.2;
  species molecule_f6p_ATP_rheostatbiocrnpyler_317929_combined_model_of__biocrnpyler_367767_biocrnpyler_317929 in cell_2_internal_combined = 0;
  species complex_enzyme_pgi_molecule_g6p_ATP_rheostatbiocrnpyler_317929_combined_model_of__biocrnpyler_367767_biocrnpyler_317929 in cell_2_internal_combined = 0;
  species complex_enzyme_pgi_molecule_f6p_ATP_rheostatbiocrnpyler_317929_combined_model_of__biocrnpyler_367767_biocrnpyler_317929 in cell_2_internal_combined = 0;
  species enzyme_pfk_ATP_rheostatbiocrnpyler_317929_combined_model_of__biocrnpyler_367767_biocrnpyler_317929 in cell_2_internal_combined = 0.2;
  species molecule_f16p_ATP_rheostatbiocrnpyler_317929_combined_model_of__biocrnpyler_367767_biocrnpyler_317929 in cell_2_internal_combined = 0;
  species complex_enzyme_pfk_metabolite_atp_molecule_f6p_ATP_rheostatbiocrnpyler_317929_combined_model_of__biocrnpyler_367767_biocrnpyler_317929 in cell_2_internal_combined = 0;
  species complex_enzyme_pfk_metabolite_adp_molecule_f16p_ATP_rheostatbiocrnpyler_317929_combined_model_of__biocrnpyler_367767_biocrnpyler_317929 in cell_2_internal_combined = 0;
  species enzyme_ald_tpi_ATP_rheostatbiocrnpyler_317929_combined_model_of__biocrnpyler_367767_biocrnpyler_317929 in cell_2_internal_combined = 0.2;
  species molecule_g3p_ATP_rheostatbiocrnpyler_317929_combined_model_of__biocrnpyler_367767_biocrnpyler_317929 in cell_2_internal_combined = 0;
  species complex_enzyme_ald_tpi_molecule_f16p_ATP_rheostatbiocrnpyler_317929_combined_model_of__biocrnpyler_367767_biocrnpyler_317929 in cell_2_internal_combined = 0;
  species complex_enzyme_ald_tpi_2x_molecule_g3p_ATP_rheostatbiocrnpyler_317929_combined_model_of__biocrnpyler_367767_biocrnpyler_317929 in cell_2_internal_combined = 0;
  species enzyme_gapN_ATP_rheostatbiocrnpyler_317929_combined_model_of__biocrnpyler_367767_biocrnpyler_317929 in cell_2_internal_combined = 0.2;
  species metabolite_nadp_ATP_rheostatbiocrnpyler_317929_combined_model_of__biocrnpyler_367767_biocrnpyler_317929 in cell_2_internal_combined = 30;
  species molecule_3pg_ATP_rheostatbiocrnpyler_317929_combined_model_of__biocrnpyler_367767_biocrnpyler_317929 in cell_2_internal_combined = 0;
  species metabolite_nadph_ATP_rheostatbiocrnpyler_317929_combined_model_of__biocrnpyler_367767_biocrnpyler_317929 in cell_2_internal_combined = 0;
  species complex_enzyme_gapN_2x_metabolite_nadp_2x_molecule_g3p_ATP_rheostatbiocrnpyler_317929_combined_model_of__biocrnpyler_367767_biocrnpyler_317929 in cell_2_internal_combined = 0;
  species complex_enzyme_gapN_2x_metabolite_nadph_2x_molecule_3pg_ATP_rheostatbiocrnpyler_317929_combined_model_of__biocrnpyler_367767_biocrnpyler_317929 in cell_2_internal_combined = 0;
  species enzyme_mGapDH_ATP_rheostatbiocrnpyler_317929_combined_model_of__biocrnpyler_367767_biocrnpyler_317929 in cell_2_internal_combined = 0.2;
  species P_exsAbiocrnpyler_367767_1_combined_combined_model_of__biocrnpyler_367767_biocrnpyler_317929 in cell_2_internal_combined = 30;
  species molecule_13bpg_ATP_rheostatbiocrnpyler_317929_combined_model_of__biocrnpyler_367767_biocrnpyler_317929 in cell_2_internal_combined = 0;
  species complex_enzyme_mGapDH_2x_metabolite_nadp_metabolite_pi_2x_molecule_g3p_ATP_rheostatbiocrnpyler_317929_combined_model_of__biocrnpyler_367767_biocrnpyler_317929 in cell_2_internal_combined = 0;
  species complex_enzyme_mGapDH_2x_metabolite_nadph_molecule_13bpg_ATP_rheostatbiocrnpyler_317929_combined_model_of__biocrnpyler_367767_biocrnpyler_317929 in cell_2_internal_combined = 0;
  species enzyme_pgk_ATP_rheostatbiocrnpyler_317929_combined_model_of__biocrnpyler_367767_biocrnpyler_317929 in cell_2_internal_combined = 0.2;
  species complex_enzyme_pgk_metabolite_adp_molecule_13bpg_ATP_rheostatbiocrnpyler_317929_combined_model_of__biocrnpyler_367767_biocrnpyler_317929 in cell_2_internal_combined = 0;
  species complex_enzyme_pgk_metabolite_atp_2x_molecule_3pg_ATP_rheostatbiocrnpyler_317929_combined_model_of__biocrnpyler_367767_biocrnpyler_317929 in cell_2_internal_combined = 0;
  species enzyme_pgm_ATP_rheostatbiocrnpyler_317929_combined_model_of__biocrnpyler_367767_biocrnpyler_317929 in cell_2_internal_combined = 0.2;
  species molecule_2pg_ATP_rheostatbiocrnpyler_317929_combined_model_of__biocrnpyler_367767_biocrnpyler_317929 in cell_2_internal_combined = 0;
  species complex_enzyme_pgm_2x_molecule_3pg_ATP_rheostatbiocrnpyler_317929_combined_model_of__biocrnpyler_367767_biocrnpyler_317929 in cell_2_internal_combined = 0;
  species complex_enzyme_pgm_2x_molecule_2pg_ATP_rheostatbiocrnpyler_317929_combined_model_of__biocrnpyler_367767_biocrnpyler_317929 in cell_2_internal_combined = 0;
  species enzyme_eno_ATP_rheostatbiocrnpyler_317929_combined_model_of__biocrnpyler_367767_biocrnpyler_317929 in cell_2_internal_combined = 0.2;
  species molecule_pep_ATP_rheostatbiocrnpyler_317929_combined_model_of__biocrnpyler_367767_biocrnpyler_317929 in cell_2_internal_combined = 0;
  species complex_enzyme_eno_2x_molecule_2pg_ATP_rheostatbiocrnpyler_317929_combined_model_of__biocrnpyler_367767_biocrnpyler_317929 in cell_2_internal_combined = 0;
  species complex_enzyme_eno_2x_molecule_pep_ATP_rheostatbiocrnpyler_317929_combined_model_of__biocrnpyler_367767_biocrnpyler_317929 in cell_2_internal_combined = 0;
  species enzyme_pyk_ATP_rheostatbiocrnpyler_317929_combined_model_of__biocrnpyler_367767_biocrnpyler_317929 in cell_2_internal_combined = 0.2;
  species molecule_pyruvate_ATP_rheostatbiocrnpyler_317929_combined_model_of__biocrnpyler_367767_biocrnpyler_317929 in cell_2_internal_combined = 0;
  species complex_enzyme_pyk_2x_metabolite_adp_2x_molecule_pep_ATP_rheostatbiocrnpyler_317929_combined_model_of__biocrnpyler_367767_biocrnpyler_317929 in cell_2_internal_combined = 0;
  species complex_enzyme_pyk_2x_metabolite_atp_2x_molecule_pyruvate_ATP_rheostatbiocrnpyler_317929_combined_model_of__biocrnpyler_367767_biocrnpyler_317929 in cell_2_internal_combined = 0;
  species enzyme_alsS_ATP_rheostatbiocrnpyler_317929_combined_model_of__biocrnpyler_367767_biocrnpyler_317929 in cell_2_internal_combined = 0.2;
  species molecule_acetolac_ATP_rheostatbiocrnpyler_317929_combined_model_of__biocrnpyler_367767_biocrnpyler_317929 in cell_2_internal_combined = 0;
  species complex_enzyme_alsS_2x_molecule_pyruvate_ATP_rheostatbiocrnpyler_317929_combined_model_of__biocrnpyler_367767_biocrnpyler_317929 in cell_2_internal_combined = 0;
  species complex_enzyme_alsS_molecule_acetolac_ATP_rheostatbiocrnpyler_317929_combined_model_of__biocrnpyler_367767_biocrnpyler_317929 in cell_2_internal_combined = 0;
  species enzyme_IlvC_ATP_rheostatbiocrnpyler_317929_combined_model_of__biocrnpyler_367767_biocrnpyler_317929 in cell_2_internal_combined = 0.2;
  species molecule_23dih3mebut_ATP_rheostatbiocrnpyler_317929_combined_model_of__biocrnpyler_367767_biocrnpyler_317929 in cell_2_internal_combined = 0;
  species complex_enzyme_IlvC_metabolite_nadph_molecule_acetolac_ATP_rheostatbiocrnpyler_317929_combined_model_of__biocrnpyler_367767_biocrnpyler_317929 in cell_2_internal_combined = 0;
  species complex_enzyme_IlvC_metabolite_nadp_molecule_23dih3mebut_ATP_rheostatbiocrnpyler_317929_combined_model_of__biocrnpyler_367767_biocrnpyler_317929 in cell_2_internal_combined = 0;
  species enzyme_IlvD_ATP_rheostatbiocrnpyler_317929_combined_model_of__biocrnpyler_367767_biocrnpyler_317929 in cell_2_internal_combined = 0.2;
  species molecule_3me2oxo_ATP_rheostatbiocrnpyler_317929_combined_model_of__biocrnpyler_367767_biocrnpyler_317929 in cell_2_internal_combined = 0;
  species complex_enzyme_IlvD_molecule_23dih3mebut_ATP_rheostatbiocrnpyler_317929_combined_model_of__biocrnpyler_367767_biocrnpyler_317929 in cell_2_internal_combined = 0;
  species complex_enzyme_IlvD_molecule_3me2oxo_ATP_rheostatbiocrnpyler_317929_combined_model_of__biocrnpyler_367767_biocrnpyler_317929 in cell_2_internal_combined = 0;
  species enzyme_kivD_ATP_rheostatbiocrnpyler_317929_combined_model_of__biocrnpyler_367767_biocrnpyler_317929 in cell_2_internal_combined = 0.2;
  species molecule_isobutanal_ATP_rheostatbiocrnpyler_317929_combined_model_of__biocrnpyler_367767_biocrnpyler_317929 in cell_2_internal_combined = 0;
  species complex_enzyme_kivD_molecule_3me2oxo_ATP_rheostatbiocrnpyler_317929_combined_model_of__biocrnpyler_367767_biocrnpyler_317929 in cell_2_internal_combined = 0;
  species complex_enzyme_kivD_molecule_isobutanal_ATP_rheostatbiocrnpyler_317929_combined_model_of__biocrnpyler_367767_biocrnpyler_317929 in cell_2_internal_combined = 0;
  species enzyme_yahk_ATP_rheostatbiocrnpyler_317929_combined_model_of__biocrnpyler_367767_biocrnpyler_317929 in cell_2_internal_combined = 0.2;
  species molecule_isobutanol_ATP_rheostatbiocrnpyler_317929_combined_model_of__biocrnpyler_367767_biocrnpyler_317929 in cell_2_internal_combined = 0;
  species complex_enzyme_yahk_metabolite_nadph_molecule_isobutanal_ATP_rheostatbiocrnpyler_317929_combined_model_of__biocrnpyler_367767_biocrnpyler_317929 in cell_2_internal_combined = 0;
  species complex_enzyme_yahk_metabolite_nadp_molecule_isobutanol_ATP_rheostatbiocrnpyler_317929_combined_model_of__biocrnpyler_367767_biocrnpyler_317929 in cell_2_internal_combined = 0;
  species atc_i_cell3 in cell_3_internal_combined = 0;
  species ssDNA_comp2 in cell_3_internal_combined = 10;
  species dna_h_gfpbiocrnpyler_798952_combined_model_of__biocrnpyler_798952_biocrnpyler_317929 in cell_3_internal_combined = 1;
  species rna_h_gfpbiocrnpyler_798952_combined_model_of__biocrnpyler_798952_biocrnpyler_317929 in cell_3_internal_combined = 0;
  species exsA_gfpbiocrnpyler_798952_combined_model_of__biocrnpyler_798952_biocrnpyler_317929 in cell_3_internal_combined = 0;
  species complex_dna_h_exsA_gfpbiocrnpyler_798952_combined_model_of__biocrnpyler_798952_biocrnpyler_317929 in cell_3_internal_combined = 0;
  species gfp_gfpbiocrnpyler_798952_combined_model_of__biocrnpyler_798952_biocrnpyler_317929 in cell_3_internal_combined = 0;
  species enzyme_hex_ATP_rheostatbiocrnpyler_317929_combined_model_of__biocrnpyler_798952_biocrnpyler_317929 in cell_3_internal_combined = 0.2;
  species ATP_gfpbiocrnpyler_798952_1_combined_combined_model_of__biocrnpyler_798952_biocrnpyler_317929 in cell_3_internal_combined = 15;
  species molecule_glucose_ATP_rheostatbiocrnpyler_317929_combined_model_of__biocrnpyler_798952_biocrnpyler_317929 in cell_3_internal_combined = 30;
  species molecule_g6p_ATP_rheostatbiocrnpyler_317929_combined_model_of__biocrnpyler_798952_biocrnpyler_317929 in cell_3_internal_combined = 0;
  species ADP_gfpbiocrnpyler_798952_1_combined_combined_model_of__biocrnpyler_798952_biocrnpyler_317929 in cell_3_internal_combined = 0;
  species complex_enzyme_hex_metabolite_atp_molecule_glucose_ATP_rheostatbiocrnpyler_317929_combined_model_of__biocrnpyler_798952_biocrnpyler_317929 in cell_3_internal_combined = 0;
  species complex_enzyme_hex_metabolite_adp_molecule_g6p_ATP_rheostatbiocrnpyler_317929_combined_model_of__biocrnpyler_798952_biocrnpyler_317929 in cell_3_internal_combined = 0;
  species enzyme_pgi_ATP_rheostatbiocrnpyler_317929_combined_model_of__biocrnpyler_798952_biocrnpyler_317929 in cell_3_internal_combined = 0.2;
  species molecule_f6p_ATP_rheostatbiocrnpyler_317929_combined_model_of__biocrnpyler_798952_biocrnpyler_317929 in cell_3_internal_combined = 0;
  species complex_enzyme_pgi_molecule_g6p_ATP_rheostatbiocrnpyler_317929_combined_model_of__biocrnpyler_798952_biocrnpyler_317929 in cell_3_internal_combined = 0;
  species complex_enzyme_pgi_molecule_f6p_ATP_rheostatbiocrnpyler_317929_combined_model_of__biocrnpyler_798952_biocrnpyler_317929 in cell_3_internal_combined = 0;
  species enzyme_pfk_ATP_rheostatbiocrnpyler_317929_combined_model_of__biocrnpyler_798952_biocrnpyler_317929 in cell_3_internal_combined = 0.2;
  species molecule_f16p_ATP_rheostatbiocrnpyler_317929_combined_model_of__biocrnpyler_798952_biocrnpyler_317929 in cell_3_internal_combined = 0;
  species complex_enzyme_pfk_metabolite_atp_molecule_f6p_ATP_rheostatbiocrnpyler_317929_combined_model_of__biocrnpyler_798952_biocrnpyler_317929 in cell_3_internal_combined = 0;
  species complex_enzyme_pfk_metabolite_adp_molecule_f16p_ATP_rheostatbiocrnpyler_317929_combined_model_of__biocrnpyler_798952_biocrnpyler_317929 in cell_3_internal_combined = 0;
  species enzyme_ald_tpi_ATP_rheostatbiocrnpyler_317929_combined_model_of__biocrnpyler_798952_biocrnpyler_317929 in cell_3_internal_combined = 0.2;
  species molecule_g3p_ATP_rheostatbiocrnpyler_317929_combined_model_of__biocrnpyler_798952_biocrnpyler_317929 in cell_3_internal_combined = 0;
  species complex_enzyme_ald_tpi_molecule_f16p_ATP_rheostatbiocrnpyler_317929_combined_model_of__biocrnpyler_798952_biocrnpyler_317929 in cell_3_internal_combined = 0;
  species complex_enzyme_ald_tpi_2x_molecule_g3p_ATP_rheostatbiocrnpyler_317929_combined_model_of__biocrnpyler_798952_biocrnpyler_317929 in cell_3_internal_combined = 0;
  species enzyme_gapN_ATP_rheostatbiocrnpyler_317929_combined_model_of__biocrnpyler_798952_biocrnpyler_317929 in cell_3_internal_combined = 0.2;
  species metabolite_nadp_ATP_rheostatbiocrnpyler_317929_combined_model_of__biocrnpyler_798952_biocrnpyler_317929 in cell_3_internal_combined = 30;
  species molecule_3pg_ATP_rheostatbiocrnpyler_317929_combined_model_of__biocrnpyler_798952_biocrnpyler_317929 in cell_3_internal_combined = 0;
  species metabolite_nadph_ATP_rheostatbiocrnpyler_317929_combined_model_of__biocrnpyler_798952_biocrnpyler_317929 in cell_3_internal_combined = 0;
  species complex_enzyme_gapN_2x_metabolite_nadp_2x_molecule_g3p_ATP_rheostatbiocrnpyler_317929_combined_model_of__biocrnpyler_798952_biocrnpyler_317929 in cell_3_internal_combined = 0;
  species complex_enzyme_gapN_2x_metabolite_nadph_2x_molecule_3pg_ATP_rheostatbiocrnpyler_317929_combined_model_of__biocrnpyler_798952_biocrnpyler_317929 in cell_3_internal_combined = 0;
  species enzyme_mGapDH_ATP_rheostatbiocrnpyler_317929_combined_model_of__biocrnpyler_798952_biocrnpyler_317929 in cell_3_internal_combined = 0.2;
  species P_gfpbiocrnpyler_798952_1_combined_combined_model_of__biocrnpyler_798952_biocrnpyler_317929 in cell_3_internal_combined = 30;
  species molecule_13bpg_ATP_rheostatbiocrnpyler_317929_combined_model_of__biocrnpyler_798952_biocrnpyler_317929 in cell_3_internal_combined = 0;
  species complex_enzyme_mGapDH_2x_metabolite_nadp_metabolite_pi_2x_molecule_g3p_ATP_rheostatbiocrnpyler_317929_combined_model_of__biocrnpyler_798952_biocrnpyler_317929 in cell_3_internal_combined = 0;
  species complex_enzyme_mGapDH_2x_metabolite_nadph_molecule_13bpg_ATP_rheostatbiocrnpyler_317929_combined_model_of__biocrnpyler_798952_biocrnpyler_317929 in cell_3_internal_combined = 0;
  species enzyme_pgk_ATP_rheostatbiocrnpyler_317929_combined_model_of__biocrnpyler_798952_biocrnpyler_317929 in cell_3_internal_combined = 0.2;
  species complex_enzyme_pgk_metabolite_adp_molecule_13bpg_ATP_rheostatbiocrnpyler_317929_combined_model_of__biocrnpyler_798952_biocrnpyler_317929 in cell_3_internal_combined = 0;
  species complex_enzyme_pgk_metabolite_atp_2x_molecule_3pg_ATP_rheostatbiocrnpyler_317929_combined_model_of__biocrnpyler_798952_biocrnpyler_317929 in cell_3_internal_combined = 0;
  species enzyme_pgm_ATP_rheostatbiocrnpyler_317929_combined_model_of__biocrnpyler_798952_biocrnpyler_317929 in cell_3_internal_combined = 0.2;
  species molecule_2pg_ATP_rheostatbiocrnpyler_317929_combined_model_of__biocrnpyler_798952_biocrnpyler_317929 in cell_3_internal_combined = 0;
  species complex_enzyme_pgm_2x_molecule_3pg_ATP_rheostatbiocrnpyler_317929_combined_model_of__biocrnpyler_798952_biocrnpyler_317929 in cell_3_internal_combined = 0;
  species complex_enzyme_pgm_2x_molecule_2pg_ATP_rheostatbiocrnpyler_317929_combined_model_of__biocrnpyler_798952_biocrnpyler_317929 in cell_3_internal_combined = 0;
  species enzyme_eno_ATP_rheostatbiocrnpyler_317929_combined_model_of__biocrnpyler_798952_biocrnpyler_317929 in cell_3_internal_combined = 0.2;
  species molecule_pep_ATP_rheostatbiocrnpyler_317929_combined_model_of__biocrnpyler_798952_biocrnpyler_317929 in cell_3_internal_combined = 0;
  species complex_enzyme_eno_2x_molecule_2pg_ATP_rheostatbiocrnpyler_317929_combined_model_of__biocrnpyler_798952_biocrnpyler_317929 in cell_3_internal_combined = 0;
  species complex_enzyme_eno_2x_molecule_pep_ATP_rheostatbiocrnpyler_317929_combined_model_of__biocrnpyler_798952_biocrnpyler_317929 in cell_3_internal_combined = 0;
  species enzyme_pyk_ATP_rheostatbiocrnpyler_317929_combined_model_of__biocrnpyler_798952_biocrnpyler_317929 in cell_3_internal_combined = 0.2;
  species molecule_pyruvate_ATP_rheostatbiocrnpyler_317929_combined_model_of__biocrnpyler_798952_biocrnpyler_317929 in cell_3_internal_combined = 0;
  species complex_enzyme_pyk_2x_metabolite_adp_2x_molecule_pep_ATP_rheostatbiocrnpyler_317929_combined_model_of__biocrnpyler_798952_biocrnpyler_317929 in cell_3_internal_combined = 0;
  species complex_enzyme_pyk_2x_metabolite_atp_2x_molecule_pyruvate_ATP_rheostatbiocrnpyler_317929_combined_model_of__biocrnpyler_798952_biocrnpyler_317929 in cell_3_internal_combined = 0;
  species enzyme_alsS_ATP_rheostatbiocrnpyler_317929_combined_model_of__biocrnpyler_798952_biocrnpyler_317929 in cell_3_internal_combined = 0.2;
  species molecule_acetolac_ATP_rheostatbiocrnpyler_317929_combined_model_of__biocrnpyler_798952_biocrnpyler_317929 in cell_3_internal_combined = 0;
  species complex_enzyme_alsS_2x_molecule_pyruvate_ATP_rheostatbiocrnpyler_317929_combined_model_of__biocrnpyler_798952_biocrnpyler_317929 in cell_3_internal_combined = 0;
  species complex_enzyme_alsS_molecule_acetolac_ATP_rheostatbiocrnpyler_317929_combined_model_of__biocrnpyler_798952_biocrnpyler_317929 in cell_3_internal_combined = 0;
  species enzyme_IlvC_ATP_rheostatbiocrnpyler_317929_combined_model_of__biocrnpyler_798952_biocrnpyler_317929 in cell_3_internal_combined = 0.2;
  species molecule_23dih3mebut_ATP_rheostatbiocrnpyler_317929_combined_model_of__biocrnpyler_798952_biocrnpyler_317929 in cell_3_internal_combined = 0;
  species complex_enzyme_IlvC_metabolite_nadph_molecule_acetolac_ATP_rheostatbiocrnpyler_317929_combined_model_of__biocrnpyler_798952_biocrnpyler_317929 in cell_3_internal_combined = 0;
  species complex_enzyme_IlvC_metabolite_nadp_molecule_23dih3mebut_ATP_rheostatbiocrnpyler_317929_combined_model_of__biocrnpyler_798952_biocrnpyler_317929 in cell_3_internal_combined = 0;
  species enzyme_IlvD_ATP_rheostatbiocrnpyler_317929_combined_model_of__biocrnpyler_798952_biocrnpyler_317929 in cell_3_internal_combined = 0.2;
  species molecule_3me2oxo_ATP_rheostatbiocrnpyler_317929_combined_model_of__biocrnpyler_798952_biocrnpyler_317929 in cell_3_internal_combined = 0;
  species complex_enzyme_IlvD_molecule_23dih3mebut_ATP_rheostatbiocrnpyler_317929_combined_model_of__biocrnpyler_798952_biocrnpyler_317929 in cell_3_internal_combined = 0;
  species complex_enzyme_IlvD_molecule_3me2oxo_ATP_rheostatbiocrnpyler_317929_combined_model_of__biocrnpyler_798952_biocrnpyler_317929 in cell_3_internal_combined = 0;
  species enzyme_kivD_ATP_rheostatbiocrnpyler_317929_combined_model_of__biocrnpyler_798952_biocrnpyler_317929 in cell_3_internal_combined = 0.2;
  species molecule_isobutanal_ATP_rheostatbiocrnpyler_317929_combined_model_of__biocrnpyler_798952_biocrnpyler_317929 in cell_3_internal_combined = 0;
  species complex_enzyme_kivD_molecule_3me2oxo_ATP_rheostatbiocrnpyler_317929_combined_model_of__biocrnpyler_798952_biocrnpyler_317929 in cell_3_internal_combined = 0;
  species complex_enzyme_kivD_molecule_isobutanal_ATP_rheostatbiocrnpyler_317929_combined_model_of__biocrnpyler_798952_biocrnpyler_317929 in cell_3_internal_combined = 0;
  species enzyme_yahk_ATP_rheostatbiocrnpyler_317929_combined_model_of__biocrnpyler_798952_biocrnpyler_317929 in cell_3_internal_combined = 0.2;
  species molecule_isobutanol_ATP_rheostatbiocrnpyler_317929_combined_model_of__biocrnpyler_798952_biocrnpyler_317929 in cell_3_internal_combined = 0;
  species complex_enzyme_yahk_metabolite_nadph_molecule_isobutanal_ATP_rheostatbiocrnpyler_317929_combined_model_of__biocrnpyler_798952_biocrnpyler_317929 in cell_3_internal_combined = 0;
  species complex_enzyme_yahk_metabolite_nadp_molecule_isobutanol_ATP_rheostatbiocrnpyler_317929_combined_model_of__biocrnpyler_798952_biocrnpyler_317929 in cell_3_internal_combined = 0;
  species atc_e_external_reservoir_model_1_combined_1_combined in cell_external = 10000;
  species dsDNA in cell_external_combined = 0;

  // Parameters:
  kb1 = 0.004 per_second;
  kd1 = 1e-5 per_second;
  kd2 = 0.0025 per_second;
  kb_combined = 0.002 per_second;
  kd_combined = 1e-5 per_second;
  kf = 100 per_second;
  kre = 1e-7 per_second;

  // Reactions:
  r1_cell1: atc_e_external_reservoir_model_1_combined_1_combined -> atc_i_1_combined; kb_combined*atc_e_external_reservoir_model_1_combined_1_combined - kd_combined*atc_i_1_combined;
  R1: VirE2_b_1_combined + ssDNA -> VirE2_b_ssDNA; kb1*VirE2_b_1_combined*ssDNA - kd1*VirE2_b_ssDNA;
  R2: VirE2_b_ssDNA => ssDNA_e + VirE2_b_1_combined; kd2*VirE2_b_ssDNA;
  r0_virE2biocrnpyler_454852_combined_model_of__biocrnpyler_454852_biocrnpyler_317929: atc_i_1_combined + tetR_virE2biocrnpyler_454852_combined_model_of__biocrnpyler_454852_biocrnpyler_317929 => complex_atc_i_tetR_virE2biocrnpyler_454852_combined_model_of__biocrnpyler_454852_biocrnpyler_317929; r0_virE2biocrnpyler_454852_combined_model_of__biocrnpyler_454852_biocrnpyler_317929_k*atc_i_1_combined*tetR_virE2biocrnpyler_454852_combined_model_of__biocrnpyler_454852_biocrnpyler_317929;
    r0_virE2biocrnpyler_454852_combined_model_of__biocrnpyler_454852_biocrnpyler_317929_k = 0.0002;
  r0_1_virE2biocrnpyler_454852_combined_model_of__biocrnpyler_454852_biocrnpyler_317929: complex_atc_i_tetR_virE2biocrnpyler_454852_combined_model_of__biocrnpyler_454852_biocrnpyler_317929 => atc_i_1_combined + tetR_virE2biocrnpyler_454852_combined_model_of__biocrnpyler_454852_biocrnpyler_317929; r0_1_virE2biocrnpyler_454852_combined_model_of__biocrnpyler_454852_biocrnpyler_317929_k*complex_atc_i_tetR_virE2biocrnpyler_454852_combined_model_of__biocrnpyler_454852_biocrnpyler_317929;
    r0_1_virE2biocrnpyler_454852_combined_model_of__biocrnpyler_454852_biocrnpyler_317929_k = 2e-9;
  r2_virE2biocrnpyler_454852_combined_model_of__biocrnpyler_454852_biocrnpyler_317929: dna_g_virE2biocrnpyler_454852_combined_model_of__biocrnpyler_454852_biocrnpyler_317929 + tetR_virE2biocrnpyler_454852_combined_model_of__biocrnpyler_454852_biocrnpyler_317929 => complex_dna_g_tetR_virE2biocrnpyler_454852_combined_model_of__biocrnpyler_454852_biocrnpyler_317929; r2_virE2biocrnpyler_454852_combined_model_of__biocrnpyler_454852_biocrnpyler_317929_k*dna_g_virE2biocrnpyler_454852_combined_model_of__biocrnpyler_454852_biocrnpyler_317929*tetR_virE2biocrnpyler_454852_combined_model_of__biocrnpyler_454852_biocrnpyler_317929;
    r2_virE2biocrnpyler_454852_combined_model_of__biocrnpyler_454852_biocrnpyler_317929_k = 4e-5;
  r2_1_virE2biocrnpyler_454852_combined_model_of__biocrnpyler_454852_biocrnpyler_317929: complex_dna_g_tetR_virE2biocrnpyler_454852_combined_model_of__biocrnpyler_454852_biocrnpyler_317929 => dna_g_virE2biocrnpyler_454852_combined_model_of__biocrnpyler_454852_biocrnpyler_317929 + tetR_virE2biocrnpyler_454852_combined_model_of__biocrnpyler_454852_biocrnpyler_317929; r2_1_virE2biocrnpyler_454852_combined_model_of__biocrnpyler_454852_biocrnpyler_317929_k*complex_dna_g_tetR_virE2biocrnpyler_454852_combined_model_of__biocrnpyler_454852_biocrnpyler_317929;
    r2_1_virE2biocrnpyler_454852_combined_model_of__biocrnpyler_454852_biocrnpyler_317929_k = 1e-12;
  r4_virE2biocrnpyler_454852_combined_model_of__biocrnpyler_454852_biocrnpyler_317929: complex_dna_g_tetR_virE2biocrnpyler_454852_combined_model_of__biocrnpyler_454852_biocrnpyler_317929 + atc_i_1_combined => complex_atc_i_dna_g_tetR_virE2biocrnpyler_454852_combined_model_of__biocrnpyler_454852_biocrnpyler_317929; r4_virE2biocrnpyler_454852_combined_model_of__biocrnpyler_454852_biocrnpyler_317929_k*complex_dna_g_tetR_virE2biocrnpyler_454852_combined_model_of__biocrnpyler_454852_biocrnpyler_317929*atc_i_1_combined;
    r4_virE2biocrnpyler_454852_combined_model_of__biocrnpyler_454852_biocrnpyler_317929_k = 6e-6;
  r4_1_virE2biocrnpyler_454852_combined_model_of__biocrnpyler_454852_biocrnpyler_317929: complex_atc_i_dna_g_tetR_virE2biocrnpyler_454852_combined_model_of__biocrnpyler_454852_biocrnpyler_317929 => complex_dna_g_tetR_virE2biocrnpyler_454852_combined_model_of__biocrnpyler_454852_biocrnpyler_317929 + atc_i_1_combined; r4_1_virE2biocrnpyler_454852_combined_model_of__biocrnpyler_454852_biocrnpyler_317929_k*complex_atc_i_dna_g_tetR_virE2biocrnpyler_454852_combined_model_of__biocrnpyler_454852_biocrnpyler_317929;
    r4_1_virE2biocrnpyler_454852_combined_model_of__biocrnpyler_454852_biocrnpyler_317929_k = 3e-9;
  r6_virE2biocrnpyler_454852_combined_model_of__biocrnpyler_454852_biocrnpyler_317929: complex_atc_i_dna_g_tetR_virE2biocrnpyler_454852_combined_model_of__biocrnpyler_454852_biocrnpyler_317929 => dna_g_virE2biocrnpyler_454852_combined_model_of__biocrnpyler_454852_biocrnpyler_317929 + complex_atc_i_tetR_virE2biocrnpyler_454852_combined_model_of__biocrnpyler_454852_biocrnpyler_317929; r6_virE2biocrnpyler_454852_combined_model_of__biocrnpyler_454852_biocrnpyler_317929_k*complex_atc_i_dna_g_tetR_virE2biocrnpyler_454852_combined_model_of__biocrnpyler_454852_biocrnpyler_317929;
    r6_virE2biocrnpyler_454852_combined_model_of__biocrnpyler_454852_biocrnpyler_317929_k = 0.005;
  r6_1_virE2biocrnpyler_454852_combined_model_of__biocrnpyler_454852_biocrnpyler_317929: dna_g_virE2biocrnpyler_454852_combined_model_of__biocrnpyler_454852_biocrnpyler_317929 + complex_atc_i_tetR_virE2biocrnpyler_454852_combined_model_of__biocrnpyler_454852_biocrnpyler_317929 => complex_atc_i_dna_g_tetR_virE2biocrnpyler_454852_combined_model_of__biocrnpyler_454852_biocrnpyler_317929; r6_1_virE2biocrnpyler_454852_combined_model_of__biocrnpyler_454852_biocrnpyler_317929_k*dna_g_virE2biocrnpyler_454852_combined_model_of__biocrnpyler_454852_biocrnpyler_317929*complex_atc_i_tetR_virE2biocrnpyler_454852_combined_model_of__biocrnpyler_454852_biocrnpyler_317929;
    r6_1_virE2biocrnpyler_454852_combined_model_of__biocrnpyler_454852_biocrnpyler_317929_k = 1e-10;
  r8_virE2biocrnpyler_454852_combined_model_of__biocrnpyler_454852_biocrnpyler_317929: dna_g_virE2biocrnpyler_454852_combined_model_of__biocrnpyler_454852_biocrnpyler_317929 => dna_g_virE2biocrnpyler_454852_combined_model_of__biocrnpyler_454852_biocrnpyler_317929 + rna_g_virE2biocrnpyler_454852_combined_model_of__biocrnpyler_454852_biocrnpyler_317929; r8_virE2biocrnpyler_454852_combined_model_of__biocrnpyler_454852_biocrnpyler_317929_k*dna_g_virE2biocrnpyler_454852_combined_model_of__biocrnpyler_454852_biocrnpyler_317929;
    r8_virE2biocrnpyler_454852_combined_model_of__biocrnpyler_454852_biocrnpyler_317929_k = 0.0031875;
  r9_virE2biocrnpyler_454852_combined_model_of__biocrnpyler_454852_biocrnpyler_317929: rna_g_virE2biocrnpyler_454852_combined_model_of__biocrnpyler_454852_biocrnpyler_317929 + ATP_virE2biocrnpyler_454852_1_combined_combined_model_of__biocrnpyler_454852_biocrnpyler_317929 => rna_g_virE2biocrnpyler_454852_combined_model_of__biocrnpyler_454852_biocrnpyler_317929 + ADP_virE2biocrnpyler_454852_1_combined_combined_model_of__biocrnpyler_454852_biocrnpyler_317929 + VirE2_f_virE2biocrnpyler_454852_combined_model_of__biocrnpyler_454852_biocrnpyler_317929 + P_virE2biocrnpyler_454852_1_combined_combined_model_of__biocrnpyler_454852_biocrnpyler_317929; r9_virE2biocrnpyler_454852_combined_model_of__biocrnpyler_454852_biocrnpyler_317929_k*rna_g_virE2biocrnpyler_454852_combined_model_of__biocrnpyler_454852_biocrnpyler_317929*ATP_virE2biocrnpyler_454852_1_combined_combined_model_of__biocrnpyler_454852_biocrnpyler_317929^r9_virE2biocrnpyler_454852_combined_model_of__biocrnpyler_454852_biocrnpyler_317929_n/(ATP_virE2biocrnpyler_454852_1_combined_combined_model_of__biocrnpyler_454852_biocrnpyler_317929^r9_virE2biocrnpyler_454852_combined_model_of__biocrnpyler_454852_biocrnpyler_317929_n + r9_virE2biocrnpyler_454852_combined_model_of__biocrnpyler_454852_biocrnpyler_317929_K);
    r9_virE2biocrnpyler_454852_combined_model_of__biocrnpyler_454852_biocrnpyler_317929_k = 0.001; r9_virE2biocrnpyler_454852_combined_model_of__biocrnpyler_454852_biocrnpyler_317929_n = 1; r9_virE2biocrnpyler_454852_combined_model_of__biocrnpyler_454852_biocrnpyler_317929_K = 1;
  r10_virE2biocrnpyler_454852_combined_model_of__biocrnpyler_454852_biocrnpyler_317929: VirE2_f_virE2biocrnpyler_454852_combined_model_of__biocrnpyler_454852_biocrnpyler_317929 => VirE2_b_1_combined; r10_virE2biocrnpyler_454852_combined_model_of__biocrnpyler_454852_biocrnpyler_317929_k*VirE2_f_virE2biocrnpyler_454852_combined_model_of__biocrnpyler_454852_biocrnpyler_317929;
    r10_virE2biocrnpyler_454852_combined_model_of__biocrnpyler_454852_biocrnpyler_317929_k = 5e-5;
  r10_1_virE2biocrnpyler_454852_combined_model_of__biocrnpyler_454852_biocrnpyler_317929: VirE2_b_1_combined => VirE2_f_virE2biocrnpyler_454852_combined_model_of__biocrnpyler_454852_biocrnpyler_317929; r10_1_virE2biocrnpyler_454852_combined_model_of__biocrnpyler_454852_biocrnpyler_317929_k*VirE2_b_1_combined;
    r10_1_virE2biocrnpyler_454852_combined_model_of__biocrnpyler_454852_biocrnpyler_317929_k = 1e-10;
  r12_virE2biocrnpyler_454852_combined_model_of__biocrnpyler_454852_biocrnpyler_317929: rna_g_virE2biocrnpyler_454852_combined_model_of__biocrnpyler_454852_biocrnpyler_317929 => ; r12_virE2biocrnpyler_454852_combined_model_of__biocrnpyler_454852_biocrnpyler_317929_k*rna_g_virE2biocrnpyler_454852_combined_model_of__biocrnpyler_454852_biocrnpyler_317929;
    r12_virE2biocrnpyler_454852_combined_model_of__biocrnpyler_454852_biocrnpyler_317929_k = 0.001;
  r13_virE2biocrnpyler_454852_combined_model_of__biocrnpyler_454852_biocrnpyler_317929: VirE2_f_virE2biocrnpyler_454852_combined_model_of__biocrnpyler_454852_biocrnpyler_317929 => ; r13_virE2biocrnpyler_454852_combined_model_of__biocrnpyler_454852_biocrnpyler_317929_k*VirE2_f_virE2biocrnpyler_454852_combined_model_of__biocrnpyler_454852_biocrnpyler_317929;
    r13_virE2biocrnpyler_454852_combined_model_of__biocrnpyler_454852_biocrnpyler_317929_k = 1e-5;
  r0_ATP_rheostatbiocrnpyler_317929_combined_model_of__biocrnpyler_454852_biocrnpyler_317929_combined: enzyme_hex_ATP_rheostatbiocrnpyler_317929_combined_model_of__biocrnpyler_454852_biocrnpyler_317929 + ATP_virE2biocrnpyler_454852_1_combined_combined_model_of__biocrnpyler_454852_biocrnpyler_317929 + molecule_glucose_ATP_rheostatbiocrnpyler_317929_combined_model_of__biocrnpyler_454852_biocrnpyler_317929 => complex_enzyme_hex_metabolite_atp_molecule_glucose_ATP_rheostatbiocrnpyler_317929_combined_model_of__biocrnpyler_454852_biocrnpyler_317929; r0_ATP_rheostatbiocrnpyler_317929_combined_model_of__biocrnpyler_454852_biocrnpyler_317929_combined_k*enzyme_hex_ATP_rheostatbiocrnpyler_317929_combined_model_of__biocrnpyler_454852_biocrnpyler_317929*ATP_virE2biocrnpyler_454852_1_combined_combined_model_of__biocrnpyler_454852_biocrnpyler_317929*molecule_glucose_ATP_rheostatbiocrnpyler_317929_combined_model_of__biocrnpyler_454852_biocrnpyler_317929;
    r0_ATP_rheostatbiocrnpyler_317929_combined_model_of__biocrnpyler_454852_biocrnpyler_317929_combined_k = 0.03;
  r0_1_ATP_rheostatbiocrnpyler_317929_combined_model_of__biocrnpyler_454852_biocrnpyler_317929_combined: complex_enzyme_hex_metabolite_atp_molecule_glucose_ATP_rheostatbiocrnpyler_317929_combined_model_of__biocrnpyler_454852_biocrnpyler_317929 => enzyme_hex_ATP_rheostatbiocrnpyler_317929_combined_model_of__biocrnpyler_454852_biocrnpyler_317929 + ATP_virE2biocrnpyler_454852_1_combined_combined_model_of__biocrnpyler_454852_biocrnpyler_317929 + molecule_glucose_ATP_rheostatbiocrnpyler_317929_combined_model_of__biocrnpyler_454852_biocrnpyler_317929; r0_1_ATP_rheostatbiocrnpyler_317929_combined_model_of__biocrnpyler_454852_biocrnpyler_317929_combined_k*complex_enzyme_hex_metabolite_atp_molecule_glucose_ATP_rheostatbiocrnpyler_317929_combined_model_of__biocrnpyler_454852_biocrnpyler_317929;
    r0_1_ATP_rheostatbiocrnpyler_317929_combined_model_of__biocrnpyler_454852_biocrnpyler_317929_combined_k = 0.003;
  r2_ATP_rheostatbiocrnpyler_317929_combined_model_of__biocrnpyler_454852_biocrnpyler_317929_combined: complex_enzyme_hex_metabolite_atp_molecule_glucose_ATP_rheostatbiocrnpyler_317929_combined_model_of__biocrnpyler_454852_biocrnpyler_317929 => complex_enzyme_hex_metabolite_adp_molecule_g6p_ATP_rheostatbiocrnpyler_317929_combined_model_of__biocrnpyler_454852_biocrnpyler_317929; r2_ATP_rheostatbiocrnpyler_317929_combined_model_of__biocrnpyler_454852_biocrnpyler_317929_combined_k*complex_enzyme_hex_metabolite_atp_molecule_glucose_ATP_rheostatbiocrnpyler_317929_combined_model_of__biocrnpyler_454852_biocrnpyler_317929;
    r2_ATP_rheostatbiocrnpyler_317929_combined_model_of__biocrnpyler_454852_biocrnpyler_317929_combined_k = 36000;
  r3_ATP_rheostatbiocrnpyler_317929_combined_model_of__biocrnpyler_454852_biocrnpyler_317929_combined: complex_enzyme_hex_metabolite_adp_molecule_g6p_ATP_rheostatbiocrnpyler_317929_combined_model_of__biocrnpyler_454852_biocrnpyler_317929 => enzyme_hex_ATP_rheostatbiocrnpyler_317929_combined_model_of__biocrnpyler_454852_biocrnpyler_317929 + molecule_g6p_ATP_rheostatbiocrnpyler_317929_combined_model_of__biocrnpyler_454852_biocrnpyler_317929 + ADP_virE2biocrnpyler_454852_1_combined_combined_model_of__biocrnpyler_454852_biocrnpyler_317929; r3_ATP_rheostatbiocrnpyler_317929_combined_model_of__biocrnpyler_454852_biocrnpyler_317929_combined_k*complex_enzyme_hex_metabolite_adp_molecule_g6p_ATP_rheostatbiocrnpyler_317929_combined_model_of__biocrnpyler_454852_biocrnpyler_317929;
    r3_ATP_rheostatbiocrnpyler_317929_combined_model_of__biocrnpyler_454852_biocrnpyler_317929_combined_k = 0.03;
  r3_1_ATP_rheostatbiocrnpyler_317929_combined_model_of__biocrnpyler_454852_biocrnpyler_317929_combined: enzyme_hex_ATP_rheostatbiocrnpyler_317929_combined_model_of__biocrnpyler_454852_biocrnpyler_317929 + molecule_g6p_ATP_rheostatbiocrnpyler_317929_combined_model_of__biocrnpyler_454852_biocrnpyler_317929 + ADP_virE2biocrnpyler_454852_1_combined_combined_model_of__biocrnpyler_454852_biocrnpyler_317929 => complex_enzyme_hex_metabolite_adp_molecule_g6p_ATP_rheostatbiocrnpyler_317929_combined_model_of__biocrnpyler_454852_biocrnpyler_317929; r3_1_ATP_rheostatbiocrnpyler_317929_combined_model_of__biocrnpyler_454852_biocrnpyler_317929_combined_k*enzyme_hex_ATP_rheostatbiocrnpyler_317929_combined_model_of__biocrnpyler_454852_biocrnpyler_317929*molecule_g6p_ATP_rheostatbiocrnpyler_317929_combined_model_of__biocrnpyler_454852_biocrnpyler_317929*ADP_virE2biocrnpyler_454852_1_combined_combined_model_of__biocrnpyler_454852_biocrnpyler_317929;
    r3_1_ATP_rheostatbiocrnpyler_317929_combined_model_of__biocrnpyler_454852_biocrnpyler_317929_combined_k = 0.003;
  r5_ATP_rheostatbiocrnpyler_317929_combined_model_of__biocrnpyler_454852_biocrnpyler_317929_combined: enzyme_pgi_ATP_rheostatbiocrnpyler_317929_combined_model_of__biocrnpyler_454852_biocrnpyler_317929 + molecule_g6p_ATP_rheostatbiocrnpyler_317929_combined_model_of__biocrnpyler_454852_biocrnpyler_317929 => complex_enzyme_pgi_molecule_g6p_ATP_rheostatbiocrnpyler_317929_combined_model_of__biocrnpyler_454852_biocrnpyler_317929; r5_ATP_rheostatbiocrnpyler_317929_combined_model_of__biocrnpyler_454852_biocrnpyler_317929_combined_k*enzyme_pgi_ATP_rheostatbiocrnpyler_317929_combined_model_of__biocrnpyler_454852_biocrnpyler_317929*molecule_g6p_ATP_rheostatbiocrnpyler_317929_combined_model_of__biocrnpyler_454852_biocrnpyler_317929;
    r5_ATP_rheostatbiocrnpyler_317929_combined_model_of__biocrnpyler_454852_biocrnpyler_317929_combined_k = 0.03;
  r5_1_ATP_rheostatbiocrnpyler_317929_combined_model_of__biocrnpyler_454852_biocrnpyler_317929_combined: complex_enzyme_pgi_molecule_g6p_ATP_rheostatbiocrnpyler_317929_combined_model_of__biocrnpyler_454852_biocrnpyler_317929 => enzyme_pgi_ATP_rheostatbiocrnpyler_317929_combined_model_of__biocrnpyler_454852_biocrnpyler_317929 + molecule_g6p_ATP_rheostatbiocrnpyler_317929_combined_model_of__biocrnpyler_454852_biocrnpyler_317929; r5_1_ATP_rheostatbiocrnpyler_317929_combined_model_of__biocrnpyler_454852_biocrnpyler_317929_combined_k*complex_enzyme_pgi_molecule_g6p_ATP_rheostatbiocrnpyler_317929_combined_model_of__biocrnpyler_454852_biocrnpyler_317929;
    r5_1_ATP_rheostatbiocrnpyler_317929_combined_model_of__biocrnpyler_454852_biocrnpyler_317929_combined_k = 0.003;
  r7_ATP_rheostatbiocrnpyler_317929_combined_model_of__biocrnpyler_454852_biocrnpyler_317929_combined: complex_enzyme_pgi_molecule_g6p_ATP_rheostatbiocrnpyler_317929_combined_model_of__biocrnpyler_454852_biocrnpyler_317929 => complex_enzyme_pgi_molecule_f6p_ATP_rheostatbiocrnpyler_317929_combined_model_of__biocrnpyler_454852_biocrnpyler_317929; r7_ATP_rheostatbiocrnpyler_317929_combined_model_of__biocrnpyler_454852_biocrnpyler_317929_combined_k*complex_enzyme_pgi_molecule_g6p_ATP_rheostatbiocrnpyler_317929_combined_model_of__biocrnpyler_454852_biocrnpyler_317929;
    r7_ATP_rheostatbiocrnpyler_317929_combined_model_of__biocrnpyler_454852_biocrnpyler_317929_combined_k = 36000;
  r8_ATP_rheostatbiocrnpyler_317929_combined_model_of__biocrnpyler_454852_biocrnpyler_317929_combined: complex_enzyme_pgi_molecule_f6p_ATP_rheostatbiocrnpyler_317929_combined_model_of__biocrnpyler_454852_biocrnpyler_317929 => enzyme_pgi_ATP_rheostatbiocrnpyler_317929_combined_model_of__biocrnpyler_454852_biocrnpyler_317929 + molecule_f6p_ATP_rheostatbiocrnpyler_317929_combined_model_of__biocrnpyler_454852_biocrnpyler_317929; r8_ATP_rheostatbiocrnpyler_317929_combined_model_of__biocrnpyler_454852_biocrnpyler_317929_combined_k*complex_enzyme_pgi_molecule_f6p_ATP_rheostatbiocrnpyler_317929_combined_model_of__biocrnpyler_454852_biocrnpyler_317929;
    r8_ATP_rheostatbiocrnpyler_317929_combined_model_of__biocrnpyler_454852_biocrnpyler_317929_combined_k = 0.03;
  r8_1_ATP_rheostatbiocrnpyler_317929_combined_model_of__biocrnpyler_454852_biocrnpyler_317929_combined: enzyme_pgi_ATP_rheostatbiocrnpyler_317929_combined_model_of__biocrnpyler_454852_biocrnpyler_317929 + molecule_f6p_ATP_rheostatbiocrnpyler_317929_combined_model_of__biocrnpyler_454852_biocrnpyler_317929 => complex_enzyme_pgi_molecule_f6p_ATP_rheostatbiocrnpyler_317929_combined_model_of__biocrnpyler_454852_biocrnpyler_317929; r8_1_ATP_rheostatbiocrnpyler_317929_combined_model_of__biocrnpyler_454852_biocrnpyler_317929_combined_k*enzyme_pgi_ATP_rheostatbiocrnpyler_317929_combined_model_of__biocrnpyler_454852_biocrnpyler_317929*molecule_f6p_ATP_rheostatbiocrnpyler_317929_combined_model_of__biocrnpyler_454852_biocrnpyler_317929;
    r8_1_ATP_rheostatbiocrnpyler_317929_combined_model_of__biocrnpyler_454852_biocrnpyler_317929_combined_k = 0.003;
  r10_ATP_rheostatbiocrnpyler_317929_combined_model_of__biocrnpyler_454852_biocrnpyler_317929_combined: enzyme_pfk_ATP_rheostatbiocrnpyler_317929_combined_model_of__biocrnpyler_454852_biocrnpyler_317929 + ATP_virE2biocrnpyler_454852_1_combined_combined_model_of__biocrnpyler_454852_biocrnpyler_317929 + molecule_f6p_ATP_rheostatbiocrnpyler_317929_combined_model_of__biocrnpyler_454852_biocrnpyler_317929 => complex_enzyme_pfk_metabolite_atp_molecule_f6p_ATP_rheostatbiocrnpyler_317929_combined_model_of__biocrnpyler_454852_biocrnpyler_317929; r10_ATP_rheostatbiocrnpyler_317929_combined_model_of__biocrnpyler_454852_biocrnpyler_317929_combined_k*enzyme_pfk_ATP_rheostatbiocrnpyler_317929_combined_model_of__biocrnpyler_454852_biocrnpyler_317929*ATP_virE2biocrnpyler_454852_1_combined_combined_model_of__biocrnpyler_454852_biocrnpyler_317929*molecule_f6p_ATP_rheostatbiocrnpyler_317929_combined_model_of__biocrnpyler_454852_biocrnpyler_317929;
    r10_ATP_rheostatbiocrnpyler_317929_combined_model_of__biocrnpyler_454852_biocrnpyler_317929_combined_k = 0.03;
  r10_1_ATP_rheostatbiocrnpyler_317929_combined_model_of__biocrnpyler_454852_biocrnpyler_317929_combined: complex_enzyme_pfk_metabolite_atp_molecule_f6p_ATP_rheostatbiocrnpyler_317929_combined_model_of__biocrnpyler_454852_biocrnpyler_317929 => enzyme_pfk_ATP_rheostatbiocrnpyler_317929_combined_model_of__biocrnpyler_454852_biocrnpyler_317929 + ATP_virE2biocrnpyler_454852_1_combined_combined_model_of__biocrnpyler_454852_biocrnpyler_317929 + molecule_f6p_ATP_rheostatbiocrnpyler_317929_combined_model_of__biocrnpyler_454852_biocrnpyler_317929; r10_1_ATP_rheostatbiocrnpyler_317929_combined_model_of__biocrnpyler_454852_biocrnpyler_317929_combined_k*complex_enzyme_pfk_metabolite_atp_molecule_f6p_ATP_rheostatbiocrnpyler_317929_combined_model_of__biocrnpyler_454852_biocrnpyler_317929;
    r10_1_ATP_rheostatbiocrnpyler_317929_combined_model_of__biocrnpyler_454852_biocrnpyler_317929_combined_k = 0.003;
  r12_ATP_rheostatbiocrnpyler_317929_combined_model_of__biocrnpyler_454852_biocrnpyler_317929_combined: complex_enzyme_pfk_metabolite_atp_molecule_f6p_ATP_rheostatbiocrnpyler_317929_combined_model_of__biocrnpyler_454852_biocrnpyler_317929 => complex_enzyme_pfk_metabolite_adp_molecule_f16p_ATP_rheostatbiocrnpyler_317929_combined_model_of__biocrnpyler_454852_biocrnpyler_317929; r12_ATP_rheostatbiocrnpyler_317929_combined_model_of__biocrnpyler_454852_biocrnpyler_317929_combined_k*complex_enzyme_pfk_metabolite_atp_molecule_f6p_ATP_rheostatbiocrnpyler_317929_combined_model_of__biocrnpyler_454852_biocrnpyler_317929;
    r12_ATP_rheostatbiocrnpyler_317929_combined_model_of__biocrnpyler_454852_biocrnpyler_317929_combined_k = 36000;
  r13_ATP_rheostatbiocrnpyler_317929_combined_model_of__biocrnpyler_454852_biocrnpyler_317929_combined: complex_enzyme_pfk_metabolite_adp_molecule_f16p_ATP_rheostatbiocrnpyler_317929_combined_model_of__biocrnpyler_454852_biocrnpyler_317929 => enzyme_pfk_ATP_rheostatbiocrnpyler_317929_combined_model_of__biocrnpyler_454852_biocrnpyler_317929 + molecule_f16p_ATP_rheostatbiocrnpyler_317929_combined_model_of__biocrnpyler_454852_biocrnpyler_317929 + ADP_virE2biocrnpyler_454852_1_combined_combined_model_of__biocrnpyler_454852_biocrnpyler_317929; r13_ATP_rheostatbiocrnpyler_317929_combined_model_of__biocrnpyler_454852_biocrnpyler_317929_combined_k*complex_enzyme_pfk_metabolite_adp_molecule_f16p_ATP_rheostatbiocrnpyler_317929_combined_model_of__biocrnpyler_454852_biocrnpyler_317929;
    r13_ATP_rheostatbiocrnpyler_317929_combined_model_of__biocrnpyler_454852_biocrnpyler_317929_combined_k = 0.03;
  r13_1_ATP_rheostatbiocrnpyler_317929_combined_model_of__biocrnpyler_454852_biocrnpyler_317929_combined: enzyme_pfk_ATP_rheostatbiocrnpyler_317929_combined_model_of__biocrnpyler_454852_biocrnpyler_317929 + molecule_f16p_ATP_rheostatbiocrnpyler_317929_combined_model_of__biocrnpyler_454852_biocrnpyler_317929 + ADP_virE2biocrnpyler_454852_1_combined_combined_model_of__biocrnpyler_454852_biocrnpyler_317929 => complex_enzyme_pfk_metabolite_adp_molecule_f16p_ATP_rheostatbiocrnpyler_317929_combined_model_of__biocrnpyler_454852_biocrnpyler_317929; r13_1_ATP_rheostatbiocrnpyler_317929_combined_model_of__biocrnpyler_454852_biocrnpyler_317929_combined_k*enzyme_pfk_ATP_rheostatbiocrnpyler_317929_combined_model_of__biocrnpyler_454852_biocrnpyler_317929*molecule_f16p_ATP_rheostatbiocrnpyler_317929_combined_model_of__biocrnpyler_454852_biocrnpyler_317929*ADP_virE2biocrnpyler_454852_1_combined_combined_model_of__biocrnpyler_454852_biocrnpyler_317929;
    r13_1_ATP_rheostatbiocrnpyler_317929_combined_model_of__biocrnpyler_454852_biocrnpyler_317929_combined_k = 0.003;
  r15_ATP_rheostatbiocrnpyler_317929_combined_model_of__biocrnpyler_454852_biocrnpyler_317929_combined: enzyme_ald_tpi_ATP_rheostatbiocrnpyler_317929_combined_model_of__biocrnpyler_454852_biocrnpyler_317929 + molecule_f16p_ATP_rheostatbiocrnpyler_317929_combined_model_of__biocrnpyler_454852_biocrnpyler_317929 => complex_enzyme_ald_tpi_molecule_f16p_ATP_rheostatbiocrnpyler_317929_combined_model_of__biocrnpyler_454852_biocrnpyler_317929; r15_ATP_rheostatbiocrnpyler_317929_combined_model_of__biocrnpyler_454852_biocrnpyler_317929_combined_k*enzyme_ald_tpi_ATP_rheostatbiocrnpyler_317929_combined_model_of__biocrnpyler_454852_biocrnpyler_317929*molecule_f16p_ATP_rheostatbiocrnpyler_317929_combined_model_of__biocrnpyler_454852_biocrnpyler_317929;
    r15_ATP_rheostatbiocrnpyler_317929_combined_model_of__biocrnpyler_454852_biocrnpyler_317929_combined_k = 0.03;
  r15_1_ATP_rheostatbiocrnpyler_317929_combined_model_of__biocrnpyler_454852_biocrnpyler_317929_combined: complex_enzyme_ald_tpi_molecule_f16p_ATP_rheostatbiocrnpyler_317929_combined_model_of__biocrnpyler_454852_biocrnpyler_317929 => enzyme_ald_tpi_ATP_rheostatbiocrnpyler_317929_combined_model_of__biocrnpyler_454852_biocrnpyler_317929 + molecule_f16p_ATP_rheostatbiocrnpyler_317929_combined_model_of__biocrnpyler_454852_biocrnpyler_317929; r15_1_ATP_rheostatbiocrnpyler_317929_combined_model_of__biocrnpyler_454852_biocrnpyler_317929_combined_k*complex_enzyme_ald_tpi_molecule_f16p_ATP_rheostatbiocrnpyler_317929_combined_model_of__biocrnpyler_454852_biocrnpyler_317929;
    r15_1_ATP_rheostatbiocrnpyler_317929_combined_model_of__biocrnpyler_454852_biocrnpyler_317929_combined_k = 0.003;
  r17_ATP_rheostatbiocrnpyler_317929_combined_model_of__biocrnpyler_454852_biocrnpyler_317929_combined: complex_enzyme_ald_tpi_molecule_f16p_ATP_rheostatbiocrnpyler_317929_combined_model_of__biocrnpyler_454852_biocrnpyler_317929 => complex_enzyme_ald_tpi_2x_molecule_g3p_ATP_rheostatbiocrnpyler_317929_combined_model_of__biocrnpyler_454852_biocrnpyler_317929; r17_ATP_rheostatbiocrnpyler_317929_combined_model_of__biocrnpyler_454852_biocrnpyler_317929_combined_k*complex_enzyme_ald_tpi_molecule_f16p_ATP_rheostatbiocrnpyler_317929_combined_model_of__biocrnpyler_454852_biocrnpyler_317929;
    r17_ATP_rheostatbiocrnpyler_317929_combined_model_of__biocrnpyler_454852_biocrnpyler_317929_combined_k = 36000;
  r18_ATP_rheostatbiocrnpyler_317929_combined_model_of__biocrnpyler_454852_biocrnpyler_317929_combined: complex_enzyme_ald_tpi_2x_molecule_g3p_ATP_rheostatbiocrnpyler_317929_combined_model_of__biocrnpyler_454852_biocrnpyler_317929 => enzyme_ald_tpi_ATP_rheostatbiocrnpyler_317929_combined_model_of__biocrnpyler_454852_biocrnpyler_317929 + 2 molecule_g3p_ATP_rheostatbiocrnpyler_317929_combined_model_of__biocrnpyler_454852_biocrnpyler_317929; r18_ATP_rheostatbiocrnpyler_317929_combined_model_of__biocrnpyler_454852_biocrnpyler_317929_combined_k*complex_enzyme_ald_tpi_2x_molecule_g3p_ATP_rheostatbiocrnpyler_317929_combined_model_of__biocrnpyler_454852_biocrnpyler_317929;
    r18_ATP_rheostatbiocrnpyler_317929_combined_model_of__biocrnpyler_454852_biocrnpyler_317929_combined_k = 0.03;
  r18_1_ATP_rheostatbiocrnpyler_317929_combined_model_of__biocrnpyler_454852_biocrnpyler_317929_combined: enzyme_ald_tpi_ATP_rheostatbiocrnpyler_317929_combined_model_of__biocrnpyler_454852_biocrnpyler_317929 + 2 molecule_g3p_ATP_rheostatbiocrnpyler_317929_combined_model_of__biocrnpyler_454852_biocrnpyler_317929 => complex_enzyme_ald_tpi_2x_molecule_g3p_ATP_rheostatbiocrnpyler_317929_combined_model_of__biocrnpyler_454852_biocrnpyler_317929; r18_1_ATP_rheostatbiocrnpyler_317929_combined_model_of__biocrnpyler_454852_biocrnpyler_317929_combined_k*enzyme_ald_tpi_ATP_rheostatbiocrnpyler_317929_combined_model_of__biocrnpyler_454852_biocrnpyler_317929*molecule_g3p_ATP_rheostatbiocrnpyler_317929_combined_model_of__biocrnpyler_454852_biocrnpyler_317929^2;
    r18_1_ATP_rheostatbiocrnpyler_317929_combined_model_of__biocrnpyler_454852_biocrnpyler_317929_combined_k = 0.003;
  r20_ATP_rheostatbiocrnpyler_317929_combined_model_of__biocrnpyler_454852_biocrnpyler_317929_combined: enzyme_gapN_ATP_rheostatbiocrnpyler_317929_combined_model_of__biocrnpyler_454852_biocrnpyler_317929 + 2 metabolite_nadp_ATP_rheostatbiocrnpyler_317929_combined_model_of__biocrnpyler_454852_biocrnpyler_317929 + 2 molecule_g3p_ATP_rheostatbiocrnpyler_317929_combined_model_of__biocrnpyler_454852_biocrnpyler_317929 => complex_enzyme_gapN_2x_metabolite_nadp_2x_molecule_g3p_ATP_rheostatbiocrnpyler_317929_combined_model_of__biocrnpyler_454852_biocrnpyler_317929; r20_ATP_rheostatbiocrnpyler_317929_combined_model_of__biocrnpyler_454852_biocrnpyler_317929_combined_k*enzyme_gapN_ATP_rheostatbiocrnpyler_317929_combined_model_of__biocrnpyler_454852_biocrnpyler_317929*metabolite_nadp_ATP_rheostatbiocrnpyler_317929_combined_model_of__biocrnpyler_454852_biocrnpyler_317929^2*molecule_g3p_ATP_rheostatbiocrnpyler_317929_combined_model_of__biocrnpyler_454852_biocrnpyler_317929^2;
    r20_ATP_rheostatbiocrnpyler_317929_combined_model_of__biocrnpyler_454852_biocrnpyler_317929_combined_k = 0.03;
  r20_1_ATP_rheostatbiocrnpyler_317929_combined_model_of__biocrnpyler_454852_biocrnpyler_317929_combined: complex_enzyme_gapN_2x_metabolite_nadp_2x_molecule_g3p_ATP_rheostatbiocrnpyler_317929_combined_model_of__biocrnpyler_454852_biocrnpyler_317929 => enzyme_gapN_ATP_rheostatbiocrnpyler_317929_combined_model_of__biocrnpyler_454852_biocrnpyler_317929 + 2 metabolite_nadp_ATP_rheostatbiocrnpyler_317929_combined_model_of__biocrnpyler_454852_biocrnpyler_317929 + 2 molecule_g3p_ATP_rheostatbiocrnpyler_317929_combined_model_of__biocrnpyler_454852_biocrnpyler_317929; r20_1_ATP_rheostatbiocrnpyler_317929_combined_model_of__biocrnpyler_454852_biocrnpyler_317929_combined_k*complex_enzyme_gapN_2x_metabolite_nadp_2x_molecule_g3p_ATP_rheostatbiocrnpyler_317929_combined_model_of__biocrnpyler_454852_biocrnpyler_317929;
    r20_1_ATP_rheostatbiocrnpyler_317929_combined_model_of__biocrnpyler_454852_biocrnpyler_317929_combined_k = 0.003;
  r22_ATP_rheostatbiocrnpyler_317929_combined_model_of__biocrnpyler_454852_biocrnpyler_317929_combined: complex_enzyme_gapN_2x_metabolite_nadp_2x_molecule_g3p_ATP_rheostatbiocrnpyler_317929_combined_model_of__biocrnpyler_454852_biocrnpyler_317929 => complex_enzyme_gapN_2x_metabolite_nadph_2x_molecule_3pg_ATP_rheostatbiocrnpyler_317929_combined_model_of__biocrnpyler_454852_biocrnpyler_317929; r22_ATP_rheostatbiocrnpyler_317929_combined_model_of__biocrnpyler_454852_biocrnpyler_317929_combined_k*complex_enzyme_gapN_2x_metabolite_nadp_2x_molecule_g3p_ATP_rheostatbiocrnpyler_317929_combined_model_of__biocrnpyler_454852_biocrnpyler_317929;
    r22_ATP_rheostatbiocrnpyler_317929_combined_model_of__biocrnpyler_454852_biocrnpyler_317929_combined_k = 36000;
  r23_ATP_rheostatbiocrnpyler_317929_combined_model_of__biocrnpyler_454852_biocrnpyler_317929_combined: complex_enzyme_gapN_2x_metabolite_nadph_2x_molecule_3pg_ATP_rheostatbiocrnpyler_317929_combined_model_of__biocrnpyler_454852_biocrnpyler_317929 => enzyme_gapN_ATP_rheostatbiocrnpyler_317929_combined_model_of__biocrnpyler_454852_biocrnpyler_317929 + 2 molecule_3pg_ATP_rheostatbiocrnpyler_317929_combined_model_of__biocrnpyler_454852_biocrnpyler_317929 + 2 metabolite_nadph_ATP_rheostatbiocrnpyler_317929_combined_model_of__biocrnpyler_454852_biocrnpyler_317929; r23_ATP_rheostatbiocrnpyler_317929_combined_model_of__biocrnpyler_454852_biocrnpyler_317929_combined_k*complex_enzyme_gapN_2x_metabolite_nadph_2x_molecule_3pg_ATP_rheostatbiocrnpyler_317929_combined_model_of__biocrnpyler_454852_biocrnpyler_317929;
    r23_ATP_rheostatbiocrnpyler_317929_combined_model_of__biocrnpyler_454852_biocrnpyler_317929_combined_k = 0.03;
  r23_1_ATP_rheostatbiocrnpyler_317929_combined_model_of__biocrnpyler_454852_biocrnpyler_317929_combined: enzyme_gapN_ATP_rheostatbiocrnpyler_317929_combined_model_of__biocrnpyler_454852_biocrnpyler_317929 + 2 molecule_3pg_ATP_rheostatbiocrnpyler_317929_combined_model_of__biocrnpyler_454852_biocrnpyler_317929 + 2 metabolite_nadph_ATP_rheostatbiocrnpyler_317929_combined_model_of__biocrnpyler_454852_biocrnpyler_317929 => complex_enzyme_gapN_2x_metabolite_nadph_2x_molecule_3pg_ATP_rheostatbiocrnpyler_317929_combined_model_of__biocrnpyler_454852_biocrnpyler_317929; r23_1_ATP_rheostatbiocrnpyler_317929_combined_model_of__biocrnpyler_454852_biocrnpyler_317929_combined_k*enzyme_gapN_ATP_rheostatbiocrnpyler_317929_combined_model_of__biocrnpyler_454852_biocrnpyler_317929*molecule_3pg_ATP_rheostatbiocrnpyler_317929_combined_model_of__biocrnpyler_454852_biocrnpyler_317929^2*metabolite_nadph_ATP_rheostatbiocrnpyler_317929_combined_model_of__biocrnpyler_454852_biocrnpyler_317929^2;
    r23_1_ATP_rheostatbiocrnpyler_317929_combined_model_of__biocrnpyler_454852_biocrnpyler_317929_combined_k = 0.003;
  r25_ATP_rheostatbiocrnpyler_317929_combined_model_of__biocrnpyler_454852_biocrnpyler_317929_combined: enzyme_mGapDH_ATP_rheostatbiocrnpyler_317929_combined_model_of__biocrnpyler_454852_biocrnpyler_317929 + P_virE2biocrnpyler_454852_1_combined_combined_model_of__biocrnpyler_454852_biocrnpyler_317929 + 2 metabolite_nadp_ATP_rheostatbiocrnpyler_317929_combined_model_of__biocrnpyler_454852_biocrnpyler_317929 + 2 molecule_g3p_ATP_rheostatbiocrnpyler_317929_combined_model_of__biocrnpyler_454852_biocrnpyler_317929 => complex_enzyme_mGapDH_2x_metabolite_nadp_metabolite_pi_2x_molecule_g3p_ATP_rheostatbiocrnpyler_317929_combined_model_of__biocrnpyler_454852_biocrnpyler_317929; r25_ATP_rheostatbiocrnpyler_317929_combined_model_of__biocrnpyler_454852_biocrnpyler_317929_combined_k*enzyme_mGapDH_ATP_rheostatbiocrnpyler_317929_combined_model_of__biocrnpyler_454852_biocrnpyler_317929*P_virE2biocrnpyler_454852_1_combined_combined_model_of__biocrnpyler_454852_biocrnpyler_317929*metabolite_nadp_ATP_rheostatbiocrnpyler_317929_combined_model_of__biocrnpyler_454852_biocrnpyler_317929^2*molecule_g3p_ATP_rheostatbiocrnpyler_317929_combined_model_of__biocrnpyler_454852_biocrnpyler_317929^2;
    r25_ATP_rheostatbiocrnpyler_317929_combined_model_of__biocrnpyler_454852_biocrnpyler_317929_combined_k = 0.03;
  r25_1_ATP_rheostatbiocrnpyler_317929_combined_model_of__biocrnpyler_454852_biocrnpyler_317929_combined: complex_enzyme_mGapDH_2x_metabolite_nadp_metabolite_pi_2x_molecule_g3p_ATP_rheostatbiocrnpyler_317929_combined_model_of__biocrnpyler_454852_biocrnpyler_317929 => enzyme_mGapDH_ATP_rheostatbiocrnpyler_317929_combined_model_of__biocrnpyler_454852_biocrnpyler_317929 + P_virE2biocrnpyler_454852_1_combined_combined_model_of__biocrnpyler_454852_biocrnpyler_317929 + 2 metabolite_nadp_ATP_rheostatbiocrnpyler_317929_combined_model_of__biocrnpyler_454852_biocrnpyler_317929 + 2 molecule_g3p_ATP_rheostatbiocrnpyler_317929_combined_model_of__biocrnpyler_454852_biocrnpyler_317929; r25_1_ATP_rheostatbiocrnpyler_317929_combined_model_of__biocrnpyler_454852_biocrnpyler_317929_combined_k*complex_enzyme_mGapDH_2x_metabolite_nadp_metabolite_pi_2x_molecule_g3p_ATP_rheostatbiocrnpyler_317929_combined_model_of__biocrnpyler_454852_biocrnpyler_317929;
    r25_1_ATP_rheostatbiocrnpyler_317929_combined_model_of__biocrnpyler_454852_biocrnpyler_317929_combined_k = 0.003;
  r27_ATP_rheostatbiocrnpyler_317929_combined_model_of__biocrnpyler_454852_biocrnpyler_317929_combined: complex_enzyme_mGapDH_2x_metabolite_nadp_metabolite_pi_2x_molecule_g3p_ATP_rheostatbiocrnpyler_317929_combined_model_of__biocrnpyler_454852_biocrnpyler_317929 => complex_enzyme_mGapDH_2x_metabolite_nadph_molecule_13bpg_ATP_rheostatbiocrnpyler_317929_combined_model_of__biocrnpyler_454852_biocrnpyler_317929; r27_ATP_rheostatbiocrnpyler_317929_combined_model_of__biocrnpyler_454852_biocrnpyler_317929_combined_k*complex_enzyme_mGapDH_2x_metabolite_nadp_metabolite_pi_2x_molecule_g3p_ATP_rheostatbiocrnpyler_317929_combined_model_of__biocrnpyler_454852_biocrnpyler_317929;
    r27_ATP_rheostatbiocrnpyler_317929_combined_model_of__biocrnpyler_454852_biocrnpyler_317929_combined_k = 36000;
  r28_ATP_rheostatbiocrnpyler_317929_combined_model_of__biocrnpyler_454852_biocrnpyler_317929_combined: complex_enzyme_mGapDH_2x_metabolite_nadph_molecule_13bpg_ATP_rheostatbiocrnpyler_317929_combined_model_of__biocrnpyler_454852_biocrnpyler_317929 => enzyme_mGapDH_ATP_rheostatbiocrnpyler_317929_combined_model_of__biocrnpyler_454852_biocrnpyler_317929 + molecule_13bpg_ATP_rheostatbiocrnpyler_317929_combined_model_of__biocrnpyler_454852_biocrnpyler_317929 + 2 metabolite_nadph_ATP_rheostatbiocrnpyler_317929_combined_model_of__biocrnpyler_454852_biocrnpyler_317929; r28_ATP_rheostatbiocrnpyler_317929_combined_model_of__biocrnpyler_454852_biocrnpyler_317929_combined_k*complex_enzyme_mGapDH_2x_metabolite_nadph_molecule_13bpg_ATP_rheostatbiocrnpyler_317929_combined_model_of__biocrnpyler_454852_biocrnpyler_317929;
    r28_ATP_rheostatbiocrnpyler_317929_combined_model_of__biocrnpyler_454852_biocrnpyler_317929_combined_k = 0.03;
  r28_1_ATP_rheostatbiocrnpyler_317929_combined_model_of__biocrnpyler_454852_biocrnpyler_317929_combined: enzyme_mGapDH_ATP_rheostatbiocrnpyler_317929_combined_model_of__biocrnpyler_454852_biocrnpyler_317929 + molecule_13bpg_ATP_rheostatbiocrnpyler_317929_combined_model_of__biocrnpyler_454852_biocrnpyler_317929 + 2 metabolite_nadph_ATP_rheostatbiocrnpyler_317929_combined_model_of__biocrnpyler_454852_biocrnpyler_317929 => complex_enzyme_mGapDH_2x_metabolite_nadph_molecule_13bpg_ATP_rheostatbiocrnpyler_317929_combined_model_of__biocrnpyler_454852_biocrnpyler_317929; r28_1_ATP_rheostatbiocrnpyler_317929_combined_model_of__biocrnpyler_454852_biocrnpyler_317929_combined_k*enzyme_mGapDH_ATP_rheostatbiocrnpyler_317929_combined_model_of__biocrnpyler_454852_biocrnpyler_317929*molecule_13bpg_ATP_rheostatbiocrnpyler_317929_combined_model_of__biocrnpyler_454852_biocrnpyler_317929*metabolite_nadph_ATP_rheostatbiocrnpyler_317929_combined_model_of__biocrnpyler_454852_biocrnpyler_317929^2;
    r28_1_ATP_rheostatbiocrnpyler_317929_combined_model_of__biocrnpyler_454852_biocrnpyler_317929_combined_k = 0.003;
  r30_ATP_rheostatbiocrnpyler_317929_combined_model_of__biocrnpyler_454852_biocrnpyler_317929_combined: enzyme_pgk_ATP_rheostatbiocrnpyler_317929_combined_model_of__biocrnpyler_454852_biocrnpyler_317929 + ADP_virE2biocrnpyler_454852_1_combined_combined_model_of__biocrnpyler_454852_biocrnpyler_317929 + molecule_13bpg_ATP_rheostatbiocrnpyler_317929_combined_model_of__biocrnpyler_454852_biocrnpyler_317929 => complex_enzyme_pgk_metabolite_adp_molecule_13bpg_ATP_rheostatbiocrnpyler_317929_combined_model_of__biocrnpyler_454852_biocrnpyler_317929; r30_ATP_rheostatbiocrnpyler_317929_combined_model_of__biocrnpyler_454852_biocrnpyler_317929_combined_k*enzyme_pgk_ATP_rheostatbiocrnpyler_317929_combined_model_of__biocrnpyler_454852_biocrnpyler_317929*ADP_virE2biocrnpyler_454852_1_combined_combined_model_of__biocrnpyler_454852_biocrnpyler_317929*molecule_13bpg_ATP_rheostatbiocrnpyler_317929_combined_model_of__biocrnpyler_454852_biocrnpyler_317929;
    r30_ATP_rheostatbiocrnpyler_317929_combined_model_of__biocrnpyler_454852_biocrnpyler_317929_combined_k = 0.03;
  r30_1_ATP_rheostatbiocrnpyler_317929_combined_model_of__biocrnpyler_454852_biocrnpyler_317929_combined: complex_enzyme_pgk_metabolite_adp_molecule_13bpg_ATP_rheostatbiocrnpyler_317929_combined_model_of__biocrnpyler_454852_biocrnpyler_317929 => enzyme_pgk_ATP_rheostatbiocrnpyler_317929_combined_model_of__biocrnpyler_454852_biocrnpyler_317929 + ADP_virE2biocrnpyler_454852_1_combined_combined_model_of__biocrnpyler_454852_biocrnpyler_317929 + molecule_13bpg_ATP_rheostatbiocrnpyler_317929_combined_model_of__biocrnpyler_454852_biocrnpyler_317929; r30_1_ATP_rheostatbiocrnpyler_317929_combined_model_of__biocrnpyler_454852_biocrnpyler_317929_combined_k*complex_enzyme_pgk_metabolite_adp_molecule_13bpg_ATP_rheostatbiocrnpyler_317929_combined_model_of__biocrnpyler_454852_biocrnpyler_317929;
    r30_1_ATP_rheostatbiocrnpyler_317929_combined_model_of__biocrnpyler_454852_biocrnpyler_317929_combined_k = 0.003;
  r32_ATP_rheostatbiocrnpyler_317929_combined_model_of__biocrnpyler_454852_biocrnpyler_317929_combined: complex_enzyme_pgk_metabolite_adp_molecule_13bpg_ATP_rheostatbiocrnpyler_317929_combined_model_of__biocrnpyler_454852_biocrnpyler_317929 => complex_enzyme_pgk_metabolite_atp_2x_molecule_3pg_ATP_rheostatbiocrnpyler_317929_combined_model_of__biocrnpyler_454852_biocrnpyler_317929; r32_ATP_rheostatbiocrnpyler_317929_combined_model_of__biocrnpyler_454852_biocrnpyler_317929_combined_k*complex_enzyme_pgk_metabolite_adp_molecule_13bpg_ATP_rheostatbiocrnpyler_317929_combined_model_of__biocrnpyler_454852_biocrnpyler_317929;
    r32_ATP_rheostatbiocrnpyler_317929_combined_model_of__biocrnpyler_454852_biocrnpyler_317929_combined_k = 36000;
  r33_ATP_rheostatbiocrnpyler_317929_combined_model_of__biocrnpyler_454852_biocrnpyler_317929_combined: complex_enzyme_pgk_metabolite_atp_2x_molecule_3pg_ATP_rheostatbiocrnpyler_317929_combined_model_of__biocrnpyler_454852_biocrnpyler_317929 => enzyme_pgk_ATP_rheostatbiocrnpyler_317929_combined_model_of__biocrnpyler_454852_biocrnpyler_317929 + 2 molecule_3pg_ATP_rheostatbiocrnpyler_317929_combined_model_of__biocrnpyler_454852_biocrnpyler_317929 + ATP_virE2biocrnpyler_454852_1_combined_combined_model_of__biocrnpyler_454852_biocrnpyler_317929; r33_ATP_rheostatbiocrnpyler_317929_combined_model_of__biocrnpyler_454852_biocrnpyler_317929_combined_k*complex_enzyme_pgk_metabolite_atp_2x_molecule_3pg_ATP_rheostatbiocrnpyler_317929_combined_model_of__biocrnpyler_454852_biocrnpyler_317929;
    r33_ATP_rheostatbiocrnpyler_317929_combined_model_of__biocrnpyler_454852_biocrnpyler_317929_combined_k = 0.03;
  r33_1_ATP_rheostatbiocrnpyler_317929_combined_model_of__biocrnpyler_454852_biocrnpyler_317929_combined: enzyme_pgk_ATP_rheostatbiocrnpyler_317929_combined_model_of__biocrnpyler_454852_biocrnpyler_317929 + 2 molecule_3pg_ATP_rheostatbiocrnpyler_317929_combined_model_of__biocrnpyler_454852_biocrnpyler_317929 + ATP_virE2biocrnpyler_454852_1_combined_combined_model_of__biocrnpyler_454852_biocrnpyler_317929 => complex_enzyme_pgk_metabolite_atp_2x_molecule_3pg_ATP_rheostatbiocrnpyler_317929_combined_model_of__biocrnpyler_454852_biocrnpyler_317929; r33_1_ATP_rheostatbiocrnpyler_317929_combined_model_of__biocrnpyler_454852_biocrnpyler_317929_combined_k*enzyme_pgk_ATP_rheostatbiocrnpyler_317929_combined_model_of__biocrnpyler_454852_biocrnpyler_317929*molecule_3pg_ATP_rheostatbiocrnpyler_317929_combined_model_of__biocrnpyler_454852_biocrnpyler_317929^2*ATP_virE2biocrnpyler_454852_1_combined_combined_model_of__biocrnpyler_454852_biocrnpyler_317929;
    r33_1_ATP_rheostatbiocrnpyler_317929_combined_model_of__biocrnpyler_454852_biocrnpyler_317929_combined_k = 0.003;
  r35_ATP_rheostatbiocrnpyler_317929_combined_model_of__biocrnpyler_454852_biocrnpyler_317929_combined: enzyme_pgm_ATP_rheostatbiocrnpyler_317929_combined_model_of__biocrnpyler_454852_biocrnpyler_317929 + 2 molecule_3pg_ATP_rheostatbiocrnpyler_317929_combined_model_of__biocrnpyler_454852_biocrnpyler_317929 => complex_enzyme_pgm_2x_molecule_3pg_ATP_rheostatbiocrnpyler_317929_combined_model_of__biocrnpyler_454852_biocrnpyler_317929; r35_ATP_rheostatbiocrnpyler_317929_combined_model_of__biocrnpyler_454852_biocrnpyler_317929_combined_k*enzyme_pgm_ATP_rheostatbiocrnpyler_317929_combined_model_of__biocrnpyler_454852_biocrnpyler_317929*molecule_3pg_ATP_rheostatbiocrnpyler_317929_combined_model_of__biocrnpyler_454852_biocrnpyler_317929^2;
    r35_ATP_rheostatbiocrnpyler_317929_combined_model_of__biocrnpyler_454852_biocrnpyler_317929_combined_k = 0.03;
  r35_1_ATP_rheostatbiocrnpyler_317929_combined_model_of__biocrnpyler_454852_biocrnpyler_317929_combined: complex_enzyme_pgm_2x_molecule_3pg_ATP_rheostatbiocrnpyler_317929_combined_model_of__biocrnpyler_454852_biocrnpyler_317929 => enzyme_pgm_ATP_rheostatbiocrnpyler_317929_combined_model_of__biocrnpyler_454852_biocrnpyler_317929 + 2 molecule_3pg_ATP_rheostatbiocrnpyler_317929_combined_model_of__biocrnpyler_454852_biocrnpyler_317929; r35_1_ATP_rheostatbiocrnpyler_317929_combined_model_of__biocrnpyler_454852_biocrnpyler_317929_combined_k*complex_enzyme_pgm_2x_molecule_3pg_ATP_rheostatbiocrnpyler_317929_combined_model_of__biocrnpyler_454852_biocrnpyler_317929;
    r35_1_ATP_rheostatbiocrnpyler_317929_combined_model_of__biocrnpyler_454852_biocrnpyler_317929_combined_k = 0.003;
  r37_ATP_rheostatbiocrnpyler_317929_combined_model_of__biocrnpyler_454852_biocrnpyler_317929_combined: complex_enzyme_pgm_2x_molecule_3pg_ATP_rheostatbiocrnpyler_317929_combined_model_of__biocrnpyler_454852_biocrnpyler_317929 => complex_enzyme_pgm_2x_molecule_2pg_ATP_rheostatbiocrnpyler_317929_combined_model_of__biocrnpyler_454852_biocrnpyler_317929; r37_ATP_rheostatbiocrnpyler_317929_combined_model_of__biocrnpyler_454852_biocrnpyler_317929_combined_k*complex_enzyme_pgm_2x_molecule_3pg_ATP_rheostatbiocrnpyler_317929_combined_model_of__biocrnpyler_454852_biocrnpyler_317929;
    r37_ATP_rheostatbiocrnpyler_317929_combined_model_of__biocrnpyler_454852_biocrnpyler_317929_combined_k = 36000;
  r38_ATP_rheostatbiocrnpyler_317929_combined_model_of__biocrnpyler_454852_biocrnpyler_317929_combined: complex_enzyme_pgm_2x_molecule_2pg_ATP_rheostatbiocrnpyler_317929_combined_model_of__biocrnpyler_454852_biocrnpyler_317929 => enzyme_pgm_ATP_rheostatbiocrnpyler_317929_combined_model_of__biocrnpyler_454852_biocrnpyler_317929 + 2 molecule_2pg_ATP_rheostatbiocrnpyler_317929_combined_model_of__biocrnpyler_454852_biocrnpyler_317929; r38_ATP_rheostatbiocrnpyler_317929_combined_model_of__biocrnpyler_454852_biocrnpyler_317929_combined_k*complex_enzyme_pgm_2x_molecule_2pg_ATP_rheostatbiocrnpyler_317929_combined_model_of__biocrnpyler_454852_biocrnpyler_317929;
    r38_ATP_rheostatbiocrnpyler_317929_combined_model_of__biocrnpyler_454852_biocrnpyler_317929_combined_k = 0.03;
  r38_1_ATP_rheostatbiocrnpyler_317929_combined_model_of__biocrnpyler_454852_biocrnpyler_317929_combined: enzyme_pgm_ATP_rheostatbiocrnpyler_317929_combined_model_of__biocrnpyler_454852_biocrnpyler_317929 + 2 molecule_2pg_ATP_rheostatbiocrnpyler_317929_combined_model_of__biocrnpyler_454852_biocrnpyler_317929 => complex_enzyme_pgm_2x_molecule_2pg_ATP_rheostatbiocrnpyler_317929_combined_model_of__biocrnpyler_454852_biocrnpyler_317929; r38_1_ATP_rheostatbiocrnpyler_317929_combined_model_of__biocrnpyler_454852_biocrnpyler_317929_combined_k*enzyme_pgm_ATP_rheostatbiocrnpyler_317929_combined_model_of__biocrnpyler_454852_biocrnpyler_317929*molecule_2pg_ATP_rheostatbiocrnpyler_317929_combined_model_of__biocrnpyler_454852_biocrnpyler_317929^2;
    r38_1_ATP_rheostatbiocrnpyler_317929_combined_model_of__biocrnpyler_454852_biocrnpyler_317929_combined_k = 0.003;
  r40_ATP_rheostatbiocrnpyler_317929_combined_model_of__biocrnpyler_454852_biocrnpyler_317929_combined: enzyme_eno_ATP_rheostatbiocrnpyler_317929_combined_model_of__biocrnpyler_454852_biocrnpyler_317929 + 2 molecule_2pg_ATP_rheostatbiocrnpyler_317929_combined_model_of__biocrnpyler_454852_biocrnpyler_317929 => complex_enzyme_eno_2x_molecule_2pg_ATP_rheostatbiocrnpyler_317929_combined_model_of__biocrnpyler_454852_biocrnpyler_317929; r40_ATP_rheostatbiocrnpyler_317929_combined_model_of__biocrnpyler_454852_biocrnpyler_317929_combined_k*enzyme_eno_ATP_rheostatbiocrnpyler_317929_combined_model_of__biocrnpyler_454852_biocrnpyler_317929*molecule_2pg_ATP_rheostatbiocrnpyler_317929_combined_model_of__biocrnpyler_454852_biocrnpyler_317929^2;
    r40_ATP_rheostatbiocrnpyler_317929_combined_model_of__biocrnpyler_454852_biocrnpyler_317929_combined_k = 0.03;
  r40_1_ATP_rheostatbiocrnpyler_317929_combined_model_of__biocrnpyler_454852_biocrnpyler_317929_combined: complex_enzyme_eno_2x_molecule_2pg_ATP_rheostatbiocrnpyler_317929_combined_model_of__biocrnpyler_454852_biocrnpyler_317929 => enzyme_eno_ATP_rheostatbiocrnpyler_317929_combined_model_of__biocrnpyler_454852_biocrnpyler_317929 + 2 molecule_2pg_ATP_rheostatbiocrnpyler_317929_combined_model_of__biocrnpyler_454852_biocrnpyler_317929; r40_1_ATP_rheostatbiocrnpyler_317929_combined_model_of__biocrnpyler_454852_biocrnpyler_317929_combined_k*complex_enzyme_eno_2x_molecule_2pg_ATP_rheostatbiocrnpyler_317929_combined_model_of__biocrnpyler_454852_biocrnpyler_317929;
    r40_1_ATP_rheostatbiocrnpyler_317929_combined_model_of__biocrnpyler_454852_biocrnpyler_317929_combined_k = 0.003;
  r42_ATP_rheostatbiocrnpyler_317929_combined_model_of__biocrnpyler_454852_biocrnpyler_317929_combined: complex_enzyme_eno_2x_molecule_2pg_ATP_rheostatbiocrnpyler_317929_combined_model_of__biocrnpyler_454852_biocrnpyler_317929 => complex_enzyme_eno_2x_molecule_pep_ATP_rheostatbiocrnpyler_317929_combined_model_of__biocrnpyler_454852_biocrnpyler_317929; r42_ATP_rheostatbiocrnpyler_317929_combined_model_of__biocrnpyler_454852_biocrnpyler_317929_combined_k*complex_enzyme_eno_2x_molecule_2pg_ATP_rheostatbiocrnpyler_317929_combined_model_of__biocrnpyler_454852_biocrnpyler_317929;
    r42_ATP_rheostatbiocrnpyler_317929_combined_model_of__biocrnpyler_454852_biocrnpyler_317929_combined_k = 36000;
  r43_ATP_rheostatbiocrnpyler_317929_combined_model_of__biocrnpyler_454852_biocrnpyler_317929_combined: complex_enzyme_eno_2x_molecule_pep_ATP_rheostatbiocrnpyler_317929_combined_model_of__biocrnpyler_454852_biocrnpyler_317929 => enzyme_eno_ATP_rheostatbiocrnpyler_317929_combined_model_of__biocrnpyler_454852_biocrnpyler_317929 + 2 molecule_pep_ATP_rheostatbiocrnpyler_317929_combined_model_of__biocrnpyler_454852_biocrnpyler_317929; r43_ATP_rheostatbiocrnpyler_317929_combined_model_of__biocrnpyler_454852_biocrnpyler_317929_combined_k*complex_enzyme_eno_2x_molecule_pep_ATP_rheostatbiocrnpyler_317929_combined_model_of__biocrnpyler_454852_biocrnpyler_317929;
    r43_ATP_rheostatbiocrnpyler_317929_combined_model_of__biocrnpyler_454852_biocrnpyler_317929_combined_k = 0.03;
  r43_1_ATP_rheostatbiocrnpyler_317929_combined_model_of__biocrnpyler_454852_biocrnpyler_317929_combined: enzyme_eno_ATP_rheostatbiocrnpyler_317929_combined_model_of__biocrnpyler_454852_biocrnpyler_317929 + 2 molecule_pep_ATP_rheostatbiocrnpyler_317929_combined_model_of__biocrnpyler_454852_biocrnpyler_317929 => complex_enzyme_eno_2x_molecule_pep_ATP_rheostatbiocrnpyler_317929_combined_model_of__biocrnpyler_454852_biocrnpyler_317929; r43_1_ATP_rheostatbiocrnpyler_317929_combined_model_of__biocrnpyler_454852_biocrnpyler_317929_combined_k*enzyme_eno_ATP_rheostatbiocrnpyler_317929_combined_model_of__biocrnpyler_454852_biocrnpyler_317929*molecule_pep_ATP_rheostatbiocrnpyler_317929_combined_model_of__biocrnpyler_454852_biocrnpyler_317929^2;
    r43_1_ATP_rheostatbiocrnpyler_317929_combined_model_of__biocrnpyler_454852_biocrnpyler_317929_combined_k = 0.003;
  r45_ATP_rheostatbiocrnpyler_317929_combined_model_of__biocrnpyler_454852_biocrnpyler_317929_combined: enzyme_pyk_ATP_rheostatbiocrnpyler_317929_combined_model_of__biocrnpyler_454852_biocrnpyler_317929 + 2 ADP_virE2biocrnpyler_454852_1_combined_combined_model_of__biocrnpyler_454852_biocrnpyler_317929 + 2 molecule_pep_ATP_rheostatbiocrnpyler_317929_combined_model_of__biocrnpyler_454852_biocrnpyler_317929 => complex_enzyme_pyk_2x_metabolite_adp_2x_molecule_pep_ATP_rheostatbiocrnpyler_317929_combined_model_of__biocrnpyler_454852_biocrnpyler_317929; r45_ATP_rheostatbiocrnpyler_317929_combined_model_of__biocrnpyler_454852_biocrnpyler_317929_combined_k*enzyme_pyk_ATP_rheostatbiocrnpyler_317929_combined_model_of__biocrnpyler_454852_biocrnpyler_317929*ADP_virE2biocrnpyler_454852_1_combined_combined_model_of__biocrnpyler_454852_biocrnpyler_317929^2*molecule_pep_ATP_rheostatbiocrnpyler_317929_combined_model_of__biocrnpyler_454852_biocrnpyler_317929^2;
    r45_ATP_rheostatbiocrnpyler_317929_combined_model_of__biocrnpyler_454852_biocrnpyler_317929_combined_k = 0.03;
  r45_1_ATP_rheostatbiocrnpyler_317929_combined_model_of__biocrnpyler_454852_biocrnpyler_317929_combined: complex_enzyme_pyk_2x_metabolite_adp_2x_molecule_pep_ATP_rheostatbiocrnpyler_317929_combined_model_of__biocrnpyler_454852_biocrnpyler_317929 => enzyme_pyk_ATP_rheostatbiocrnpyler_317929_combined_model_of__biocrnpyler_454852_biocrnpyler_317929 + 2 ADP_virE2biocrnpyler_454852_1_combined_combined_model_of__biocrnpyler_454852_biocrnpyler_317929 + 2 molecule_pep_ATP_rheostatbiocrnpyler_317929_combined_model_of__biocrnpyler_454852_biocrnpyler_317929; r45_1_ATP_rheostatbiocrnpyler_317929_combined_model_of__biocrnpyler_454852_biocrnpyler_317929_combined_k*complex_enzyme_pyk_2x_metabolite_adp_2x_molecule_pep_ATP_rheostatbiocrnpyler_317929_combined_model_of__biocrnpyler_454852_biocrnpyler_317929;
    r45_1_ATP_rheostatbiocrnpyler_317929_combined_model_of__biocrnpyler_454852_biocrnpyler_317929_combined_k = 0.003;
  r47_ATP_rheostatbiocrnpyler_317929_combined_model_of__biocrnpyler_454852_biocrnpyler_317929_combined: complex_enzyme_pyk_2x_metabolite_adp_2x_molecule_pep_ATP_rheostatbiocrnpyler_317929_combined_model_of__biocrnpyler_454852_biocrnpyler_317929 => complex_enzyme_pyk_2x_metabolite_atp_2x_molecule_pyruvate_ATP_rheostatbiocrnpyler_317929_combined_model_of__biocrnpyler_454852_biocrnpyler_317929; r47_ATP_rheostatbiocrnpyler_317929_combined_model_of__biocrnpyler_454852_biocrnpyler_317929_combined_k*complex_enzyme_pyk_2x_metabolite_adp_2x_molecule_pep_ATP_rheostatbiocrnpyler_317929_combined_model_of__biocrnpyler_454852_biocrnpyler_317929;
    r47_ATP_rheostatbiocrnpyler_317929_combined_model_of__biocrnpyler_454852_biocrnpyler_317929_combined_k = 36000;
  r48_ATP_rheostatbiocrnpyler_317929_combined_model_of__biocrnpyler_454852_biocrnpyler_317929_combined: complex_enzyme_pyk_2x_metabolite_atp_2x_molecule_pyruvate_ATP_rheostatbiocrnpyler_317929_combined_model_of__biocrnpyler_454852_biocrnpyler_317929 => enzyme_pyk_ATP_rheostatbiocrnpyler_317929_combined_model_of__biocrnpyler_454852_biocrnpyler_317929 + 2 molecule_pyruvate_ATP_rheostatbiocrnpyler_317929_combined_model_of__biocrnpyler_454852_biocrnpyler_317929 + 2 ATP_virE2biocrnpyler_454852_1_combined_combined_model_of__biocrnpyler_454852_biocrnpyler_317929; r48_ATP_rheostatbiocrnpyler_317929_combined_model_of__biocrnpyler_454852_biocrnpyler_317929_combined_k*complex_enzyme_pyk_2x_metabolite_atp_2x_molecule_pyruvate_ATP_rheostatbiocrnpyler_317929_combined_model_of__biocrnpyler_454852_biocrnpyler_317929;
    r48_ATP_rheostatbiocrnpyler_317929_combined_model_of__biocrnpyler_454852_biocrnpyler_317929_combined_k = 0.03;
  r48_1_ATP_rheostatbiocrnpyler_317929_combined_model_of__biocrnpyler_454852_biocrnpyler_317929_combined: enzyme_pyk_ATP_rheostatbiocrnpyler_317929_combined_model_of__biocrnpyler_454852_biocrnpyler_317929 + 2 molecule_pyruvate_ATP_rheostatbiocrnpyler_317929_combined_model_of__biocrnpyler_454852_biocrnpyler_317929 + 2 ATP_virE2biocrnpyler_454852_1_combined_combined_model_of__biocrnpyler_454852_biocrnpyler_317929 => complex_enzyme_pyk_2x_metabolite_atp_2x_molecule_pyruvate_ATP_rheostatbiocrnpyler_317929_combined_model_of__biocrnpyler_454852_biocrnpyler_317929; r48_1_ATP_rheostatbiocrnpyler_317929_combined_model_of__biocrnpyler_454852_biocrnpyler_317929_combined_k*enzyme_pyk_ATP_rheostatbiocrnpyler_317929_combined_model_of__biocrnpyler_454852_biocrnpyler_317929*molecule_pyruvate_ATP_rheostatbiocrnpyler_317929_combined_model_of__biocrnpyler_454852_biocrnpyler_317929^2*ATP_virE2biocrnpyler_454852_1_combined_combined_model_of__biocrnpyler_454852_biocrnpyler_317929^2;
    r48_1_ATP_rheostatbiocrnpyler_317929_combined_model_of__biocrnpyler_454852_biocrnpyler_317929_combined_k = 0.003;
  r50_ATP_rheostatbiocrnpyler_317929_combined_model_of__biocrnpyler_454852_biocrnpyler_317929_combined: enzyme_alsS_ATP_rheostatbiocrnpyler_317929_combined_model_of__biocrnpyler_454852_biocrnpyler_317929 + 2 molecule_pyruvate_ATP_rheostatbiocrnpyler_317929_combined_model_of__biocrnpyler_454852_biocrnpyler_317929 => complex_enzyme_alsS_2x_molecule_pyruvate_ATP_rheostatbiocrnpyler_317929_combined_model_of__biocrnpyler_454852_biocrnpyler_317929; r50_ATP_rheostatbiocrnpyler_317929_combined_model_of__biocrnpyler_454852_biocrnpyler_317929_combined_k*enzyme_alsS_ATP_rheostatbiocrnpyler_317929_combined_model_of__biocrnpyler_454852_biocrnpyler_317929*molecule_pyruvate_ATP_rheostatbiocrnpyler_317929_combined_model_of__biocrnpyler_454852_biocrnpyler_317929^2;
    r50_ATP_rheostatbiocrnpyler_317929_combined_model_of__biocrnpyler_454852_biocrnpyler_317929_combined_k = 0.03;
  r50_1_ATP_rheostatbiocrnpyler_317929_combined_model_of__biocrnpyler_454852_biocrnpyler_317929_combined: complex_enzyme_alsS_2x_molecule_pyruvate_ATP_rheostatbiocrnpyler_317929_combined_model_of__biocrnpyler_454852_biocrnpyler_317929 => enzyme_alsS_ATP_rheostatbiocrnpyler_317929_combined_model_of__biocrnpyler_454852_biocrnpyler_317929 + 2 molecule_pyruvate_ATP_rheostatbiocrnpyler_317929_combined_model_of__biocrnpyler_454852_biocrnpyler_317929; r50_1_ATP_rheostatbiocrnpyler_317929_combined_model_of__biocrnpyler_454852_biocrnpyler_317929_combined_k*complex_enzyme_alsS_2x_molecule_pyruvate_ATP_rheostatbiocrnpyler_317929_combined_model_of__biocrnpyler_454852_biocrnpyler_317929;
    r50_1_ATP_rheostatbiocrnpyler_317929_combined_model_of__biocrnpyler_454852_biocrnpyler_317929_combined_k = 0.003;
  r52_ATP_rheostatbiocrnpyler_317929_combined_model_of__biocrnpyler_454852_biocrnpyler_317929_combined: complex_enzyme_alsS_2x_molecule_pyruvate_ATP_rheostatbiocrnpyler_317929_combined_model_of__biocrnpyler_454852_biocrnpyler_317929 => complex_enzyme_alsS_molecule_acetolac_ATP_rheostatbiocrnpyler_317929_combined_model_of__biocrnpyler_454852_biocrnpyler_317929; r52_ATP_rheostatbiocrnpyler_317929_combined_model_of__biocrnpyler_454852_biocrnpyler_317929_combined_k*complex_enzyme_alsS_2x_molecule_pyruvate_ATP_rheostatbiocrnpyler_317929_combined_model_of__biocrnpyler_454852_biocrnpyler_317929;
    r52_ATP_rheostatbiocrnpyler_317929_combined_model_of__biocrnpyler_454852_biocrnpyler_317929_combined_k = 36000;
  r53_ATP_rheostatbiocrnpyler_317929_combined_model_of__biocrnpyler_454852_biocrnpyler_317929_combined: complex_enzyme_alsS_molecule_acetolac_ATP_rheostatbiocrnpyler_317929_combined_model_of__biocrnpyler_454852_biocrnpyler_317929 => enzyme_alsS_ATP_rheostatbiocrnpyler_317929_combined_model_of__biocrnpyler_454852_biocrnpyler_317929 + molecule_acetolac_ATP_rheostatbiocrnpyler_317929_combined_model_of__biocrnpyler_454852_biocrnpyler_317929; r53_ATP_rheostatbiocrnpyler_317929_combined_model_of__biocrnpyler_454852_biocrnpyler_317929_combined_k*complex_enzyme_alsS_molecule_acetolac_ATP_rheostatbiocrnpyler_317929_combined_model_of__biocrnpyler_454852_biocrnpyler_317929;
    r53_ATP_rheostatbiocrnpyler_317929_combined_model_of__biocrnpyler_454852_biocrnpyler_317929_combined_k = 0.03;
  r53_1_ATP_rheostatbiocrnpyler_317929_combined_model_of__biocrnpyler_454852_biocrnpyler_317929_combined: enzyme_alsS_ATP_rheostatbiocrnpyler_317929_combined_model_of__biocrnpyler_454852_biocrnpyler_317929 + molecule_acetolac_ATP_rheostatbiocrnpyler_317929_combined_model_of__biocrnpyler_454852_biocrnpyler_317929 => complex_enzyme_alsS_molecule_acetolac_ATP_rheostatbiocrnpyler_317929_combined_model_of__biocrnpyler_454852_biocrnpyler_317929; r53_1_ATP_rheostatbiocrnpyler_317929_combined_model_of__biocrnpyler_454852_biocrnpyler_317929_combined_k*enzyme_alsS_ATP_rheostatbiocrnpyler_317929_combined_model_of__biocrnpyler_454852_biocrnpyler_317929*molecule_acetolac_ATP_rheostatbiocrnpyler_317929_combined_model_of__biocrnpyler_454852_biocrnpyler_317929;
    r53_1_ATP_rheostatbiocrnpyler_317929_combined_model_of__biocrnpyler_454852_biocrnpyler_317929_combined_k = 0.003;
  r55_ATP_rheostatbiocrnpyler_317929_combined_model_of__biocrnpyler_454852_biocrnpyler_317929_combined: enzyme_IlvC_ATP_rheostatbiocrnpyler_317929_combined_model_of__biocrnpyler_454852_biocrnpyler_317929 + metabolite_nadph_ATP_rheostatbiocrnpyler_317929_combined_model_of__biocrnpyler_454852_biocrnpyler_317929 + molecule_acetolac_ATP_rheostatbiocrnpyler_317929_combined_model_of__biocrnpyler_454852_biocrnpyler_317929 => complex_enzyme_IlvC_metabolite_nadph_molecule_acetolac_ATP_rheostatbiocrnpyler_317929_combined_model_of__biocrnpyler_454852_biocrnpyler_317929; r55_ATP_rheostatbiocrnpyler_317929_combined_model_of__biocrnpyler_454852_biocrnpyler_317929_combined_k*enzyme_IlvC_ATP_rheostatbiocrnpyler_317929_combined_model_of__biocrnpyler_454852_biocrnpyler_317929*metabolite_nadph_ATP_rheostatbiocrnpyler_317929_combined_model_of__biocrnpyler_454852_biocrnpyler_317929*molecule_acetolac_ATP_rheostatbiocrnpyler_317929_combined_model_of__biocrnpyler_454852_biocrnpyler_317929;
    r55_ATP_rheostatbiocrnpyler_317929_combined_model_of__biocrnpyler_454852_biocrnpyler_317929_combined_k = 0.03;
  r55_1_ATP_rheostatbiocrnpyler_317929_combined_model_of__biocrnpyler_454852_biocrnpyler_317929_combined: complex_enzyme_IlvC_metabolite_nadph_molecule_acetolac_ATP_rheostatbiocrnpyler_317929_combined_model_of__biocrnpyler_454852_biocrnpyler_317929 => enzyme_IlvC_ATP_rheostatbiocrnpyler_317929_combined_model_of__biocrnpyler_454852_biocrnpyler_317929 + metabolite_nadph_ATP_rheostatbiocrnpyler_317929_combined_model_of__biocrnpyler_454852_biocrnpyler_317929 + molecule_acetolac_ATP_rheostatbiocrnpyler_317929_combined_model_of__biocrnpyler_454852_biocrnpyler_317929; r55_1_ATP_rheostatbiocrnpyler_317929_combined_model_of__biocrnpyler_454852_biocrnpyler_317929_combined_k*complex_enzyme_IlvC_metabolite_nadph_molecule_acetolac_ATP_rheostatbiocrnpyler_317929_combined_model_of__biocrnpyler_454852_biocrnpyler_317929;
    r55_1_ATP_rheostatbiocrnpyler_317929_combined_model_of__biocrnpyler_454852_biocrnpyler_317929_combined_k = 0.003;
  r57_ATP_rheostatbiocrnpyler_317929_combined_model_of__biocrnpyler_454852_biocrnpyler_317929_combined: complex_enzyme_IlvC_metabolite_nadph_molecule_acetolac_ATP_rheostatbiocrnpyler_317929_combined_model_of__biocrnpyler_454852_biocrnpyler_317929 => complex_enzyme_IlvC_metabolite_nadp_molecule_23dih3mebut_ATP_rheostatbiocrnpyler_317929_combined_model_of__biocrnpyler_454852_biocrnpyler_317929; r57_ATP_rheostatbiocrnpyler_317929_combined_model_of__biocrnpyler_454852_biocrnpyler_317929_combined_k*complex_enzyme_IlvC_metabolite_nadph_molecule_acetolac_ATP_rheostatbiocrnpyler_317929_combined_model_of__biocrnpyler_454852_biocrnpyler_317929;
    r57_ATP_rheostatbiocrnpyler_317929_combined_model_of__biocrnpyler_454852_biocrnpyler_317929_combined_k = 36000;
  r58_ATP_rheostatbiocrnpyler_317929_combined_model_of__biocrnpyler_454852_biocrnpyler_317929_combined: complex_enzyme_IlvC_metabolite_nadp_molecule_23dih3mebut_ATP_rheostatbiocrnpyler_317929_combined_model_of__biocrnpyler_454852_biocrnpyler_317929 => enzyme_IlvC_ATP_rheostatbiocrnpyler_317929_combined_model_of__biocrnpyler_454852_biocrnpyler_317929 + molecule_23dih3mebut_ATP_rheostatbiocrnpyler_317929_combined_model_of__biocrnpyler_454852_biocrnpyler_317929 + metabolite_nadp_ATP_rheostatbiocrnpyler_317929_combined_model_of__biocrnpyler_454852_biocrnpyler_317929; r58_ATP_rheostatbiocrnpyler_317929_combined_model_of__biocrnpyler_454852_biocrnpyler_317929_combined_k*complex_enzyme_IlvC_metabolite_nadp_molecule_23dih3mebut_ATP_rheostatbiocrnpyler_317929_combined_model_of__biocrnpyler_454852_biocrnpyler_317929;
    r58_ATP_rheostatbiocrnpyler_317929_combined_model_of__biocrnpyler_454852_biocrnpyler_317929_combined_k = 0.03;
  r58_1_ATP_rheostatbiocrnpyler_317929_combined_model_of__biocrnpyler_454852_biocrnpyler_317929_combined: enzyme_IlvC_ATP_rheostatbiocrnpyler_317929_combined_model_of__biocrnpyler_454852_biocrnpyler_317929 + molecule_23dih3mebut_ATP_rheostatbiocrnpyler_317929_combined_model_of__biocrnpyler_454852_biocrnpyler_317929 + metabolite_nadp_ATP_rheostatbiocrnpyler_317929_combined_model_of__biocrnpyler_454852_biocrnpyler_317929 => complex_enzyme_IlvC_metabolite_nadp_molecule_23dih3mebut_ATP_rheostatbiocrnpyler_317929_combined_model_of__biocrnpyler_454852_biocrnpyler_317929; r58_1_ATP_rheostatbiocrnpyler_317929_combined_model_of__biocrnpyler_454852_biocrnpyler_317929_combined_k*enzyme_IlvC_ATP_rheostatbiocrnpyler_317929_combined_model_of__biocrnpyler_454852_biocrnpyler_317929*molecule_23dih3mebut_ATP_rheostatbiocrnpyler_317929_combined_model_of__biocrnpyler_454852_biocrnpyler_317929*metabolite_nadp_ATP_rheostatbiocrnpyler_317929_combined_model_of__biocrnpyler_454852_biocrnpyler_317929;
    r58_1_ATP_rheostatbiocrnpyler_317929_combined_model_of__biocrnpyler_454852_biocrnpyler_317929_combined_k = 0.003;
  r60_ATP_rheostatbiocrnpyler_317929_combined_model_of__biocrnpyler_454852_biocrnpyler_317929_combined: enzyme_IlvD_ATP_rheostatbiocrnpyler_317929_combined_model_of__biocrnpyler_454852_biocrnpyler_317929 + molecule_23dih3mebut_ATP_rheostatbiocrnpyler_317929_combined_model_of__biocrnpyler_454852_biocrnpyler_317929 => complex_enzyme_IlvD_molecule_23dih3mebut_ATP_rheostatbiocrnpyler_317929_combined_model_of__biocrnpyler_454852_biocrnpyler_317929; r60_ATP_rheostatbiocrnpyler_317929_combined_model_of__biocrnpyler_454852_biocrnpyler_317929_combined_k*enzyme_IlvD_ATP_rheostatbiocrnpyler_317929_combined_model_of__biocrnpyler_454852_biocrnpyler_317929*molecule_23dih3mebut_ATP_rheostatbiocrnpyler_317929_combined_model_of__biocrnpyler_454852_biocrnpyler_317929;
    r60_ATP_rheostatbiocrnpyler_317929_combined_model_of__biocrnpyler_454852_biocrnpyler_317929_combined_k = 0.03;
  r60_1_ATP_rheostatbiocrnpyler_317929_combined_model_of__biocrnpyler_454852_biocrnpyler_317929_combined: complex_enzyme_IlvD_molecule_23dih3mebut_ATP_rheostatbiocrnpyler_317929_combined_model_of__biocrnpyler_454852_biocrnpyler_317929 => enzyme_IlvD_ATP_rheostatbiocrnpyler_317929_combined_model_of__biocrnpyler_454852_biocrnpyler_317929 + molecule_23dih3mebut_ATP_rheostatbiocrnpyler_317929_combined_model_of__biocrnpyler_454852_biocrnpyler_317929; r60_1_ATP_rheostatbiocrnpyler_317929_combined_model_of__biocrnpyler_454852_biocrnpyler_317929_combined_k*complex_enzyme_IlvD_molecule_23dih3mebut_ATP_rheostatbiocrnpyler_317929_combined_model_of__biocrnpyler_454852_biocrnpyler_317929;
    r60_1_ATP_rheostatbiocrnpyler_317929_combined_model_of__biocrnpyler_454852_biocrnpyler_317929_combined_k = 0.003;
  r62_ATP_rheostatbiocrnpyler_317929_combined_model_of__biocrnpyler_454852_biocrnpyler_317929_combined: complex_enzyme_IlvD_molecule_23dih3mebut_ATP_rheostatbiocrnpyler_317929_combined_model_of__biocrnpyler_454852_biocrnpyler_317929 => complex_enzyme_IlvD_molecule_3me2oxo_ATP_rheostatbiocrnpyler_317929_combined_model_of__biocrnpyler_454852_biocrnpyler_317929; r62_ATP_rheostatbiocrnpyler_317929_combined_model_of__biocrnpyler_454852_biocrnpyler_317929_combined_k*complex_enzyme_IlvD_molecule_23dih3mebut_ATP_rheostatbiocrnpyler_317929_combined_model_of__biocrnpyler_454852_biocrnpyler_317929;
    r62_ATP_rheostatbiocrnpyler_317929_combined_model_of__biocrnpyler_454852_biocrnpyler_317929_combined_k = 36000;
  r63_ATP_rheostatbiocrnpyler_317929_combined_model_of__biocrnpyler_454852_biocrnpyler_317929_combined: complex_enzyme_IlvD_molecule_3me2oxo_ATP_rheostatbiocrnpyler_317929_combined_model_of__biocrnpyler_454852_biocrnpyler_317929 => enzyme_IlvD_ATP_rheostatbiocrnpyler_317929_combined_model_of__biocrnpyler_454852_biocrnpyler_317929 + molecule_3me2oxo_ATP_rheostatbiocrnpyler_317929_combined_model_of__biocrnpyler_454852_biocrnpyler_317929; r63_ATP_rheostatbiocrnpyler_317929_combined_model_of__biocrnpyler_454852_biocrnpyler_317929_combined_k*complex_enzyme_IlvD_molecule_3me2oxo_ATP_rheostatbiocrnpyler_317929_combined_model_of__biocrnpyler_454852_biocrnpyler_317929;
    r63_ATP_rheostatbiocrnpyler_317929_combined_model_of__biocrnpyler_454852_biocrnpyler_317929_combined_k = 0.03;
  r63_1_ATP_rheostatbiocrnpyler_317929_combined_model_of__biocrnpyler_454852_biocrnpyler_317929_combined: enzyme_IlvD_ATP_rheostatbiocrnpyler_317929_combined_model_of__biocrnpyler_454852_biocrnpyler_317929 + molecule_3me2oxo_ATP_rheostatbiocrnpyler_317929_combined_model_of__biocrnpyler_454852_biocrnpyler_317929 => complex_enzyme_IlvD_molecule_3me2oxo_ATP_rheostatbiocrnpyler_317929_combined_model_of__biocrnpyler_454852_biocrnpyler_317929; r63_1_ATP_rheostatbiocrnpyler_317929_combined_model_of__biocrnpyler_454852_biocrnpyler_317929_combined_k*enzyme_IlvD_ATP_rheostatbiocrnpyler_317929_combined_model_of__biocrnpyler_454852_biocrnpyler_317929*molecule_3me2oxo_ATP_rheostatbiocrnpyler_317929_combined_model_of__biocrnpyler_454852_biocrnpyler_317929;
    r63_1_ATP_rheostatbiocrnpyler_317929_combined_model_of__biocrnpyler_454852_biocrnpyler_317929_combined_k = 0.003;
  r65_ATP_rheostatbiocrnpyler_317929_combined_model_of__biocrnpyler_454852_biocrnpyler_317929_combined: enzyme_kivD_ATP_rheostatbiocrnpyler_317929_combined_model_of__biocrnpyler_454852_biocrnpyler_317929 + molecule_3me2oxo_ATP_rheostatbiocrnpyler_317929_combined_model_of__biocrnpyler_454852_biocrnpyler_317929 => complex_enzyme_kivD_molecule_3me2oxo_ATP_rheostatbiocrnpyler_317929_combined_model_of__biocrnpyler_454852_biocrnpyler_317929; r65_ATP_rheostatbiocrnpyler_317929_combined_model_of__biocrnpyler_454852_biocrnpyler_317929_combined_k*enzyme_kivD_ATP_rheostatbiocrnpyler_317929_combined_model_of__biocrnpyler_454852_biocrnpyler_317929*molecule_3me2oxo_ATP_rheostatbiocrnpyler_317929_combined_model_of__biocrnpyler_454852_biocrnpyler_317929;
    r65_ATP_rheostatbiocrnpyler_317929_combined_model_of__biocrnpyler_454852_biocrnpyler_317929_combined_k = 0.03;
  r65_1_ATP_rheostatbiocrnpyler_317929_combined_model_of__biocrnpyler_454852_biocrnpyler_317929_combined: complex_enzyme_kivD_molecule_3me2oxo_ATP_rheostatbiocrnpyler_317929_combined_model_of__biocrnpyler_454852_biocrnpyler_317929 => enzyme_kivD_ATP_rheostatbiocrnpyler_317929_combined_model_of__biocrnpyler_454852_biocrnpyler_317929 + molecule_3me2oxo_ATP_rheostatbiocrnpyler_317929_combined_model_of__biocrnpyler_454852_biocrnpyler_317929; r65_1_ATP_rheostatbiocrnpyler_317929_combined_model_of__biocrnpyler_454852_biocrnpyler_317929_combined_k*complex_enzyme_kivD_molecule_3me2oxo_ATP_rheostatbiocrnpyler_317929_combined_model_of__biocrnpyler_454852_biocrnpyler_317929;
    r65_1_ATP_rheostatbiocrnpyler_317929_combined_model_of__biocrnpyler_454852_biocrnpyler_317929_combined_k = 0.003;
  r67_ATP_rheostatbiocrnpyler_317929_combined_model_of__biocrnpyler_454852_biocrnpyler_317929_combined: complex_enzyme_kivD_molecule_3me2oxo_ATP_rheostatbiocrnpyler_317929_combined_model_of__biocrnpyler_454852_biocrnpyler_317929 => complex_enzyme_kivD_molecule_isobutanal_ATP_rheostatbiocrnpyler_317929_combined_model_of__biocrnpyler_454852_biocrnpyler_317929; r67_ATP_rheostatbiocrnpyler_317929_combined_model_of__biocrnpyler_454852_biocrnpyler_317929_combined_k*complex_enzyme_kivD_molecule_3me2oxo_ATP_rheostatbiocrnpyler_317929_combined_model_of__biocrnpyler_454852_biocrnpyler_317929;
    r67_ATP_rheostatbiocrnpyler_317929_combined_model_of__biocrnpyler_454852_biocrnpyler_317929_combined_k = 36000;
  r68_ATP_rheostatbiocrnpyler_317929_combined_model_of__biocrnpyler_454852_biocrnpyler_317929_combined: complex_enzyme_kivD_molecule_isobutanal_ATP_rheostatbiocrnpyler_317929_combined_model_of__biocrnpyler_454852_biocrnpyler_317929 => enzyme_kivD_ATP_rheostatbiocrnpyler_317929_combined_model_of__biocrnpyler_454852_biocrnpyler_317929 + molecule_isobutanal_ATP_rheostatbiocrnpyler_317929_combined_model_of__biocrnpyler_454852_biocrnpyler_317929; r68_ATP_rheostatbiocrnpyler_317929_combined_model_of__biocrnpyler_454852_biocrnpyler_317929_combined_k*complex_enzyme_kivD_molecule_isobutanal_ATP_rheostatbiocrnpyler_317929_combined_model_of__biocrnpyler_454852_biocrnpyler_317929;
    r68_ATP_rheostatbiocrnpyler_317929_combined_model_of__biocrnpyler_454852_biocrnpyler_317929_combined_k = 0.03;
  r68_1_ATP_rheostatbiocrnpyler_317929_combined_model_of__biocrnpyler_454852_biocrnpyler_317929_combined: enzyme_kivD_ATP_rheostatbiocrnpyler_317929_combined_model_of__biocrnpyler_454852_biocrnpyler_317929 + molecule_isobutanal_ATP_rheostatbiocrnpyler_317929_combined_model_of__biocrnpyler_454852_biocrnpyler_317929 => complex_enzyme_kivD_molecule_isobutanal_ATP_rheostatbiocrnpyler_317929_combined_model_of__biocrnpyler_454852_biocrnpyler_317929; r68_1_ATP_rheostatbiocrnpyler_317929_combined_model_of__biocrnpyler_454852_biocrnpyler_317929_combined_k*enzyme_kivD_ATP_rheostatbiocrnpyler_317929_combined_model_of__biocrnpyler_454852_biocrnpyler_317929*molecule_isobutanal_ATP_rheostatbiocrnpyler_317929_combined_model_of__biocrnpyler_454852_biocrnpyler_317929;
    r68_1_ATP_rheostatbiocrnpyler_317929_combined_model_of__biocrnpyler_454852_biocrnpyler_317929_combined_k = 0.003;
  r70_ATP_rheostatbiocrnpyler_317929_combined_model_of__biocrnpyler_454852_biocrnpyler_317929_combined: enzyme_yahk_ATP_rheostatbiocrnpyler_317929_combined_model_of__biocrnpyler_454852_biocrnpyler_317929 + metabolite_nadph_ATP_rheostatbiocrnpyler_317929_combined_model_of__biocrnpyler_454852_biocrnpyler_317929 + molecule_isobutanal_ATP_rheostatbiocrnpyler_317929_combined_model_of__biocrnpyler_454852_biocrnpyler_317929 => complex_enzyme_yahk_metabolite_nadph_molecule_isobutanal_ATP_rheostatbiocrnpyler_317929_combined_model_of__biocrnpyler_454852_biocrnpyler_317929; r70_ATP_rheostatbiocrnpyler_317929_combined_model_of__biocrnpyler_454852_biocrnpyler_317929_combined_k*enzyme_yahk_ATP_rheostatbiocrnpyler_317929_combined_model_of__biocrnpyler_454852_biocrnpyler_317929*metabolite_nadph_ATP_rheostatbiocrnpyler_317929_combined_model_of__biocrnpyler_454852_biocrnpyler_317929*molecule_isobutanal_ATP_rheostatbiocrnpyler_317929_combined_model_of__biocrnpyler_454852_biocrnpyler_317929;
    r70_ATP_rheostatbiocrnpyler_317929_combined_model_of__biocrnpyler_454852_biocrnpyler_317929_combined_k = 0.03;
  r70_1_ATP_rheostatbiocrnpyler_317929_combined_model_of__biocrnpyler_454852_biocrnpyler_317929_combined: complex_enzyme_yahk_metabolite_nadph_molecule_isobutanal_ATP_rheostatbiocrnpyler_317929_combined_model_of__biocrnpyler_454852_biocrnpyler_317929 => enzyme_yahk_ATP_rheostatbiocrnpyler_317929_combined_model_of__biocrnpyler_454852_biocrnpyler_317929 + metabolite_nadph_ATP_rheostatbiocrnpyler_317929_combined_model_of__biocrnpyler_454852_biocrnpyler_317929 + molecule_isobutanal_ATP_rheostatbiocrnpyler_317929_combined_model_of__biocrnpyler_454852_biocrnpyler_317929; r70_1_ATP_rheostatbiocrnpyler_317929_combined_model_of__biocrnpyler_454852_biocrnpyler_317929_combined_k*complex_enzyme_yahk_metabolite_nadph_molecule_isobutanal_ATP_rheostatbiocrnpyler_317929_combined_model_of__biocrnpyler_454852_biocrnpyler_317929;
    r70_1_ATP_rheostatbiocrnpyler_317929_combined_model_of__biocrnpyler_454852_biocrnpyler_317929_combined_k = 0.003;
  r72_ATP_rheostatbiocrnpyler_317929_combined_model_of__biocrnpyler_454852_biocrnpyler_317929_combined: complex_enzyme_yahk_metabolite_nadph_molecule_isobutanal_ATP_rheostatbiocrnpyler_317929_combined_model_of__biocrnpyler_454852_biocrnpyler_317929 => complex_enzyme_yahk_metabolite_nadp_molecule_isobutanol_ATP_rheostatbiocrnpyler_317929_combined_model_of__biocrnpyler_454852_biocrnpyler_317929; r72_ATP_rheostatbiocrnpyler_317929_combined_model_of__biocrnpyler_454852_biocrnpyler_317929_combined_k*complex_enzyme_yahk_metabolite_nadph_molecule_isobutanal_ATP_rheostatbiocrnpyler_317929_combined_model_of__biocrnpyler_454852_biocrnpyler_317929;
    r72_ATP_rheostatbiocrnpyler_317929_combined_model_of__biocrnpyler_454852_biocrnpyler_317929_combined_k = 36000;
  r73_ATP_rheostatbiocrnpyler_317929_combined_model_of__biocrnpyler_454852_biocrnpyler_317929_combined: complex_enzyme_yahk_metabolite_nadp_molecule_isobutanol_ATP_rheostatbiocrnpyler_317929_combined_model_of__biocrnpyler_454852_biocrnpyler_317929 => enzyme_yahk_ATP_rheostatbiocrnpyler_317929_combined_model_of__biocrnpyler_454852_biocrnpyler_317929 + molecule_isobutanol_ATP_rheostatbiocrnpyler_317929_combined_model_of__biocrnpyler_454852_biocrnpyler_317929 + metabolite_nadp_ATP_rheostatbiocrnpyler_317929_combined_model_of__biocrnpyler_454852_biocrnpyler_317929; r73_ATP_rheostatbiocrnpyler_317929_combined_model_of__biocrnpyler_454852_biocrnpyler_317929_combined_k*complex_enzyme_yahk_metabolite_nadp_molecule_isobutanol_ATP_rheostatbiocrnpyler_317929_combined_model_of__biocrnpyler_454852_biocrnpyler_317929;
    r73_ATP_rheostatbiocrnpyler_317929_combined_model_of__biocrnpyler_454852_biocrnpyler_317929_combined_k = 0.03;
  r73_1_ATP_rheostatbiocrnpyler_317929_combined_model_of__biocrnpyler_454852_biocrnpyler_317929_combined: enzyme_yahk_ATP_rheostatbiocrnpyler_317929_combined_model_of__biocrnpyler_454852_biocrnpyler_317929 + molecule_isobutanol_ATP_rheostatbiocrnpyler_317929_combined_model_of__biocrnpyler_454852_biocrnpyler_317929 + metabolite_nadp_ATP_rheostatbiocrnpyler_317929_combined_model_of__biocrnpyler_454852_biocrnpyler_317929 => complex_enzyme_yahk_metabolite_nadp_molecule_isobutanol_ATP_rheostatbiocrnpyler_317929_combined_model_of__biocrnpyler_454852_biocrnpyler_317929; r73_1_ATP_rheostatbiocrnpyler_317929_combined_model_of__biocrnpyler_454852_biocrnpyler_317929_combined_k*enzyme_yahk_ATP_rheostatbiocrnpyler_317929_combined_model_of__biocrnpyler_454852_biocrnpyler_317929*molecule_isobutanol_ATP_rheostatbiocrnpyler_317929_combined_model_of__biocrnpyler_454852_biocrnpyler_317929*metabolite_nadp_ATP_rheostatbiocrnpyler_317929_combined_model_of__biocrnpyler_454852_biocrnpyler_317929;
    r73_1_ATP_rheostatbiocrnpyler_317929_combined_model_of__biocrnpyler_454852_biocrnpyler_317929_combined_k = 0.003;
  r1_cell2: atc_e_external_reservoir_model_1_combined_1_combined -> atc_i_cell2_1_combined; kb_combined*atc_e_external_reservoir_model_1_combined_1_combined - kd_combined*atc_i_cell2_1_combined;
  r0_exsAbiocrnpyler_367767_combined_model_of__biocrnpyler_367767_biocrnpyler_317929: atc_i_cell2_1_combined + tetR_exsAbiocrnpyler_367767_combined_model_of__biocrnpyler_367767_biocrnpyler_317929 => complex_atc_i_cell2_tetR_exsAbiocrnpyler_367767_combined_model_of__biocrnpyler_367767_biocrnpyler_317929; r0_exsAbiocrnpyler_367767_combined_model_of__biocrnpyler_367767_biocrnpyler_317929_k*atc_i_cell2_1_combined*tetR_exsAbiocrnpyler_367767_combined_model_of__biocrnpyler_367767_biocrnpyler_317929; r0_exsAbiocrnpyler_367767_combined_model_of__biocrnpyler_367767_biocrnpyler_317929 is "r0cell2";
    r0_exsAbiocrnpyler_367767_combined_model_of__biocrnpyler_367767_biocrnpyler_317929_k = 2e-5;
  r0_1_exsAbiocrnpyler_367767_combined_model_of__biocrnpyler_367767_biocrnpyler_317929: complex_atc_i_cell2_tetR_exsAbiocrnpyler_367767_combined_model_of__biocrnpyler_367767_biocrnpyler_317929 => atc_i_cell2_1_combined + tetR_exsAbiocrnpyler_367767_combined_model_of__biocrnpyler_367767_biocrnpyler_317929; r0_1_exsAbiocrnpyler_367767_combined_model_of__biocrnpyler_367767_biocrnpyler_317929_k*complex_atc_i_cell2_tetR_exsAbiocrnpyler_367767_combined_model_of__biocrnpyler_367767_biocrnpyler_317929; r0_1_exsAbiocrnpyler_367767_combined_model_of__biocrnpyler_367767_biocrnpyler_317929 is "r0_1cell2";
    r0_1_exsAbiocrnpyler_367767_combined_model_of__biocrnpyler_367767_biocrnpyler_317929_k = 2e-9;
  r2_exsAbiocrnpyler_367767_combined_model_of__biocrnpyler_367767_biocrnpyler_317929: dna_f_exsAbiocrnpyler_367767_combined_model_of__biocrnpyler_367767_biocrnpyler_317929 + tetR_exsAbiocrnpyler_367767_combined_model_of__biocrnpyler_367767_biocrnpyler_317929 => complex_dna_f_tetR_exsAbiocrnpyler_367767_combined_model_of__biocrnpyler_367767_biocrnpyler_317929; r2_exsAbiocrnpyler_367767_combined_model_of__biocrnpyler_367767_biocrnpyler_317929_k*dna_f_exsAbiocrnpyler_367767_combined_model_of__biocrnpyler_367767_biocrnpyler_317929*tetR_exsAbiocrnpyler_367767_combined_model_of__biocrnpyler_367767_biocrnpyler_317929;
    r2_exsAbiocrnpyler_367767_combined_model_of__biocrnpyler_367767_biocrnpyler_317929_k = 4e-7;
  r2_1_exsAbiocrnpyler_367767_combined_model_of__biocrnpyler_367767_biocrnpyler_317929: complex_dna_f_tetR_exsAbiocrnpyler_367767_combined_model_of__biocrnpyler_367767_biocrnpyler_317929 => dna_f_exsAbiocrnpyler_367767_combined_model_of__biocrnpyler_367767_biocrnpyler_317929 + tetR_exsAbiocrnpyler_367767_combined_model_of__biocrnpyler_367767_biocrnpyler_317929; r2_1_exsAbiocrnpyler_367767_combined_model_of__biocrnpyler_367767_biocrnpyler_317929_k*complex_dna_f_tetR_exsAbiocrnpyler_367767_combined_model_of__biocrnpyler_367767_biocrnpyler_317929;
    r2_1_exsAbiocrnpyler_367767_combined_model_of__biocrnpyler_367767_biocrnpyler_317929_k = 1e-12;
  r4_exsAbiocrnpyler_367767_combined_model_of__biocrnpyler_367767_biocrnpyler_317929: complex_dna_f_tetR_exsAbiocrnpyler_367767_combined_model_of__biocrnpyler_367767_biocrnpyler_317929 + atc_i_cell2_1_combined => complex_atc_i_cell2_dna_f_tetR_exsAbiocrnpyler_367767_combined_model_of__biocrnpyler_367767_biocrnpyler_317929; r4_exsAbiocrnpyler_367767_combined_model_of__biocrnpyler_367767_biocrnpyler_317929_k*complex_dna_f_tetR_exsAbiocrnpyler_367767_combined_model_of__biocrnpyler_367767_biocrnpyler_317929*atc_i_cell2_1_combined;
    r4_exsAbiocrnpyler_367767_combined_model_of__biocrnpyler_367767_biocrnpyler_317929_k = 6e-8;
  r4_1_exsAbiocrnpyler_367767_combined_model_of__biocrnpyler_367767_biocrnpyler_317929: complex_atc_i_cell2_dna_f_tetR_exsAbiocrnpyler_367767_combined_model_of__biocrnpyler_367767_biocrnpyler_317929 => complex_dna_f_tetR_exsAbiocrnpyler_367767_combined_model_of__biocrnpyler_367767_biocrnpyler_317929 + atc_i_cell2_1_combined; r4_1_exsAbiocrnpyler_367767_combined_model_of__biocrnpyler_367767_biocrnpyler_317929_k*complex_atc_i_cell2_dna_f_tetR_exsAbiocrnpyler_367767_combined_model_of__biocrnpyler_367767_biocrnpyler_317929;
    r4_1_exsAbiocrnpyler_367767_combined_model_of__biocrnpyler_367767_biocrnpyler_317929_k = 3e-9;
  r6_exsAbiocrnpyler_367767_combined_model_of__biocrnpyler_367767_biocrnpyler_317929: complex_atc_i_cell2_dna_f_tetR_exsAbiocrnpyler_367767_combined_model_of__biocrnpyler_367767_biocrnpyler_317929 => dna_f_exsAbiocrnpyler_367767_combined_model_of__biocrnpyler_367767_biocrnpyler_317929 + complex_atc_i_cell2_tetR_exsAbiocrnpyler_367767_combined_model_of__biocrnpyler_367767_biocrnpyler_317929; r6_exsAbiocrnpyler_367767_combined_model_of__biocrnpyler_367767_biocrnpyler_317929_k*complex_atc_i_cell2_dna_f_tetR_exsAbiocrnpyler_367767_combined_model_of__biocrnpyler_367767_biocrnpyler_317929;
    r6_exsAbiocrnpyler_367767_combined_model_of__biocrnpyler_367767_biocrnpyler_317929_k = 5e-5;
  r6_1_exsAbiocrnpyler_367767_combined_model_of__biocrnpyler_367767_biocrnpyler_317929: dna_f_exsAbiocrnpyler_367767_combined_model_of__biocrnpyler_367767_biocrnpyler_317929 + complex_atc_i_cell2_tetR_exsAbiocrnpyler_367767_combined_model_of__biocrnpyler_367767_biocrnpyler_317929 => complex_atc_i_cell2_dna_f_tetR_exsAbiocrnpyler_367767_combined_model_of__biocrnpyler_367767_biocrnpyler_317929; r6_1_exsAbiocrnpyler_367767_combined_model_of__biocrnpyler_367767_biocrnpyler_317929_k*dna_f_exsAbiocrnpyler_367767_combined_model_of__biocrnpyler_367767_biocrnpyler_317929*complex_atc_i_cell2_tetR_exsAbiocrnpyler_367767_combined_model_of__biocrnpyler_367767_biocrnpyler_317929;
    r6_1_exsAbiocrnpyler_367767_combined_model_of__biocrnpyler_367767_biocrnpyler_317929_k = 1e-10;
  r8_exsAbiocrnpyler_367767_combined_model_of__biocrnpyler_367767_biocrnpyler_317929: dna_f_exsAbiocrnpyler_367767_combined_model_of__biocrnpyler_367767_biocrnpyler_317929 => dna_f_exsAbiocrnpyler_367767_combined_model_of__biocrnpyler_367767_biocrnpyler_317929 + rna_f_exsAbiocrnpyler_367767_combined_model_of__biocrnpyler_367767_biocrnpyler_317929; r8_exsAbiocrnpyler_367767_combined_model_of__biocrnpyler_367767_biocrnpyler_317929_k*dna_f_exsAbiocrnpyler_367767_combined_model_of__biocrnpyler_367767_biocrnpyler_317929;
    r8_exsAbiocrnpyler_367767_combined_model_of__biocrnpyler_367767_biocrnpyler_317929_k = 0.001875;
  r9_exsAbiocrnpyler_367767_combined_model_of__biocrnpyler_367767_biocrnpyler_317929: rna_f_exsAbiocrnpyler_367767_combined_model_of__biocrnpyler_367767_biocrnpyler_317929 + ATP_exsAbiocrnpyler_367767_1_combined_combined_model_of__biocrnpyler_367767_biocrnpyler_317929 => rna_f_exsAbiocrnpyler_367767_combined_model_of__biocrnpyler_367767_biocrnpyler_317929 + ADP_exsAbiocrnpyler_367767_1_combined_combined_model_of__biocrnpyler_367767_biocrnpyler_317929 + exsA_exsAbiocrnpyler_367767_combined_model_of__biocrnpyler_367767_biocrnpyler_317929 + P_exsAbiocrnpyler_367767_1_combined_combined_model_of__biocrnpyler_367767_biocrnpyler_317929; r9_exsAbiocrnpyler_367767_combined_model_of__biocrnpyler_367767_biocrnpyler_317929_k*rna_f_exsAbiocrnpyler_367767_combined_model_of__biocrnpyler_367767_biocrnpyler_317929*ATP_exsAbiocrnpyler_367767_1_combined_combined_model_of__biocrnpyler_367767_biocrnpyler_317929^r9_exsAbiocrnpyler_367767_combined_model_of__biocrnpyler_367767_biocrnpyler_317929_n/(ATP_exsAbiocrnpyler_367767_1_combined_combined_model_of__biocrnpyler_367767_biocrnpyler_317929^r9_exsAbiocrnpyler_367767_combined_model_of__biocrnpyler_367767_biocrnpyler_317929_n + r9_exsAbiocrnpyler_367767_combined_model_of__biocrnpyler_367767_biocrnpyler_317929_K);
    r9_exsAbiocrnpyler_367767_combined_model_of__biocrnpyler_367767_biocrnpyler_317929_k = 0.0005; r9_exsAbiocrnpyler_367767_combined_model_of__biocrnpyler_367767_biocrnpyler_317929_n = 1; r9_exsAbiocrnpyler_367767_combined_model_of__biocrnpyler_367767_biocrnpyler_317929_K = 1;
  r10_exsAbiocrnpyler_367767_combined_model_of__biocrnpyler_367767_biocrnpyler_317929: rna_f_exsAbiocrnpyler_367767_combined_model_of__biocrnpyler_367767_biocrnpyler_317929 => ; r10_exsAbiocrnpyler_367767_combined_model_of__biocrnpyler_367767_biocrnpyler_317929_k*rna_f_exsAbiocrnpyler_367767_combined_model_of__biocrnpyler_367767_biocrnpyler_317929;
    r10_exsAbiocrnpyler_367767_combined_model_of__biocrnpyler_367767_biocrnpyler_317929_k = 0.001;
  r1_cell3: atc_e_external_reservoir_model_1_combined_1_combined -> atc_i_cell3; kb_combined*atc_e_external_reservoir_model_1_combined_1_combined - kd_combined*atc_i_cell3;
  r0_gfpbiocrnpyler_798952_combined_model_of__biocrnpyler_798952_biocrnpyler_317929: dna_h_gfpbiocrnpyler_798952_combined_model_of__biocrnpyler_798952_biocrnpyler_317929 + exsA_gfpbiocrnpyler_798952_combined_model_of__biocrnpyler_798952_biocrnpyler_317929 => complex_dna_h_exsA_gfpbiocrnpyler_798952_combined_model_of__biocrnpyler_798952_biocrnpyler_317929; r0_gfpbiocrnpyler_798952_combined_model_of__biocrnpyler_798952_biocrnpyler_317929_k*dna_h_gfpbiocrnpyler_798952_combined_model_of__biocrnpyler_798952_biocrnpyler_317929*exsA_gfpbiocrnpyler_798952_combined_model_of__biocrnpyler_798952_biocrnpyler_317929;
    r0_gfpbiocrnpyler_798952_combined_model_of__biocrnpyler_798952_biocrnpyler_317929_k = 4e-5;
  r0_1_gfpbiocrnpyler_798952_combined_model_of__biocrnpyler_798952_biocrnpyler_317929: complex_dna_h_exsA_gfpbiocrnpyler_798952_combined_model_of__biocrnpyler_798952_biocrnpyler_317929 => dna_h_gfpbiocrnpyler_798952_combined_model_of__biocrnpyler_798952_biocrnpyler_317929 + exsA_gfpbiocrnpyler_798952_combined_model_of__biocrnpyler_798952_biocrnpyler_317929; r0_1_gfpbiocrnpyler_798952_combined_model_of__biocrnpyler_798952_biocrnpyler_317929_k*complex_dna_h_exsA_gfpbiocrnpyler_798952_combined_model_of__biocrnpyler_798952_biocrnpyler_317929;
    r0_1_gfpbiocrnpyler_798952_combined_model_of__biocrnpyler_798952_biocrnpyler_317929_k = 1e-12;
  r2_gfpbiocrnpyler_798952_combined_model_of__biocrnpyler_798952_biocrnpyler_317929: complex_dna_h_exsA_gfpbiocrnpyler_798952_combined_model_of__biocrnpyler_798952_biocrnpyler_317929 => complex_dna_h_exsA_gfpbiocrnpyler_798952_combined_model_of__biocrnpyler_798952_biocrnpyler_317929 + rna_h_gfpbiocrnpyler_798952_combined_model_of__biocrnpyler_798952_biocrnpyler_317929; r2_gfpbiocrnpyler_798952_combined_model_of__biocrnpyler_798952_biocrnpyler_317929_k*complex_dna_h_exsA_gfpbiocrnpyler_798952_combined_model_of__biocrnpyler_798952_biocrnpyler_317929;
    r2_gfpbiocrnpyler_798952_combined_model_of__biocrnpyler_798952_biocrnpyler_317929_k = 0.001875;
  r3_gfpbiocrnpyler_798952_combined_model_of__biocrnpyler_798952_biocrnpyler_317929: rna_h_gfpbiocrnpyler_798952_combined_model_of__biocrnpyler_798952_biocrnpyler_317929 + ATP_gfpbiocrnpyler_798952_1_combined_combined_model_of__biocrnpyler_798952_biocrnpyler_317929 => rna_h_gfpbiocrnpyler_798952_combined_model_of__biocrnpyler_798952_biocrnpyler_317929 + ADP_gfpbiocrnpyler_798952_1_combined_combined_model_of__biocrnpyler_798952_biocrnpyler_317929 + gfp_gfpbiocrnpyler_798952_combined_model_of__biocrnpyler_798952_biocrnpyler_317929 + P_gfpbiocrnpyler_798952_1_combined_combined_model_of__biocrnpyler_798952_biocrnpyler_317929; r3_gfpbiocrnpyler_798952_combined_model_of__biocrnpyler_798952_biocrnpyler_317929_k*rna_h_gfpbiocrnpyler_798952_combined_model_of__biocrnpyler_798952_biocrnpyler_317929*ATP_gfpbiocrnpyler_798952_1_combined_combined_model_of__biocrnpyler_798952_biocrnpyler_317929^r3_gfpbiocrnpyler_798952_combined_model_of__biocrnpyler_798952_biocrnpyler_317929_n/(ATP_gfpbiocrnpyler_798952_1_combined_combined_model_of__biocrnpyler_798952_biocrnpyler_317929^r3_gfpbiocrnpyler_798952_combined_model_of__biocrnpyler_798952_biocrnpyler_317929_n + r3_gfpbiocrnpyler_798952_combined_model_of__biocrnpyler_798952_biocrnpyler_317929_K);
    r3_gfpbiocrnpyler_798952_combined_model_of__biocrnpyler_798952_biocrnpyler_317929_k = 0.0005; r3_gfpbiocrnpyler_798952_combined_model_of__biocrnpyler_798952_biocrnpyler_317929_n = 1; r3_gfpbiocrnpyler_798952_combined_model_of__biocrnpyler_798952_biocrnpyler_317929_K = 1;
  r4_gfpbiocrnpyler_798952_combined_model_of__biocrnpyler_798952_biocrnpyler_317929: rna_h_gfpbiocrnpyler_798952_combined_model_of__biocrnpyler_798952_biocrnpyler_317929 => ; r4_gfpbiocrnpyler_798952_combined_model_of__biocrnpyler_798952_biocrnpyler_317929_k*rna_h_gfpbiocrnpyler_798952_combined_model_of__biocrnpyler_798952_biocrnpyler_317929;
    r4_gfpbiocrnpyler_798952_combined_model_of__biocrnpyler_798952_biocrnpyler_317929_k = 0.001;
  raa1: ssDNA_comp1 + ssDNA_comp2 + ssDNA_e -> dsDNA; kf*ssDNA_comp1*ssDNA_comp2*ssDNA_e - kre*dsDNA;

  // Unit definitions:
  unit square_metre = metre^2;
  unit per_second = 1 / second;
  unit substance = dimensionless;
end
