// SBML level 3 version 2

model combined_model_of__combined_model_of__combined_model_of__external_reservoir_model_combined_model_of__atc_membrane2_combined_model_of__combined_model_of__biocrnpyler_585441_biocrnpyler_34510_combined_model_of__combined_model_of__external_reservoir_model_combined_model_of__atc_membrane3_combined_model_of__combined_model_of__biocrnpyler_948323_biocrnpyler_34510()
  // model units - substance: mole, time: second, volume: litre, area: square_metre, length: metre, extent: mole

  // Compartments:
  compartment fusedcell_external_combined = 0.0002 litre;
  compartment fusedcell_internal_combined = 1e-6 litre;

  // Species:
  species ssDNA_comp1 in fusedcell_internal_combined = 10;
  species dna_f_exsAbiocrnpyler_585441_combined_model_of__biocrnpyler_585441_biocrnpyler_34510 in fusedcell_internal_combined = 0.9997572;
  species tetR_exsAbiocrnpyler_585441_combined_model_of__biocrnpyler_585441_biocrnpyler_34510 in fusedcell_internal_combined = 1.007348e-7;
  species rna_f_exsAbiocrnpyler_585441_combined_model_of__biocrnpyler_585441_biocrnpyler_34510 in fusedcell_internal_combined = 1.804699;
  species atc_i_cell2_1_combined in fusedcell_internal_combined = 9926.936;
  species complex_atc_i_cell2_tetR_exsAbiocrnpyler_585441_combined_model_of__biocrnpyler_585441_biocrnpyler_34510 in fusedcell_internal_combined = 9.999757;
  species complex_dna_f_tetR_exsAbiocrnpyler_585441_combined_model_of__biocrnpyler_585441_biocrnpyler_34510 in fusedcell_internal_combined = 4.88604e-5;
  species complex_atc_i_cell2_dna_f_tetR_exsAbiocrnpyler_585441_combined_model_of__biocrnpyler_585441_biocrnpyler_34510 in fusedcell_internal_combined = 0.0001939409;
  species atc_i_cell3 in fusedcell_internal_combined = 9936.886;
  species ssDNA_comp2 in fusedcell_internal_combined = 10;
  species dna_h_gfpbiocrnpyler_948323_combined_model_of__biocrnpyler_948323_biocrnpyler_34510 in fusedcell_internal_combined = 1;
  species rna_h_gfpbiocrnpyler_948323_combined_model_of__biocrnpyler_948323_biocrnpyler_34510 in fusedcell_internal_combined = 0;
  species exsA_exsAbiocrnpyler_585441_combined_model_of__biocrnpyler_585441_biocrnpyler_34510_1_combined in fusedcell_internal_combined = 0;
  species complex_dna_h_exsA_gfpbiocrnpyler_948323_combined_model_of__biocrnpyler_948323_biocrnpyler_34510 in fusedcell_internal_combined = 0;
  species gfp_gfpbiocrnpyler_948323_combined_model_of__biocrnpyler_948323_biocrnpyler_34510 in fusedcell_internal_combined = 0;
  species enzyme_hex_ATP_rheostatbiocrnpyler_34510_combined_model_of__biocrnpyler_585441_biocrnpyler_34510_1_combined in fusedcell_internal_combined = 0.2;
  species ATP_exsAbiocrnpyler_585441_1_combined_combined_model_of__biocrnpyler_585441_biocrnpyler_34510_1_combined in fusedcell_internal_combined = 15;
  species molecule_glucose_ATP_rheostatbiocrnpyler_34510_combined_model_of__biocrnpyler_585441_biocrnpyler_34510_1_combined in fusedcell_internal_combined = 1.489642e-152;
  species molecule_g6p_ATP_rheostatbiocrnpyler_34510_combined_model_of__biocrnpyler_585441_biocrnpyler_34510_1_combined in fusedcell_internal_combined = -1.512507e-79;
  species ADP_exsAbiocrnpyler_585441_1_combined_combined_model_of__biocrnpyler_585441_biocrnpyler_34510_1_combined in fusedcell_internal_combined = -1.000614e-80;
  species complex_enzyme_hex_metabolite_atp_molecule_glucose_ATP_rheostatbiocrnpyler_34510_combined_model_of__biocrnpyler_585441_biocrnpyler_34510_1_combined in fusedcell_internal_combined = 1.251447e-154;
  species complex_enzyme_hex_metabolite_adp_molecule_g6p_ATP_rheostatbiocrnpyler_34510_combined_model_of__biocrnpyler_585441_biocrnpyler_34510_1_combined in fusedcell_internal_combined = -2.72755e-110;
  species enzyme_pgi_ATP_rheostatbiocrnpyler_34510_combined_model_of__biocrnpyler_585441_biocrnpyler_34510_1_combined in fusedcell_internal_combined = 0.2;
  species molecule_f6p_ATP_rheostatbiocrnpyler_34510_combined_model_of__biocrnpyler_585441_biocrnpyler_34510_1_combined in fusedcell_internal_combined = -1.353526e-80;
  species complex_enzyme_pgi_molecule_g6p_ATP_rheostatbiocrnpyler_34510_combined_model_of__biocrnpyler_585441_biocrnpyler_34510_1_combined in fusedcell_internal_combined = -8.405151e-83;
  species complex_enzyme_pgi_molecule_f6p_ATP_rheostatbiocrnpyler_34510_combined_model_of__biocrnpyler_585441_biocrnpyler_34510_1_combined in fusedcell_internal_combined = -3.815891e-80;
  species enzyme_pfk_ATP_rheostatbiocrnpyler_34510_combined_model_of__biocrnpyler_585441_biocrnpyler_34510_1_combined in fusedcell_internal_combined = 0.2;
  species molecule_f16p_ATP_rheostatbiocrnpyler_34510_combined_model_of__biocrnpyler_585441_biocrnpyler_34510_1_combined in fusedcell_internal_combined = -1.118713e-76;
  species complex_enzyme_pfk_metabolite_atp_molecule_f6p_ATP_rheostatbiocrnpyler_34510_combined_model_of__biocrnpyler_585441_biocrnpyler_34510_1_combined in fusedcell_internal_combined = -1.128252e-82;
  species complex_enzyme_pfk_metabolite_adp_molecule_f16p_ATP_rheostatbiocrnpyler_34510_combined_model_of__biocrnpyler_585441_biocrnpyler_34510_1_combined in fusedcell_internal_combined = -5.07678e-80;
  species enzyme_ald_tpi_ATP_rheostatbiocrnpyler_34510_combined_model_of__biocrnpyler_585441_biocrnpyler_34510_1_combined in fusedcell_internal_combined = 0.2;
  species molecule_g3p_ATP_rheostatbiocrnpyler_34510_combined_model_of__biocrnpyler_585441_biocrnpyler_34510_1_combined in fusedcell_internal_combined = 4.79573e-29;
  species complex_enzyme_ald_tpi_molecule_f16p_ATP_rheostatbiocrnpyler_34510_combined_model_of__biocrnpyler_585441_biocrnpyler_34510_1_combined in fusedcell_internal_combined = -6.216791e-80;
  species complex_enzyme_ald_tpi_2x_molecule_g3p_ATP_rheostatbiocrnpyler_34510_combined_model_of__biocrnpyler_585441_biocrnpyler_34510_1_combined in fusedcell_internal_combined = 1.204453e-28;
  species enzyme_gapN_ATP_rheostatbiocrnpyler_34510_combined_model_of__biocrnpyler_585441_biocrnpyler_34510_1_combined in fusedcell_internal_combined = 0.2;
  species metabolite_nadp_ATP_rheostatbiocrnpyler_34510_combined_model_of__biocrnpyler_585441_biocrnpyler_34510_1_combined in fusedcell_internal_combined = 8.938782;
  species molecule_3pg_ATP_rheostatbiocrnpyler_34510_combined_model_of__biocrnpyler_585441_biocrnpyler_34510_1_combined in fusedcell_internal_combined = 1.169782e-28;
  species metabolite_nadph_ATP_rheostatbiocrnpyler_34510_combined_model_of__biocrnpyler_585441_biocrnpyler_34510_1_combined in fusedcell_internal_combined = 20.50943;
  species complex_enzyme_gapN_2x_metabolite_nadp_2x_molecule_g3p_ATP_rheostatbiocrnpyler_34510_combined_model_of__biocrnpyler_585441_biocrnpyler_34510_1_combined in fusedcell_internal_combined = 4.894161e-32;
  species complex_enzyme_gapN_2x_metabolite_nadph_2x_molecule_3pg_ATP_rheostatbiocrnpyler_34510_combined_model_of__biocrnpyler_585441_biocrnpyler_34510_1_combined in fusedcell_internal_combined = 6.858089e-29;
  species enzyme_mGapDH_ATP_rheostatbiocrnpyler_34510_combined_model_of__biocrnpyler_585441_biocrnpyler_34510_1_combined in fusedcell_internal_combined = 0.01864489;
  species P_exsAbiocrnpyler_585441_1_combined_combined_model_of__biocrnpyler_585441_biocrnpyler_34510_1_combined in fusedcell_internal_combined = 4.20391;
  species molecule_13bpg_ATP_rheostatbiocrnpyler_34510_combined_model_of__biocrnpyler_585441_biocrnpyler_34510_1_combined in fusedcell_internal_combined = 4.7426;
  species complex_enzyme_mGapDH_2x_metabolite_nadp_metabolite_pi_2x_molecule_g3p_ATP_rheostatbiocrnpyler_34510_combined_model_of__biocrnpyler_585441_biocrnpyler_34510_1_combined in fusedcell_internal_combined = 2.528446e-31;
  species complex_enzyme_mGapDH_2x_metabolite_nadph_molecule_13bpg_ATP_rheostatbiocrnpyler_34510_combined_model_of__biocrnpyler_585441_biocrnpyler_34510_1_combined in fusedcell_internal_combined = 0.1813551;
  species enzyme_pgk_ATP_rheostatbiocrnpyler_34510_combined_model_of__biocrnpyler_585441_biocrnpyler_34510_1_combined in fusedcell_internal_combined = 0.2;
  species complex_enzyme_pgk_metabolite_adp_molecule_13bpg_ATP_rheostatbiocrnpyler_34510_combined_model_of__biocrnpyler_585441_biocrnpyler_34510_1_combined in fusedcell_internal_combined = -2.637127e-83;
  species complex_enzyme_pgk_metabolite_atp_2x_molecule_3pg_ATP_rheostatbiocrnpyler_34510_combined_model_of__biocrnpyler_585441_biocrnpyler_34510_1_combined in fusedcell_internal_combined = 3.666574e-29;
  species enzyme_pgm_ATP_rheostatbiocrnpyler_34510_combined_model_of__biocrnpyler_585441_biocrnpyler_34510_1_combined in fusedcell_internal_combined = 0.2;
  species molecule_2pg_ATP_rheostatbiocrnpyler_34510_combined_model_of__biocrnpyler_585441_biocrnpyler_34510_1_combined in fusedcell_internal_combined = 1.757547e-28;
  species complex_enzyme_pgm_2x_molecule_3pg_ATP_rheostatbiocrnpyler_34510_combined_model_of__biocrnpyler_585441_biocrnpyler_34510_1_combined in fusedcell_internal_combined = 3.583012e-32;
  species complex_enzyme_pgm_2x_molecule_2pg_ATP_rheostatbiocrnpyler_34510_combined_model_of__biocrnpyler_585441_biocrnpyler_34510_1_combined in fusedcell_internal_combined = 1.77011e-29;
  species enzyme_eno_ATP_rheostatbiocrnpyler_34510_combined_model_of__biocrnpyler_585441_biocrnpyler_34510_1_combined in fusedcell_internal_combined = 0.09607818;
  species molecule_pep_ATP_rheostatbiocrnpyler_34510_combined_model_of__biocrnpyler_585441_biocrnpyler_34510_1_combined in fusedcell_internal_combined = 10.81638;
  species complex_enzyme_eno_2x_molecule_2pg_ATP_rheostatbiocrnpyler_34510_combined_model_of__biocrnpyler_585441_biocrnpyler_34510_1_combined in fusedcell_internal_combined = 2.853329e-32;
  species complex_enzyme_eno_2x_molecule_pep_ATP_rheostatbiocrnpyler_34510_combined_model_of__biocrnpyler_585441_biocrnpyler_34510_1_combined in fusedcell_internal_combined = 0.1039218;
  species enzyme_pyk_ATP_rheostatbiocrnpyler_34510_combined_model_of__biocrnpyler_585441_biocrnpyler_34510_1_combined in fusedcell_internal_combined = 0.2;
  species molecule_pyruvate_ATP_rheostatbiocrnpyler_34510_combined_model_of__biocrnpyler_585441_biocrnpyler_34510_1_combined in fusedcell_internal_combined = -1.082564e-78;
  species complex_enzyme_pyk_2x_metabolite_adp_2x_molecule_pep_ATP_rheostatbiocrnpyler_34510_combined_model_of__biocrnpyler_585441_biocrnpyler_34510_1_combined in fusedcell_internal_combined = -6.014461e-83;
  species complex_enzyme_pyk_2x_metabolite_atp_2x_molecule_pyruvate_ATP_rheostatbiocrnpyler_34510_combined_model_of__biocrnpyler_585441_biocrnpyler_34510_1_combined in fusedcell_internal_combined = -4.329959e-79;
  species enzyme_alsS_ATP_rheostatbiocrnpyler_34510_combined_model_of__biocrnpyler_585441_biocrnpyler_34510_1_combined in fusedcell_internal_combined = 0.2;
  species molecule_acetolac_ATP_rheostatbiocrnpyler_34510_combined_model_of__biocrnpyler_585441_biocrnpyler_34510_1_combined in fusedcell_internal_combined = -6.948424e-80;
  species complex_enzyme_alsS_2x_molecule_pyruvate_ATP_rheostatbiocrnpyler_34510_combined_model_of__biocrnpyler_585441_biocrnpyler_34510_1_combined in fusedcell_internal_combined = -6.015913e-82;
  species complex_enzyme_alsS_molecule_acetolac_ATP_rheostatbiocrnpyler_34510_combined_model_of__biocrnpyler_585441_biocrnpyler_34510_1_combined in fusedcell_internal_combined = -2.724339e-79;
  species enzyme_IlvC_ATP_rheostatbiocrnpyler_34510_combined_model_of__biocrnpyler_585441_biocrnpyler_34510_1_combined in fusedcell_internal_combined = 0.2;
  species molecule_23dih3mebut_ATP_rheostatbiocrnpyler_34510_combined_model_of__biocrnpyler_585441_biocrnpyler_34510_1_combined in fusedcell_internal_combined = 1.056107e-73;
  species complex_enzyme_IlvC_metabolite_nadph_molecule_acetolac_ATP_rheostatbiocrnpyler_34510_combined_model_of__biocrnpyler_585441_biocrnpyler_34510_1_combined in fusedcell_internal_combined = -7.91932e-82;
  species complex_enzyme_IlvC_metabolite_nadp_molecule_23dih3mebut_ATP_rheostatbiocrnpyler_34510_combined_model_of__biocrnpyler_585441_biocrnpyler_34510_1_combined in fusedcell_internal_combined = 2.2603e-74;
  species enzyme_IlvD_ATP_rheostatbiocrnpyler_34510_combined_model_of__biocrnpyler_585441_biocrnpyler_34510_1_combined in fusedcell_internal_combined = 0.2;
  species molecule_3me2oxo_ATP_rheostatbiocrnpyler_34510_combined_model_of__biocrnpyler_585441_biocrnpyler_34510_1_combined in fusedcell_internal_combined = 8.073869e-73;
  species complex_enzyme_IlvD_molecule_23dih3mebut_ATP_rheostatbiocrnpyler_34510_combined_model_of__biocrnpyler_585441_biocrnpyler_34510_1_combined in fusedcell_internal_combined = 5.868315e-77;
  species complex_enzyme_IlvD_molecule_3me2oxo_ATP_rheostatbiocrnpyler_34510_combined_model_of__biocrnpyler_585441_biocrnpyler_34510_1_combined in fusedcell_internal_combined = 4.462248e-74;
  species enzyme_kivD_ATP_rheostatbiocrnpyler_34510_combined_model_of__biocrnpyler_585441_biocrnpyler_34510_1_combined in fusedcell_internal_combined = 0.2;
  species molecule_isobutanal_ATP_rheostatbiocrnpyler_34510_combined_model_of__biocrnpyler_585441_biocrnpyler_34510_1_combined in fusedcell_internal_combined = 3.500069e-72;
  species complex_enzyme_kivD_molecule_3me2oxo_ATP_rheostatbiocrnpyler_34510_combined_model_of__biocrnpyler_585441_biocrnpyler_34510_1_combined in fusedcell_internal_combined = 4.486289e-76;
  species complex_enzyme_kivD_molecule_isobutanal_ATP_rheostatbiocrnpyler_34510_combined_model_of__biocrnpyler_585441_biocrnpyler_34510_1_combined in fusedcell_internal_combined = 2.771472e-73;
  species enzyme_yahk_ATP_rheostatbiocrnpyler_34510_combined_model_of__biocrnpyler_585441_biocrnpyler_34510_1_combined in fusedcell_internal_combined = 0.01091777;
  species molecule_isobutanol_ATP_rheostatbiocrnpyler_34510_combined_model_of__biocrnpyler_585441_biocrnpyler_34510_1_combined in fusedcell_internal_combined = 19.37485;
  species complex_enzyme_yahk_metabolite_nadph_molecule_isobutanal_ATP_rheostatbiocrnpyler_34510_combined_model_of__biocrnpyler_585441_biocrnpyler_34510_1_combined in fusedcell_internal_combined = 2.17745e-75;
  species complex_enzyme_yahk_metabolite_nadp_molecule_isobutanol_ATP_rheostatbiocrnpyler_34510_combined_model_of__biocrnpyler_585441_biocrnpyler_34510_1_combined in fusedcell_internal_combined = 0.1890822;
  species atc_e_external_reservoir_model_1_combined_1_combined in fusedcell_external = 63.11422;

  // Parameters:
  kb_combined = 0.002 per_second;
  kd_combined = 1e-5 per_second;

  // Reactions:
  r1_cell2: atc_e_external_reservoir_model_1_combined_1_combined -> atc_i_cell2_1_combined; kb_combined*atc_e_external_reservoir_model_1_combined_1_combined - kd_combined*atc_i_cell2_1_combined;
  r0_exsAbiocrnpyler_585441_combined_model_of__biocrnpyler_585441_biocrnpyler_34510: atc_i_cell2_1_combined + tetR_exsAbiocrnpyler_585441_combined_model_of__biocrnpyler_585441_biocrnpyler_34510 => complex_atc_i_cell2_tetR_exsAbiocrnpyler_585441_combined_model_of__biocrnpyler_585441_biocrnpyler_34510; r0_exsAbiocrnpyler_585441_combined_model_of__biocrnpyler_585441_biocrnpyler_34510_k*atc_i_cell2_1_combined*tetR_exsAbiocrnpyler_585441_combined_model_of__biocrnpyler_585441_biocrnpyler_34510; r0_exsAbiocrnpyler_585441_combined_model_of__biocrnpyler_585441_biocrnpyler_34510 is "r0cell2";
    r0_exsAbiocrnpyler_585441_combined_model_of__biocrnpyler_585441_biocrnpyler_34510_k = 2e-5;
  r0_1_exsAbiocrnpyler_585441_combined_model_of__biocrnpyler_585441_biocrnpyler_34510: complex_atc_i_cell2_tetR_exsAbiocrnpyler_585441_combined_model_of__biocrnpyler_585441_biocrnpyler_34510 => atc_i_cell2_1_combined + tetR_exsAbiocrnpyler_585441_combined_model_of__biocrnpyler_585441_biocrnpyler_34510; r0_1_exsAbiocrnpyler_585441_combined_model_of__biocrnpyler_585441_biocrnpyler_34510_k*complex_atc_i_cell2_tetR_exsAbiocrnpyler_585441_combined_model_of__biocrnpyler_585441_biocrnpyler_34510; r0_1_exsAbiocrnpyler_585441_combined_model_of__biocrnpyler_585441_biocrnpyler_34510 is "r0_1cell2";
    r0_1_exsAbiocrnpyler_585441_combined_model_of__biocrnpyler_585441_biocrnpyler_34510_k = 2e-9;
  r2_exsAbiocrnpyler_585441_combined_model_of__biocrnpyler_585441_biocrnpyler_34510: dna_f_exsAbiocrnpyler_585441_combined_model_of__biocrnpyler_585441_biocrnpyler_34510 + tetR_exsAbiocrnpyler_585441_combined_model_of__biocrnpyler_585441_biocrnpyler_34510 => complex_dna_f_tetR_exsAbiocrnpyler_585441_combined_model_of__biocrnpyler_585441_biocrnpyler_34510; r2_exsAbiocrnpyler_585441_combined_model_of__biocrnpyler_585441_biocrnpyler_34510_k*dna_f_exsAbiocrnpyler_585441_combined_model_of__biocrnpyler_585441_biocrnpyler_34510*tetR_exsAbiocrnpyler_585441_combined_model_of__biocrnpyler_585441_biocrnpyler_34510;
    r2_exsAbiocrnpyler_585441_combined_model_of__biocrnpyler_585441_biocrnpyler_34510_k = 4e-7;
  r2_1_exsAbiocrnpyler_585441_combined_model_of__biocrnpyler_585441_biocrnpyler_34510: complex_dna_f_tetR_exsAbiocrnpyler_585441_combined_model_of__biocrnpyler_585441_biocrnpyler_34510 => dna_f_exsAbiocrnpyler_585441_combined_model_of__biocrnpyler_585441_biocrnpyler_34510 + tetR_exsAbiocrnpyler_585441_combined_model_of__biocrnpyler_585441_biocrnpyler_34510; r2_1_exsAbiocrnpyler_585441_combined_model_of__biocrnpyler_585441_biocrnpyler_34510_k*complex_dna_f_tetR_exsAbiocrnpyler_585441_combined_model_of__biocrnpyler_585441_biocrnpyler_34510;
    r2_1_exsAbiocrnpyler_585441_combined_model_of__biocrnpyler_585441_biocrnpyler_34510_k = 1e-12;
  r4_exsAbiocrnpyler_585441_combined_model_of__biocrnpyler_585441_biocrnpyler_34510: complex_dna_f_tetR_exsAbiocrnpyler_585441_combined_model_of__biocrnpyler_585441_biocrnpyler_34510 + atc_i_cell2_1_combined => complex_atc_i_cell2_dna_f_tetR_exsAbiocrnpyler_585441_combined_model_of__biocrnpyler_585441_biocrnpyler_34510; r4_exsAbiocrnpyler_585441_combined_model_of__biocrnpyler_585441_biocrnpyler_34510_k*complex_dna_f_tetR_exsAbiocrnpyler_585441_combined_model_of__biocrnpyler_585441_biocrnpyler_34510*atc_i_cell2_1_combined;
    r4_exsAbiocrnpyler_585441_combined_model_of__biocrnpyler_585441_biocrnpyler_34510_k = 6e-8;
  r4_1_exsAbiocrnpyler_585441_combined_model_of__biocrnpyler_585441_biocrnpyler_34510: complex_atc_i_cell2_dna_f_tetR_exsAbiocrnpyler_585441_combined_model_of__biocrnpyler_585441_biocrnpyler_34510 => complex_dna_f_tetR_exsAbiocrnpyler_585441_combined_model_of__biocrnpyler_585441_biocrnpyler_34510 + atc_i_cell2_1_combined; r4_1_exsAbiocrnpyler_585441_combined_model_of__biocrnpyler_585441_biocrnpyler_34510_k*complex_atc_i_cell2_dna_f_tetR_exsAbiocrnpyler_585441_combined_model_of__biocrnpyler_585441_biocrnpyler_34510;
    r4_1_exsAbiocrnpyler_585441_combined_model_of__biocrnpyler_585441_biocrnpyler_34510_k = 3e-9;
  r6_exsAbiocrnpyler_585441_combined_model_of__biocrnpyler_585441_biocrnpyler_34510: complex_atc_i_cell2_dna_f_tetR_exsAbiocrnpyler_585441_combined_model_of__biocrnpyler_585441_biocrnpyler_34510 => dna_f_exsAbiocrnpyler_585441_combined_model_of__biocrnpyler_585441_biocrnpyler_34510 + complex_atc_i_cell2_tetR_exsAbiocrnpyler_585441_combined_model_of__biocrnpyler_585441_biocrnpyler_34510; r6_exsAbiocrnpyler_585441_combined_model_of__biocrnpyler_585441_biocrnpyler_34510_k*complex_atc_i_cell2_dna_f_tetR_exsAbiocrnpyler_585441_combined_model_of__biocrnpyler_585441_biocrnpyler_34510;
    r6_exsAbiocrnpyler_585441_combined_model_of__biocrnpyler_585441_biocrnpyler_34510_k = 5e-5;
  r6_1_exsAbiocrnpyler_585441_combined_model_of__biocrnpyler_585441_biocrnpyler_34510: dna_f_exsAbiocrnpyler_585441_combined_model_of__biocrnpyler_585441_biocrnpyler_34510 + complex_atc_i_cell2_tetR_exsAbiocrnpyler_585441_combined_model_of__biocrnpyler_585441_biocrnpyler_34510 => complex_atc_i_cell2_dna_f_tetR_exsAbiocrnpyler_585441_combined_model_of__biocrnpyler_585441_biocrnpyler_34510; r6_1_exsAbiocrnpyler_585441_combined_model_of__biocrnpyler_585441_biocrnpyler_34510_k*dna_f_exsAbiocrnpyler_585441_combined_model_of__biocrnpyler_585441_biocrnpyler_34510*complex_atc_i_cell2_tetR_exsAbiocrnpyler_585441_combined_model_of__biocrnpyler_585441_biocrnpyler_34510;
    r6_1_exsAbiocrnpyler_585441_combined_model_of__biocrnpyler_585441_biocrnpyler_34510_k = 1e-10;
  r8_exsAbiocrnpyler_585441_combined_model_of__biocrnpyler_585441_biocrnpyler_34510: dna_f_exsAbiocrnpyler_585441_combined_model_of__biocrnpyler_585441_biocrnpyler_34510 => dna_f_exsAbiocrnpyler_585441_combined_model_of__biocrnpyler_585441_biocrnpyler_34510 + rna_f_exsAbiocrnpyler_585441_combined_model_of__biocrnpyler_585441_biocrnpyler_34510; r8_exsAbiocrnpyler_585441_combined_model_of__biocrnpyler_585441_biocrnpyler_34510_k*dna_f_exsAbiocrnpyler_585441_combined_model_of__biocrnpyler_585441_biocrnpyler_34510;
    r8_exsAbiocrnpyler_585441_combined_model_of__biocrnpyler_585441_biocrnpyler_34510_k = 0.001875;
  r9_exsAbiocrnpyler_585441_combined_model_of__biocrnpyler_585441_biocrnpyler_34510: rna_f_exsAbiocrnpyler_585441_combined_model_of__biocrnpyler_585441_biocrnpyler_34510 + ATP_exsAbiocrnpyler_585441_1_combined_combined_model_of__biocrnpyler_585441_biocrnpyler_34510_1_combined => rna_f_exsAbiocrnpyler_585441_combined_model_of__biocrnpyler_585441_biocrnpyler_34510 + ADP_exsAbiocrnpyler_585441_1_combined_combined_model_of__biocrnpyler_585441_biocrnpyler_34510_1_combined + exsA_exsAbiocrnpyler_585441_combined_model_of__biocrnpyler_585441_biocrnpyler_34510_1_combined + P_exsAbiocrnpyler_585441_1_combined_combined_model_of__biocrnpyler_585441_biocrnpyler_34510_1_combined; r9_exsAbiocrnpyler_585441_combined_model_of__biocrnpyler_585441_biocrnpyler_34510_k*rna_f_exsAbiocrnpyler_585441_combined_model_of__biocrnpyler_585441_biocrnpyler_34510*ATP_exsAbiocrnpyler_585441_1_combined_combined_model_of__biocrnpyler_585441_biocrnpyler_34510_1_combined^r9_exsAbiocrnpyler_585441_combined_model_of__biocrnpyler_585441_biocrnpyler_34510_n/(ATP_exsAbiocrnpyler_585441_1_combined_combined_model_of__biocrnpyler_585441_biocrnpyler_34510_1_combined^r9_exsAbiocrnpyler_585441_combined_model_of__biocrnpyler_585441_biocrnpyler_34510_n + r9_exsAbiocrnpyler_585441_combined_model_of__biocrnpyler_585441_biocrnpyler_34510_K);
    r9_exsAbiocrnpyler_585441_combined_model_of__biocrnpyler_585441_biocrnpyler_34510_k = 0.0005; r9_exsAbiocrnpyler_585441_combined_model_of__biocrnpyler_585441_biocrnpyler_34510_n = 1; r9_exsAbiocrnpyler_585441_combined_model_of__biocrnpyler_585441_biocrnpyler_34510_K = 1;
  r10_exsAbiocrnpyler_585441_combined_model_of__biocrnpyler_585441_biocrnpyler_34510: rna_f_exsAbiocrnpyler_585441_combined_model_of__biocrnpyler_585441_biocrnpyler_34510 => ; r10_exsAbiocrnpyler_585441_combined_model_of__biocrnpyler_585441_biocrnpyler_34510_k*rna_f_exsAbiocrnpyler_585441_combined_model_of__biocrnpyler_585441_biocrnpyler_34510;
    r10_exsAbiocrnpyler_585441_combined_model_of__biocrnpyler_585441_biocrnpyler_34510_k = 0.001;
  r0_ATP_rheostatbiocrnpyler_34510_combined_model_of__biocrnpyler_585441_biocrnpyler_34510_combined: enzyme_hex_ATP_rheostatbiocrnpyler_34510_combined_model_of__biocrnpyler_585441_biocrnpyler_34510_1_combined + ATP_exsAbiocrnpyler_585441_1_combined_combined_model_of__biocrnpyler_585441_biocrnpyler_34510_1_combined + molecule_glucose_ATP_rheostatbiocrnpyler_34510_combined_model_of__biocrnpyler_585441_biocrnpyler_34510_1_combined => complex_enzyme_hex_metabolite_atp_molecule_glucose_ATP_rheostatbiocrnpyler_34510_combined_model_of__biocrnpyler_585441_biocrnpyler_34510_1_combined; r0_ATP_rheostatbiocrnpyler_34510_combined_model_of__biocrnpyler_585441_biocrnpyler_34510_combined_k*enzyme_hex_ATP_rheostatbiocrnpyler_34510_combined_model_of__biocrnpyler_585441_biocrnpyler_34510_1_combined*ATP_exsAbiocrnpyler_585441_1_combined_combined_model_of__biocrnpyler_585441_biocrnpyler_34510_1_combined*molecule_glucose_ATP_rheostatbiocrnpyler_34510_combined_model_of__biocrnpyler_585441_biocrnpyler_34510_1_combined;
    r0_ATP_rheostatbiocrnpyler_34510_combined_model_of__biocrnpyler_585441_biocrnpyler_34510_combined_k = 100;
  r0_1_ATP_rheostatbiocrnpyler_34510_combined_model_of__biocrnpyler_585441_biocrnpyler_34510_combined: complex_enzyme_hex_metabolite_atp_molecule_glucose_ATP_rheostatbiocrnpyler_34510_combined_model_of__biocrnpyler_585441_biocrnpyler_34510_1_combined => enzyme_hex_ATP_rheostatbiocrnpyler_34510_combined_model_of__biocrnpyler_585441_biocrnpyler_34510_1_combined + ATP_exsAbiocrnpyler_585441_1_combined_combined_model_of__biocrnpyler_585441_biocrnpyler_34510_1_combined + molecule_glucose_ATP_rheostatbiocrnpyler_34510_combined_model_of__biocrnpyler_585441_biocrnpyler_34510_1_combined; r0_1_ATP_rheostatbiocrnpyler_34510_combined_model_of__biocrnpyler_585441_biocrnpyler_34510_combined_k*complex_enzyme_hex_metabolite_atp_molecule_glucose_ATP_rheostatbiocrnpyler_34510_combined_model_of__biocrnpyler_585441_biocrnpyler_34510_1_combined;
    r0_1_ATP_rheostatbiocrnpyler_34510_combined_model_of__biocrnpyler_585441_biocrnpyler_34510_combined_k = 10;
  r2_ATP_rheostatbiocrnpyler_34510_combined_model_of__biocrnpyler_585441_biocrnpyler_34510_combined: complex_enzyme_hex_metabolite_atp_molecule_glucose_ATP_rheostatbiocrnpyler_34510_combined_model_of__biocrnpyler_585441_biocrnpyler_34510_1_combined => complex_enzyme_hex_metabolite_adp_molecule_g6p_ATP_rheostatbiocrnpyler_34510_combined_model_of__biocrnpyler_585441_biocrnpyler_34510_1_combined; r2_ATP_rheostatbiocrnpyler_34510_combined_model_of__biocrnpyler_585441_biocrnpyler_34510_combined_k*complex_enzyme_hex_metabolite_atp_molecule_glucose_ATP_rheostatbiocrnpyler_34510_combined_model_of__biocrnpyler_585441_biocrnpyler_34510_1_combined;
    r2_ATP_rheostatbiocrnpyler_34510_combined_model_of__biocrnpyler_585441_biocrnpyler_34510_combined_k = 36000;
  r3_ATP_rheostatbiocrnpyler_34510_combined_model_of__biocrnpyler_585441_biocrnpyler_34510_combined: complex_enzyme_hex_metabolite_adp_molecule_g6p_ATP_rheostatbiocrnpyler_34510_combined_model_of__biocrnpyler_585441_biocrnpyler_34510_1_combined => enzyme_hex_ATP_rheostatbiocrnpyler_34510_combined_model_of__biocrnpyler_585441_biocrnpyler_34510_1_combined + molecule_g6p_ATP_rheostatbiocrnpyler_34510_combined_model_of__biocrnpyler_585441_biocrnpyler_34510_1_combined + ADP_exsAbiocrnpyler_585441_1_combined_combined_model_of__biocrnpyler_585441_biocrnpyler_34510_1_combined; r3_ATP_rheostatbiocrnpyler_34510_combined_model_of__biocrnpyler_585441_biocrnpyler_34510_combined_k*complex_enzyme_hex_metabolite_adp_molecule_g6p_ATP_rheostatbiocrnpyler_34510_combined_model_of__biocrnpyler_585441_biocrnpyler_34510_1_combined;
    r3_ATP_rheostatbiocrnpyler_34510_combined_model_of__biocrnpyler_585441_biocrnpyler_34510_combined_k = 100;
  r3_1_ATP_rheostatbiocrnpyler_34510_combined_model_of__biocrnpyler_585441_biocrnpyler_34510_combined: enzyme_hex_ATP_rheostatbiocrnpyler_34510_combined_model_of__biocrnpyler_585441_biocrnpyler_34510_1_combined + molecule_g6p_ATP_rheostatbiocrnpyler_34510_combined_model_of__biocrnpyler_585441_biocrnpyler_34510_1_combined + ADP_exsAbiocrnpyler_585441_1_combined_combined_model_of__biocrnpyler_585441_biocrnpyler_34510_1_combined => complex_enzyme_hex_metabolite_adp_molecule_g6p_ATP_rheostatbiocrnpyler_34510_combined_model_of__biocrnpyler_585441_biocrnpyler_34510_1_combined; r3_1_ATP_rheostatbiocrnpyler_34510_combined_model_of__biocrnpyler_585441_biocrnpyler_34510_combined_k*enzyme_hex_ATP_rheostatbiocrnpyler_34510_combined_model_of__biocrnpyler_585441_biocrnpyler_34510_1_combined*molecule_g6p_ATP_rheostatbiocrnpyler_34510_combined_model_of__biocrnpyler_585441_biocrnpyler_34510_1_combined*ADP_exsAbiocrnpyler_585441_1_combined_combined_model_of__biocrnpyler_585441_biocrnpyler_34510_1_combined;
    r3_1_ATP_rheostatbiocrnpyler_34510_combined_model_of__biocrnpyler_585441_biocrnpyler_34510_combined_k = 10;
  r5_ATP_rheostatbiocrnpyler_34510_combined_model_of__biocrnpyler_585441_biocrnpyler_34510_combined: enzyme_pgi_ATP_rheostatbiocrnpyler_34510_combined_model_of__biocrnpyler_585441_biocrnpyler_34510_1_combined + molecule_g6p_ATP_rheostatbiocrnpyler_34510_combined_model_of__biocrnpyler_585441_biocrnpyler_34510_1_combined => complex_enzyme_pgi_molecule_g6p_ATP_rheostatbiocrnpyler_34510_combined_model_of__biocrnpyler_585441_biocrnpyler_34510_1_combined; r5_ATP_rheostatbiocrnpyler_34510_combined_model_of__biocrnpyler_585441_biocrnpyler_34510_combined_k*enzyme_pgi_ATP_rheostatbiocrnpyler_34510_combined_model_of__biocrnpyler_585441_biocrnpyler_34510_1_combined*molecule_g6p_ATP_rheostatbiocrnpyler_34510_combined_model_of__biocrnpyler_585441_biocrnpyler_34510_1_combined;
    r5_ATP_rheostatbiocrnpyler_34510_combined_model_of__biocrnpyler_585441_biocrnpyler_34510_combined_k = 100;
  r5_1_ATP_rheostatbiocrnpyler_34510_combined_model_of__biocrnpyler_585441_biocrnpyler_34510_combined: complex_enzyme_pgi_molecule_g6p_ATP_rheostatbiocrnpyler_34510_combined_model_of__biocrnpyler_585441_biocrnpyler_34510_1_combined => enzyme_pgi_ATP_rheostatbiocrnpyler_34510_combined_model_of__biocrnpyler_585441_biocrnpyler_34510_1_combined + molecule_g6p_ATP_rheostatbiocrnpyler_34510_combined_model_of__biocrnpyler_585441_biocrnpyler_34510_1_combined; r5_1_ATP_rheostatbiocrnpyler_34510_combined_model_of__biocrnpyler_585441_biocrnpyler_34510_combined_k*complex_enzyme_pgi_molecule_g6p_ATP_rheostatbiocrnpyler_34510_combined_model_of__biocrnpyler_585441_biocrnpyler_34510_1_combined;
    r5_1_ATP_rheostatbiocrnpyler_34510_combined_model_of__biocrnpyler_585441_biocrnpyler_34510_combined_k = 10;
  r7_ATP_rheostatbiocrnpyler_34510_combined_model_of__biocrnpyler_585441_biocrnpyler_34510_combined: complex_enzyme_pgi_molecule_g6p_ATP_rheostatbiocrnpyler_34510_combined_model_of__biocrnpyler_585441_biocrnpyler_34510_1_combined => complex_enzyme_pgi_molecule_f6p_ATP_rheostatbiocrnpyler_34510_combined_model_of__biocrnpyler_585441_biocrnpyler_34510_1_combined; r7_ATP_rheostatbiocrnpyler_34510_combined_model_of__biocrnpyler_585441_biocrnpyler_34510_combined_k*complex_enzyme_pgi_molecule_g6p_ATP_rheostatbiocrnpyler_34510_combined_model_of__biocrnpyler_585441_biocrnpyler_34510_1_combined;
    r7_ATP_rheostatbiocrnpyler_34510_combined_model_of__biocrnpyler_585441_biocrnpyler_34510_combined_k = 36000;
  r8_ATP_rheostatbiocrnpyler_34510_combined_model_of__biocrnpyler_585441_biocrnpyler_34510_combined: complex_enzyme_pgi_molecule_f6p_ATP_rheostatbiocrnpyler_34510_combined_model_of__biocrnpyler_585441_biocrnpyler_34510_1_combined => enzyme_pgi_ATP_rheostatbiocrnpyler_34510_combined_model_of__biocrnpyler_585441_biocrnpyler_34510_1_combined + molecule_f6p_ATP_rheostatbiocrnpyler_34510_combined_model_of__biocrnpyler_585441_biocrnpyler_34510_1_combined; r8_ATP_rheostatbiocrnpyler_34510_combined_model_of__biocrnpyler_585441_biocrnpyler_34510_combined_k*complex_enzyme_pgi_molecule_f6p_ATP_rheostatbiocrnpyler_34510_combined_model_of__biocrnpyler_585441_biocrnpyler_34510_1_combined;
    r8_ATP_rheostatbiocrnpyler_34510_combined_model_of__biocrnpyler_585441_biocrnpyler_34510_combined_k = 100;
  r8_1_ATP_rheostatbiocrnpyler_34510_combined_model_of__biocrnpyler_585441_biocrnpyler_34510_combined: enzyme_pgi_ATP_rheostatbiocrnpyler_34510_combined_model_of__biocrnpyler_585441_biocrnpyler_34510_1_combined + molecule_f6p_ATP_rheostatbiocrnpyler_34510_combined_model_of__biocrnpyler_585441_biocrnpyler_34510_1_combined => complex_enzyme_pgi_molecule_f6p_ATP_rheostatbiocrnpyler_34510_combined_model_of__biocrnpyler_585441_biocrnpyler_34510_1_combined; r8_1_ATP_rheostatbiocrnpyler_34510_combined_model_of__biocrnpyler_585441_biocrnpyler_34510_combined_k*enzyme_pgi_ATP_rheostatbiocrnpyler_34510_combined_model_of__biocrnpyler_585441_biocrnpyler_34510_1_combined*molecule_f6p_ATP_rheostatbiocrnpyler_34510_combined_model_of__biocrnpyler_585441_biocrnpyler_34510_1_combined;
    r8_1_ATP_rheostatbiocrnpyler_34510_combined_model_of__biocrnpyler_585441_biocrnpyler_34510_combined_k = 10;
  r10_ATP_rheostatbiocrnpyler_34510_combined_model_of__biocrnpyler_585441_biocrnpyler_34510_combined: enzyme_pfk_ATP_rheostatbiocrnpyler_34510_combined_model_of__biocrnpyler_585441_biocrnpyler_34510_1_combined + ATP_exsAbiocrnpyler_585441_1_combined_combined_model_of__biocrnpyler_585441_biocrnpyler_34510_1_combined + molecule_f6p_ATP_rheostatbiocrnpyler_34510_combined_model_of__biocrnpyler_585441_biocrnpyler_34510_1_combined => complex_enzyme_pfk_metabolite_atp_molecule_f6p_ATP_rheostatbiocrnpyler_34510_combined_model_of__biocrnpyler_585441_biocrnpyler_34510_1_combined; r10_ATP_rheostatbiocrnpyler_34510_combined_model_of__biocrnpyler_585441_biocrnpyler_34510_combined_k*enzyme_pfk_ATP_rheostatbiocrnpyler_34510_combined_model_of__biocrnpyler_585441_biocrnpyler_34510_1_combined*ATP_exsAbiocrnpyler_585441_1_combined_combined_model_of__biocrnpyler_585441_biocrnpyler_34510_1_combined*molecule_f6p_ATP_rheostatbiocrnpyler_34510_combined_model_of__biocrnpyler_585441_biocrnpyler_34510_1_combined;
    r10_ATP_rheostatbiocrnpyler_34510_combined_model_of__biocrnpyler_585441_biocrnpyler_34510_combined_k = 100;
  r10_1_ATP_rheostatbiocrnpyler_34510_combined_model_of__biocrnpyler_585441_biocrnpyler_34510_combined: complex_enzyme_pfk_metabolite_atp_molecule_f6p_ATP_rheostatbiocrnpyler_34510_combined_model_of__biocrnpyler_585441_biocrnpyler_34510_1_combined => enzyme_pfk_ATP_rheostatbiocrnpyler_34510_combined_model_of__biocrnpyler_585441_biocrnpyler_34510_1_combined + ATP_exsAbiocrnpyler_585441_1_combined_combined_model_of__biocrnpyler_585441_biocrnpyler_34510_1_combined + molecule_f6p_ATP_rheostatbiocrnpyler_34510_combined_model_of__biocrnpyler_585441_biocrnpyler_34510_1_combined; r10_1_ATP_rheostatbiocrnpyler_34510_combined_model_of__biocrnpyler_585441_biocrnpyler_34510_combined_k*complex_enzyme_pfk_metabolite_atp_molecule_f6p_ATP_rheostatbiocrnpyler_34510_combined_model_of__biocrnpyler_585441_biocrnpyler_34510_1_combined;
    r10_1_ATP_rheostatbiocrnpyler_34510_combined_model_of__biocrnpyler_585441_biocrnpyler_34510_combined_k = 10;
  r12_ATP_rheostatbiocrnpyler_34510_combined_model_of__biocrnpyler_585441_biocrnpyler_34510_combined: complex_enzyme_pfk_metabolite_atp_molecule_f6p_ATP_rheostatbiocrnpyler_34510_combined_model_of__biocrnpyler_585441_biocrnpyler_34510_1_combined => complex_enzyme_pfk_metabolite_adp_molecule_f16p_ATP_rheostatbiocrnpyler_34510_combined_model_of__biocrnpyler_585441_biocrnpyler_34510_1_combined; r12_ATP_rheostatbiocrnpyler_34510_combined_model_of__biocrnpyler_585441_biocrnpyler_34510_combined_k*complex_enzyme_pfk_metabolite_atp_molecule_f6p_ATP_rheostatbiocrnpyler_34510_combined_model_of__biocrnpyler_585441_biocrnpyler_34510_1_combined;
    r12_ATP_rheostatbiocrnpyler_34510_combined_model_of__biocrnpyler_585441_biocrnpyler_34510_combined_k = 36000;
  r13_ATP_rheostatbiocrnpyler_34510_combined_model_of__biocrnpyler_585441_biocrnpyler_34510_combined: complex_enzyme_pfk_metabolite_adp_molecule_f16p_ATP_rheostatbiocrnpyler_34510_combined_model_of__biocrnpyler_585441_biocrnpyler_34510_1_combined => enzyme_pfk_ATP_rheostatbiocrnpyler_34510_combined_model_of__biocrnpyler_585441_biocrnpyler_34510_1_combined + molecule_f16p_ATP_rheostatbiocrnpyler_34510_combined_model_of__biocrnpyler_585441_biocrnpyler_34510_1_combined + ADP_exsAbiocrnpyler_585441_1_combined_combined_model_of__biocrnpyler_585441_biocrnpyler_34510_1_combined; r13_ATP_rheostatbiocrnpyler_34510_combined_model_of__biocrnpyler_585441_biocrnpyler_34510_combined_k*complex_enzyme_pfk_metabolite_adp_molecule_f16p_ATP_rheostatbiocrnpyler_34510_combined_model_of__biocrnpyler_585441_biocrnpyler_34510_1_combined;
    r13_ATP_rheostatbiocrnpyler_34510_combined_model_of__biocrnpyler_585441_biocrnpyler_34510_combined_k = 100;
  r13_1_ATP_rheostatbiocrnpyler_34510_combined_model_of__biocrnpyler_585441_biocrnpyler_34510_combined: enzyme_pfk_ATP_rheostatbiocrnpyler_34510_combined_model_of__biocrnpyler_585441_biocrnpyler_34510_1_combined + molecule_f16p_ATP_rheostatbiocrnpyler_34510_combined_model_of__biocrnpyler_585441_biocrnpyler_34510_1_combined + ADP_exsAbiocrnpyler_585441_1_combined_combined_model_of__biocrnpyler_585441_biocrnpyler_34510_1_combined => complex_enzyme_pfk_metabolite_adp_molecule_f16p_ATP_rheostatbiocrnpyler_34510_combined_model_of__biocrnpyler_585441_biocrnpyler_34510_1_combined; r13_1_ATP_rheostatbiocrnpyler_34510_combined_model_of__biocrnpyler_585441_biocrnpyler_34510_combined_k*enzyme_pfk_ATP_rheostatbiocrnpyler_34510_combined_model_of__biocrnpyler_585441_biocrnpyler_34510_1_combined*molecule_f16p_ATP_rheostatbiocrnpyler_34510_combined_model_of__biocrnpyler_585441_biocrnpyler_34510_1_combined*ADP_exsAbiocrnpyler_585441_1_combined_combined_model_of__biocrnpyler_585441_biocrnpyler_34510_1_combined;
    r13_1_ATP_rheostatbiocrnpyler_34510_combined_model_of__biocrnpyler_585441_biocrnpyler_34510_combined_k = 10;
  r15_ATP_rheostatbiocrnpyler_34510_combined_model_of__biocrnpyler_585441_biocrnpyler_34510_combined: enzyme_ald_tpi_ATP_rheostatbiocrnpyler_34510_combined_model_of__biocrnpyler_585441_biocrnpyler_34510_1_combined + molecule_f16p_ATP_rheostatbiocrnpyler_34510_combined_model_of__biocrnpyler_585441_biocrnpyler_34510_1_combined => complex_enzyme_ald_tpi_molecule_f16p_ATP_rheostatbiocrnpyler_34510_combined_model_of__biocrnpyler_585441_biocrnpyler_34510_1_combined; r15_ATP_rheostatbiocrnpyler_34510_combined_model_of__biocrnpyler_585441_biocrnpyler_34510_combined_k*enzyme_ald_tpi_ATP_rheostatbiocrnpyler_34510_combined_model_of__biocrnpyler_585441_biocrnpyler_34510_1_combined*molecule_f16p_ATP_rheostatbiocrnpyler_34510_combined_model_of__biocrnpyler_585441_biocrnpyler_34510_1_combined;
    r15_ATP_rheostatbiocrnpyler_34510_combined_model_of__biocrnpyler_585441_biocrnpyler_34510_combined_k = 100;
  r15_1_ATP_rheostatbiocrnpyler_34510_combined_model_of__biocrnpyler_585441_biocrnpyler_34510_combined: complex_enzyme_ald_tpi_molecule_f16p_ATP_rheostatbiocrnpyler_34510_combined_model_of__biocrnpyler_585441_biocrnpyler_34510_1_combined => enzyme_ald_tpi_ATP_rheostatbiocrnpyler_34510_combined_model_of__biocrnpyler_585441_biocrnpyler_34510_1_combined + molecule_f16p_ATP_rheostatbiocrnpyler_34510_combined_model_of__biocrnpyler_585441_biocrnpyler_34510_1_combined; r15_1_ATP_rheostatbiocrnpyler_34510_combined_model_of__biocrnpyler_585441_biocrnpyler_34510_combined_k*complex_enzyme_ald_tpi_molecule_f16p_ATP_rheostatbiocrnpyler_34510_combined_model_of__biocrnpyler_585441_biocrnpyler_34510_1_combined;
    r15_1_ATP_rheostatbiocrnpyler_34510_combined_model_of__biocrnpyler_585441_biocrnpyler_34510_combined_k = 10;
  r17_ATP_rheostatbiocrnpyler_34510_combined_model_of__biocrnpyler_585441_biocrnpyler_34510_combined: complex_enzyme_ald_tpi_molecule_f16p_ATP_rheostatbiocrnpyler_34510_combined_model_of__biocrnpyler_585441_biocrnpyler_34510_1_combined => complex_enzyme_ald_tpi_2x_molecule_g3p_ATP_rheostatbiocrnpyler_34510_combined_model_of__biocrnpyler_585441_biocrnpyler_34510_1_combined; r17_ATP_rheostatbiocrnpyler_34510_combined_model_of__biocrnpyler_585441_biocrnpyler_34510_combined_k*complex_enzyme_ald_tpi_molecule_f16p_ATP_rheostatbiocrnpyler_34510_combined_model_of__biocrnpyler_585441_biocrnpyler_34510_1_combined;
    r17_ATP_rheostatbiocrnpyler_34510_combined_model_of__biocrnpyler_585441_biocrnpyler_34510_combined_k = 36000;
  r18_ATP_rheostatbiocrnpyler_34510_combined_model_of__biocrnpyler_585441_biocrnpyler_34510_combined: complex_enzyme_ald_tpi_2x_molecule_g3p_ATP_rheostatbiocrnpyler_34510_combined_model_of__biocrnpyler_585441_biocrnpyler_34510_1_combined => enzyme_ald_tpi_ATP_rheostatbiocrnpyler_34510_combined_model_of__biocrnpyler_585441_biocrnpyler_34510_1_combined + 2 molecule_g3p_ATP_rheostatbiocrnpyler_34510_combined_model_of__biocrnpyler_585441_biocrnpyler_34510_1_combined; r18_ATP_rheostatbiocrnpyler_34510_combined_model_of__biocrnpyler_585441_biocrnpyler_34510_combined_k*complex_enzyme_ald_tpi_2x_molecule_g3p_ATP_rheostatbiocrnpyler_34510_combined_model_of__biocrnpyler_585441_biocrnpyler_34510_1_combined;
    r18_ATP_rheostatbiocrnpyler_34510_combined_model_of__biocrnpyler_585441_biocrnpyler_34510_combined_k = 100;
  r18_1_ATP_rheostatbiocrnpyler_34510_combined_model_of__biocrnpyler_585441_biocrnpyler_34510_combined: enzyme_ald_tpi_ATP_rheostatbiocrnpyler_34510_combined_model_of__biocrnpyler_585441_biocrnpyler_34510_1_combined + 2 molecule_g3p_ATP_rheostatbiocrnpyler_34510_combined_model_of__biocrnpyler_585441_biocrnpyler_34510_1_combined => complex_enzyme_ald_tpi_2x_molecule_g3p_ATP_rheostatbiocrnpyler_34510_combined_model_of__biocrnpyler_585441_biocrnpyler_34510_1_combined; r18_1_ATP_rheostatbiocrnpyler_34510_combined_model_of__biocrnpyler_585441_biocrnpyler_34510_combined_k*enzyme_ald_tpi_ATP_rheostatbiocrnpyler_34510_combined_model_of__biocrnpyler_585441_biocrnpyler_34510_1_combined*molecule_g3p_ATP_rheostatbiocrnpyler_34510_combined_model_of__biocrnpyler_585441_biocrnpyler_34510_1_combined^2;
    r18_1_ATP_rheostatbiocrnpyler_34510_combined_model_of__biocrnpyler_585441_biocrnpyler_34510_combined_k = 10;
  r20_ATP_rheostatbiocrnpyler_34510_combined_model_of__biocrnpyler_585441_biocrnpyler_34510_combined: enzyme_gapN_ATP_rheostatbiocrnpyler_34510_combined_model_of__biocrnpyler_585441_biocrnpyler_34510_1_combined + 2 metabolite_nadp_ATP_rheostatbiocrnpyler_34510_combined_model_of__biocrnpyler_585441_biocrnpyler_34510_1_combined + 2 molecule_g3p_ATP_rheostatbiocrnpyler_34510_combined_model_of__biocrnpyler_585441_biocrnpyler_34510_1_combined => complex_enzyme_gapN_2x_metabolite_nadp_2x_molecule_g3p_ATP_rheostatbiocrnpyler_34510_combined_model_of__biocrnpyler_585441_biocrnpyler_34510_1_combined; r20_ATP_rheostatbiocrnpyler_34510_combined_model_of__biocrnpyler_585441_biocrnpyler_34510_combined_k*enzyme_gapN_ATP_rheostatbiocrnpyler_34510_combined_model_of__biocrnpyler_585441_biocrnpyler_34510_1_combined*metabolite_nadp_ATP_rheostatbiocrnpyler_34510_combined_model_of__biocrnpyler_585441_biocrnpyler_34510_1_combined^2*molecule_g3p_ATP_rheostatbiocrnpyler_34510_combined_model_of__biocrnpyler_585441_biocrnpyler_34510_1_combined^2;
    r20_ATP_rheostatbiocrnpyler_34510_combined_model_of__biocrnpyler_585441_biocrnpyler_34510_combined_k = 100;
  r20_1_ATP_rheostatbiocrnpyler_34510_combined_model_of__biocrnpyler_585441_biocrnpyler_34510_combined: complex_enzyme_gapN_2x_metabolite_nadp_2x_molecule_g3p_ATP_rheostatbiocrnpyler_34510_combined_model_of__biocrnpyler_585441_biocrnpyler_34510_1_combined => enzyme_gapN_ATP_rheostatbiocrnpyler_34510_combined_model_of__biocrnpyler_585441_biocrnpyler_34510_1_combined + 2 metabolite_nadp_ATP_rheostatbiocrnpyler_34510_combined_model_of__biocrnpyler_585441_biocrnpyler_34510_1_combined + 2 molecule_g3p_ATP_rheostatbiocrnpyler_34510_combined_model_of__biocrnpyler_585441_biocrnpyler_34510_1_combined; r20_1_ATP_rheostatbiocrnpyler_34510_combined_model_of__biocrnpyler_585441_biocrnpyler_34510_combined_k*complex_enzyme_gapN_2x_metabolite_nadp_2x_molecule_g3p_ATP_rheostatbiocrnpyler_34510_combined_model_of__biocrnpyler_585441_biocrnpyler_34510_1_combined;
    r20_1_ATP_rheostatbiocrnpyler_34510_combined_model_of__biocrnpyler_585441_biocrnpyler_34510_combined_k = 10;
  r22_ATP_rheostatbiocrnpyler_34510_combined_model_of__biocrnpyler_585441_biocrnpyler_34510_combined: complex_enzyme_gapN_2x_metabolite_nadp_2x_molecule_g3p_ATP_rheostatbiocrnpyler_34510_combined_model_of__biocrnpyler_585441_biocrnpyler_34510_1_combined => complex_enzyme_gapN_2x_metabolite_nadph_2x_molecule_3pg_ATP_rheostatbiocrnpyler_34510_combined_model_of__biocrnpyler_585441_biocrnpyler_34510_1_combined; r22_ATP_rheostatbiocrnpyler_34510_combined_model_of__biocrnpyler_585441_biocrnpyler_34510_combined_k*complex_enzyme_gapN_2x_metabolite_nadp_2x_molecule_g3p_ATP_rheostatbiocrnpyler_34510_combined_model_of__biocrnpyler_585441_biocrnpyler_34510_1_combined;
    r22_ATP_rheostatbiocrnpyler_34510_combined_model_of__biocrnpyler_585441_biocrnpyler_34510_combined_k = 36000;
  r23_ATP_rheostatbiocrnpyler_34510_combined_model_of__biocrnpyler_585441_biocrnpyler_34510_combined: complex_enzyme_gapN_2x_metabolite_nadph_2x_molecule_3pg_ATP_rheostatbiocrnpyler_34510_combined_model_of__biocrnpyler_585441_biocrnpyler_34510_1_combined => enzyme_gapN_ATP_rheostatbiocrnpyler_34510_combined_model_of__biocrnpyler_585441_biocrnpyler_34510_1_combined + 2 molecule_3pg_ATP_rheostatbiocrnpyler_34510_combined_model_of__biocrnpyler_585441_biocrnpyler_34510_1_combined + 2 metabolite_nadph_ATP_rheostatbiocrnpyler_34510_combined_model_of__biocrnpyler_585441_biocrnpyler_34510_1_combined; r23_ATP_rheostatbiocrnpyler_34510_combined_model_of__biocrnpyler_585441_biocrnpyler_34510_combined_k*complex_enzyme_gapN_2x_metabolite_nadph_2x_molecule_3pg_ATP_rheostatbiocrnpyler_34510_combined_model_of__biocrnpyler_585441_biocrnpyler_34510_1_combined;
    r23_ATP_rheostatbiocrnpyler_34510_combined_model_of__biocrnpyler_585441_biocrnpyler_34510_combined_k = 100;
  r23_1_ATP_rheostatbiocrnpyler_34510_combined_model_of__biocrnpyler_585441_biocrnpyler_34510_combined: enzyme_gapN_ATP_rheostatbiocrnpyler_34510_combined_model_of__biocrnpyler_585441_biocrnpyler_34510_1_combined + 2 molecule_3pg_ATP_rheostatbiocrnpyler_34510_combined_model_of__biocrnpyler_585441_biocrnpyler_34510_1_combined + 2 metabolite_nadph_ATP_rheostatbiocrnpyler_34510_combined_model_of__biocrnpyler_585441_biocrnpyler_34510_1_combined => complex_enzyme_gapN_2x_metabolite_nadph_2x_molecule_3pg_ATP_rheostatbiocrnpyler_34510_combined_model_of__biocrnpyler_585441_biocrnpyler_34510_1_combined; r23_1_ATP_rheostatbiocrnpyler_34510_combined_model_of__biocrnpyler_585441_biocrnpyler_34510_combined_k*enzyme_gapN_ATP_rheostatbiocrnpyler_34510_combined_model_of__biocrnpyler_585441_biocrnpyler_34510_1_combined*molecule_3pg_ATP_rheostatbiocrnpyler_34510_combined_model_of__biocrnpyler_585441_biocrnpyler_34510_1_combined^2*metabolite_nadph_ATP_rheostatbiocrnpyler_34510_combined_model_of__biocrnpyler_585441_biocrnpyler_34510_1_combined^2;
    r23_1_ATP_rheostatbiocrnpyler_34510_combined_model_of__biocrnpyler_585441_biocrnpyler_34510_combined_k = 10;
  r25_ATP_rheostatbiocrnpyler_34510_combined_model_of__biocrnpyler_585441_biocrnpyler_34510_combined: enzyme_mGapDH_ATP_rheostatbiocrnpyler_34510_combined_model_of__biocrnpyler_585441_biocrnpyler_34510_1_combined + P_exsAbiocrnpyler_585441_1_combined_combined_model_of__biocrnpyler_585441_biocrnpyler_34510_1_combined + 2 metabolite_nadp_ATP_rheostatbiocrnpyler_34510_combined_model_of__biocrnpyler_585441_biocrnpyler_34510_1_combined + 2 molecule_g3p_ATP_rheostatbiocrnpyler_34510_combined_model_of__biocrnpyler_585441_biocrnpyler_34510_1_combined => complex_enzyme_mGapDH_2x_metabolite_nadp_metabolite_pi_2x_molecule_g3p_ATP_rheostatbiocrnpyler_34510_combined_model_of__biocrnpyler_585441_biocrnpyler_34510_1_combined; r25_ATP_rheostatbiocrnpyler_34510_combined_model_of__biocrnpyler_585441_biocrnpyler_34510_combined_k*enzyme_mGapDH_ATP_rheostatbiocrnpyler_34510_combined_model_of__biocrnpyler_585441_biocrnpyler_34510_1_combined*P_exsAbiocrnpyler_585441_1_combined_combined_model_of__biocrnpyler_585441_biocrnpyler_34510_1_combined*metabolite_nadp_ATP_rheostatbiocrnpyler_34510_combined_model_of__biocrnpyler_585441_biocrnpyler_34510_1_combined^2*molecule_g3p_ATP_rheostatbiocrnpyler_34510_combined_model_of__biocrnpyler_585441_biocrnpyler_34510_1_combined^2;
    r25_ATP_rheostatbiocrnpyler_34510_combined_model_of__biocrnpyler_585441_biocrnpyler_34510_combined_k = 100;
  r25_1_ATP_rheostatbiocrnpyler_34510_combined_model_of__biocrnpyler_585441_biocrnpyler_34510_combined: complex_enzyme_mGapDH_2x_metabolite_nadp_metabolite_pi_2x_molecule_g3p_ATP_rheostatbiocrnpyler_34510_combined_model_of__biocrnpyler_585441_biocrnpyler_34510_1_combined => enzyme_mGapDH_ATP_rheostatbiocrnpyler_34510_combined_model_of__biocrnpyler_585441_biocrnpyler_34510_1_combined + P_exsAbiocrnpyler_585441_1_combined_combined_model_of__biocrnpyler_585441_biocrnpyler_34510_1_combined + 2 metabolite_nadp_ATP_rheostatbiocrnpyler_34510_combined_model_of__biocrnpyler_585441_biocrnpyler_34510_1_combined + 2 molecule_g3p_ATP_rheostatbiocrnpyler_34510_combined_model_of__biocrnpyler_585441_biocrnpyler_34510_1_combined; r25_1_ATP_rheostatbiocrnpyler_34510_combined_model_of__biocrnpyler_585441_biocrnpyler_34510_combined_k*complex_enzyme_mGapDH_2x_metabolite_nadp_metabolite_pi_2x_molecule_g3p_ATP_rheostatbiocrnpyler_34510_combined_model_of__biocrnpyler_585441_biocrnpyler_34510_1_combined;
    r25_1_ATP_rheostatbiocrnpyler_34510_combined_model_of__biocrnpyler_585441_biocrnpyler_34510_combined_k = 10;
  r27_ATP_rheostatbiocrnpyler_34510_combined_model_of__biocrnpyler_585441_biocrnpyler_34510_combined: complex_enzyme_mGapDH_2x_metabolite_nadp_metabolite_pi_2x_molecule_g3p_ATP_rheostatbiocrnpyler_34510_combined_model_of__biocrnpyler_585441_biocrnpyler_34510_1_combined => complex_enzyme_mGapDH_2x_metabolite_nadph_molecule_13bpg_ATP_rheostatbiocrnpyler_34510_combined_model_of__biocrnpyler_585441_biocrnpyler_34510_1_combined; r27_ATP_rheostatbiocrnpyler_34510_combined_model_of__biocrnpyler_585441_biocrnpyler_34510_combined_k*complex_enzyme_mGapDH_2x_metabolite_nadp_metabolite_pi_2x_molecule_g3p_ATP_rheostatbiocrnpyler_34510_combined_model_of__biocrnpyler_585441_biocrnpyler_34510_1_combined;
    r27_ATP_rheostatbiocrnpyler_34510_combined_model_of__biocrnpyler_585441_biocrnpyler_34510_combined_k = 36000;
  r28_ATP_rheostatbiocrnpyler_34510_combined_model_of__biocrnpyler_585441_biocrnpyler_34510_combined: complex_enzyme_mGapDH_2x_metabolite_nadph_molecule_13bpg_ATP_rheostatbiocrnpyler_34510_combined_model_of__biocrnpyler_585441_biocrnpyler_34510_1_combined => enzyme_mGapDH_ATP_rheostatbiocrnpyler_34510_combined_model_of__biocrnpyler_585441_biocrnpyler_34510_1_combined + molecule_13bpg_ATP_rheostatbiocrnpyler_34510_combined_model_of__biocrnpyler_585441_biocrnpyler_34510_1_combined + 2 metabolite_nadph_ATP_rheostatbiocrnpyler_34510_combined_model_of__biocrnpyler_585441_biocrnpyler_34510_1_combined; r28_ATP_rheostatbiocrnpyler_34510_combined_model_of__biocrnpyler_585441_biocrnpyler_34510_combined_k*complex_enzyme_mGapDH_2x_metabolite_nadph_molecule_13bpg_ATP_rheostatbiocrnpyler_34510_combined_model_of__biocrnpyler_585441_biocrnpyler_34510_1_combined;
    r28_ATP_rheostatbiocrnpyler_34510_combined_model_of__biocrnpyler_585441_biocrnpyler_34510_combined_k = 100;
  r28_1_ATP_rheostatbiocrnpyler_34510_combined_model_of__biocrnpyler_585441_biocrnpyler_34510_combined: enzyme_mGapDH_ATP_rheostatbiocrnpyler_34510_combined_model_of__biocrnpyler_585441_biocrnpyler_34510_1_combined + molecule_13bpg_ATP_rheostatbiocrnpyler_34510_combined_model_of__biocrnpyler_585441_biocrnpyler_34510_1_combined + 2 metabolite_nadph_ATP_rheostatbiocrnpyler_34510_combined_model_of__biocrnpyler_585441_biocrnpyler_34510_1_combined => complex_enzyme_mGapDH_2x_metabolite_nadph_molecule_13bpg_ATP_rheostatbiocrnpyler_34510_combined_model_of__biocrnpyler_585441_biocrnpyler_34510_1_combined; r28_1_ATP_rheostatbiocrnpyler_34510_combined_model_of__biocrnpyler_585441_biocrnpyler_34510_combined_k*enzyme_mGapDH_ATP_rheostatbiocrnpyler_34510_combined_model_of__biocrnpyler_585441_biocrnpyler_34510_1_combined*molecule_13bpg_ATP_rheostatbiocrnpyler_34510_combined_model_of__biocrnpyler_585441_biocrnpyler_34510_1_combined*metabolite_nadph_ATP_rheostatbiocrnpyler_34510_combined_model_of__biocrnpyler_585441_biocrnpyler_34510_1_combined^2;
    r28_1_ATP_rheostatbiocrnpyler_34510_combined_model_of__biocrnpyler_585441_biocrnpyler_34510_combined_k = 10;
  r30_ATP_rheostatbiocrnpyler_34510_combined_model_of__biocrnpyler_585441_biocrnpyler_34510_combined: enzyme_pgk_ATP_rheostatbiocrnpyler_34510_combined_model_of__biocrnpyler_585441_biocrnpyler_34510_1_combined + ADP_exsAbiocrnpyler_585441_1_combined_combined_model_of__biocrnpyler_585441_biocrnpyler_34510_1_combined + molecule_13bpg_ATP_rheostatbiocrnpyler_34510_combined_model_of__biocrnpyler_585441_biocrnpyler_34510_1_combined => complex_enzyme_pgk_metabolite_adp_molecule_13bpg_ATP_rheostatbiocrnpyler_34510_combined_model_of__biocrnpyler_585441_biocrnpyler_34510_1_combined; r30_ATP_rheostatbiocrnpyler_34510_combined_model_of__biocrnpyler_585441_biocrnpyler_34510_combined_k*enzyme_pgk_ATP_rheostatbiocrnpyler_34510_combined_model_of__biocrnpyler_585441_biocrnpyler_34510_1_combined*ADP_exsAbiocrnpyler_585441_1_combined_combined_model_of__biocrnpyler_585441_biocrnpyler_34510_1_combined*molecule_13bpg_ATP_rheostatbiocrnpyler_34510_combined_model_of__biocrnpyler_585441_biocrnpyler_34510_1_combined;
    r30_ATP_rheostatbiocrnpyler_34510_combined_model_of__biocrnpyler_585441_biocrnpyler_34510_combined_k = 100;
  r30_1_ATP_rheostatbiocrnpyler_34510_combined_model_of__biocrnpyler_585441_biocrnpyler_34510_combined: complex_enzyme_pgk_metabolite_adp_molecule_13bpg_ATP_rheostatbiocrnpyler_34510_combined_model_of__biocrnpyler_585441_biocrnpyler_34510_1_combined => enzyme_pgk_ATP_rheostatbiocrnpyler_34510_combined_model_of__biocrnpyler_585441_biocrnpyler_34510_1_combined + ADP_exsAbiocrnpyler_585441_1_combined_combined_model_of__biocrnpyler_585441_biocrnpyler_34510_1_combined + molecule_13bpg_ATP_rheostatbiocrnpyler_34510_combined_model_of__biocrnpyler_585441_biocrnpyler_34510_1_combined; r30_1_ATP_rheostatbiocrnpyler_34510_combined_model_of__biocrnpyler_585441_biocrnpyler_34510_combined_k*complex_enzyme_pgk_metabolite_adp_molecule_13bpg_ATP_rheostatbiocrnpyler_34510_combined_model_of__biocrnpyler_585441_biocrnpyler_34510_1_combined;
    r30_1_ATP_rheostatbiocrnpyler_34510_combined_model_of__biocrnpyler_585441_biocrnpyler_34510_combined_k = 10;
  r32_ATP_rheostatbiocrnpyler_34510_combined_model_of__biocrnpyler_585441_biocrnpyler_34510_combined: complex_enzyme_pgk_metabolite_adp_molecule_13bpg_ATP_rheostatbiocrnpyler_34510_combined_model_of__biocrnpyler_585441_biocrnpyler_34510_1_combined => complex_enzyme_pgk_metabolite_atp_2x_molecule_3pg_ATP_rheostatbiocrnpyler_34510_combined_model_of__biocrnpyler_585441_biocrnpyler_34510_1_combined; r32_ATP_rheostatbiocrnpyler_34510_combined_model_of__biocrnpyler_585441_biocrnpyler_34510_combined_k*complex_enzyme_pgk_metabolite_adp_molecule_13bpg_ATP_rheostatbiocrnpyler_34510_combined_model_of__biocrnpyler_585441_biocrnpyler_34510_1_combined;
    r32_ATP_rheostatbiocrnpyler_34510_combined_model_of__biocrnpyler_585441_biocrnpyler_34510_combined_k = 36000;
  r33_ATP_rheostatbiocrnpyler_34510_combined_model_of__biocrnpyler_585441_biocrnpyler_34510_combined: complex_enzyme_pgk_metabolite_atp_2x_molecule_3pg_ATP_rheostatbiocrnpyler_34510_combined_model_of__biocrnpyler_585441_biocrnpyler_34510_1_combined => enzyme_pgk_ATP_rheostatbiocrnpyler_34510_combined_model_of__biocrnpyler_585441_biocrnpyler_34510_1_combined + 2 molecule_3pg_ATP_rheostatbiocrnpyler_34510_combined_model_of__biocrnpyler_585441_biocrnpyler_34510_1_combined + ATP_exsAbiocrnpyler_585441_1_combined_combined_model_of__biocrnpyler_585441_biocrnpyler_34510_1_combined; r33_ATP_rheostatbiocrnpyler_34510_combined_model_of__biocrnpyler_585441_biocrnpyler_34510_combined_k*complex_enzyme_pgk_metabolite_atp_2x_molecule_3pg_ATP_rheostatbiocrnpyler_34510_combined_model_of__biocrnpyler_585441_biocrnpyler_34510_1_combined;
    r33_ATP_rheostatbiocrnpyler_34510_combined_model_of__biocrnpyler_585441_biocrnpyler_34510_combined_k = 100;
  r33_1_ATP_rheostatbiocrnpyler_34510_combined_model_of__biocrnpyler_585441_biocrnpyler_34510_combined: enzyme_pgk_ATP_rheostatbiocrnpyler_34510_combined_model_of__biocrnpyler_585441_biocrnpyler_34510_1_combined + 2 molecule_3pg_ATP_rheostatbiocrnpyler_34510_combined_model_of__biocrnpyler_585441_biocrnpyler_34510_1_combined + ATP_exsAbiocrnpyler_585441_1_combined_combined_model_of__biocrnpyler_585441_biocrnpyler_34510_1_combined => complex_enzyme_pgk_metabolite_atp_2x_molecule_3pg_ATP_rheostatbiocrnpyler_34510_combined_model_of__biocrnpyler_585441_biocrnpyler_34510_1_combined; r33_1_ATP_rheostatbiocrnpyler_34510_combined_model_of__biocrnpyler_585441_biocrnpyler_34510_combined_k*enzyme_pgk_ATP_rheostatbiocrnpyler_34510_combined_model_of__biocrnpyler_585441_biocrnpyler_34510_1_combined*molecule_3pg_ATP_rheostatbiocrnpyler_34510_combined_model_of__biocrnpyler_585441_biocrnpyler_34510_1_combined^2*ATP_exsAbiocrnpyler_585441_1_combined_combined_model_of__biocrnpyler_585441_biocrnpyler_34510_1_combined;
    r33_1_ATP_rheostatbiocrnpyler_34510_combined_model_of__biocrnpyler_585441_biocrnpyler_34510_combined_k = 10;
  r35_ATP_rheostatbiocrnpyler_34510_combined_model_of__biocrnpyler_585441_biocrnpyler_34510_combined: enzyme_pgm_ATP_rheostatbiocrnpyler_34510_combined_model_of__biocrnpyler_585441_biocrnpyler_34510_1_combined + 2 molecule_3pg_ATP_rheostatbiocrnpyler_34510_combined_model_of__biocrnpyler_585441_biocrnpyler_34510_1_combined => complex_enzyme_pgm_2x_molecule_3pg_ATP_rheostatbiocrnpyler_34510_combined_model_of__biocrnpyler_585441_biocrnpyler_34510_1_combined; r35_ATP_rheostatbiocrnpyler_34510_combined_model_of__biocrnpyler_585441_biocrnpyler_34510_combined_k*enzyme_pgm_ATP_rheostatbiocrnpyler_34510_combined_model_of__biocrnpyler_585441_biocrnpyler_34510_1_combined*molecule_3pg_ATP_rheostatbiocrnpyler_34510_combined_model_of__biocrnpyler_585441_biocrnpyler_34510_1_combined^2;
    r35_ATP_rheostatbiocrnpyler_34510_combined_model_of__biocrnpyler_585441_biocrnpyler_34510_combined_k = 100;
  r35_1_ATP_rheostatbiocrnpyler_34510_combined_model_of__biocrnpyler_585441_biocrnpyler_34510_combined: complex_enzyme_pgm_2x_molecule_3pg_ATP_rheostatbiocrnpyler_34510_combined_model_of__biocrnpyler_585441_biocrnpyler_34510_1_combined => enzyme_pgm_ATP_rheostatbiocrnpyler_34510_combined_model_of__biocrnpyler_585441_biocrnpyler_34510_1_combined + 2 molecule_3pg_ATP_rheostatbiocrnpyler_34510_combined_model_of__biocrnpyler_585441_biocrnpyler_34510_1_combined; r35_1_ATP_rheostatbiocrnpyler_34510_combined_model_of__biocrnpyler_585441_biocrnpyler_34510_combined_k*complex_enzyme_pgm_2x_molecule_3pg_ATP_rheostatbiocrnpyler_34510_combined_model_of__biocrnpyler_585441_biocrnpyler_34510_1_combined;
    r35_1_ATP_rheostatbiocrnpyler_34510_combined_model_of__biocrnpyler_585441_biocrnpyler_34510_combined_k = 10;
  r37_ATP_rheostatbiocrnpyler_34510_combined_model_of__biocrnpyler_585441_biocrnpyler_34510_combined: complex_enzyme_pgm_2x_molecule_3pg_ATP_rheostatbiocrnpyler_34510_combined_model_of__biocrnpyler_585441_biocrnpyler_34510_1_combined => complex_enzyme_pgm_2x_molecule_2pg_ATP_rheostatbiocrnpyler_34510_combined_model_of__biocrnpyler_585441_biocrnpyler_34510_1_combined; r37_ATP_rheostatbiocrnpyler_34510_combined_model_of__biocrnpyler_585441_biocrnpyler_34510_combined_k*complex_enzyme_pgm_2x_molecule_3pg_ATP_rheostatbiocrnpyler_34510_combined_model_of__biocrnpyler_585441_biocrnpyler_34510_1_combined;
    r37_ATP_rheostatbiocrnpyler_34510_combined_model_of__biocrnpyler_585441_biocrnpyler_34510_combined_k = 36000;
  r38_ATP_rheostatbiocrnpyler_34510_combined_model_of__biocrnpyler_585441_biocrnpyler_34510_combined: complex_enzyme_pgm_2x_molecule_2pg_ATP_rheostatbiocrnpyler_34510_combined_model_of__biocrnpyler_585441_biocrnpyler_34510_1_combined => enzyme_pgm_ATP_rheostatbiocrnpyler_34510_combined_model_of__biocrnpyler_585441_biocrnpyler_34510_1_combined + 2 molecule_2pg_ATP_rheostatbiocrnpyler_34510_combined_model_of__biocrnpyler_585441_biocrnpyler_34510_1_combined; r38_ATP_rheostatbiocrnpyler_34510_combined_model_of__biocrnpyler_585441_biocrnpyler_34510_combined_k*complex_enzyme_pgm_2x_molecule_2pg_ATP_rheostatbiocrnpyler_34510_combined_model_of__biocrnpyler_585441_biocrnpyler_34510_1_combined;
    r38_ATP_rheostatbiocrnpyler_34510_combined_model_of__biocrnpyler_585441_biocrnpyler_34510_combined_k = 100;
  r38_1_ATP_rheostatbiocrnpyler_34510_combined_model_of__biocrnpyler_585441_biocrnpyler_34510_combined: enzyme_pgm_ATP_rheostatbiocrnpyler_34510_combined_model_of__biocrnpyler_585441_biocrnpyler_34510_1_combined + 2 molecule_2pg_ATP_rheostatbiocrnpyler_34510_combined_model_of__biocrnpyler_585441_biocrnpyler_34510_1_combined => complex_enzyme_pgm_2x_molecule_2pg_ATP_rheostatbiocrnpyler_34510_combined_model_of__biocrnpyler_585441_biocrnpyler_34510_1_combined; r38_1_ATP_rheostatbiocrnpyler_34510_combined_model_of__biocrnpyler_585441_biocrnpyler_34510_combined_k*enzyme_pgm_ATP_rheostatbiocrnpyler_34510_combined_model_of__biocrnpyler_585441_biocrnpyler_34510_1_combined*molecule_2pg_ATP_rheostatbiocrnpyler_34510_combined_model_of__biocrnpyler_585441_biocrnpyler_34510_1_combined^2;
    r38_1_ATP_rheostatbiocrnpyler_34510_combined_model_of__biocrnpyler_585441_biocrnpyler_34510_combined_k = 10;
  r40_ATP_rheostatbiocrnpyler_34510_combined_model_of__biocrnpyler_585441_biocrnpyler_34510_combined: enzyme_eno_ATP_rheostatbiocrnpyler_34510_combined_model_of__biocrnpyler_585441_biocrnpyler_34510_1_combined + 2 molecule_2pg_ATP_rheostatbiocrnpyler_34510_combined_model_of__biocrnpyler_585441_biocrnpyler_34510_1_combined => complex_enzyme_eno_2x_molecule_2pg_ATP_rheostatbiocrnpyler_34510_combined_model_of__biocrnpyler_585441_biocrnpyler_34510_1_combined; r40_ATP_rheostatbiocrnpyler_34510_combined_model_of__biocrnpyler_585441_biocrnpyler_34510_combined_k*enzyme_eno_ATP_rheostatbiocrnpyler_34510_combined_model_of__biocrnpyler_585441_biocrnpyler_34510_1_combined*molecule_2pg_ATP_rheostatbiocrnpyler_34510_combined_model_of__biocrnpyler_585441_biocrnpyler_34510_1_combined^2;
    r40_ATP_rheostatbiocrnpyler_34510_combined_model_of__biocrnpyler_585441_biocrnpyler_34510_combined_k = 100;
  r40_1_ATP_rheostatbiocrnpyler_34510_combined_model_of__biocrnpyler_585441_biocrnpyler_34510_combined: complex_enzyme_eno_2x_molecule_2pg_ATP_rheostatbiocrnpyler_34510_combined_model_of__biocrnpyler_585441_biocrnpyler_34510_1_combined => enzyme_eno_ATP_rheostatbiocrnpyler_34510_combined_model_of__biocrnpyler_585441_biocrnpyler_34510_1_combined + 2 molecule_2pg_ATP_rheostatbiocrnpyler_34510_combined_model_of__biocrnpyler_585441_biocrnpyler_34510_1_combined; r40_1_ATP_rheostatbiocrnpyler_34510_combined_model_of__biocrnpyler_585441_biocrnpyler_34510_combined_k*complex_enzyme_eno_2x_molecule_2pg_ATP_rheostatbiocrnpyler_34510_combined_model_of__biocrnpyler_585441_biocrnpyler_34510_1_combined;
    r40_1_ATP_rheostatbiocrnpyler_34510_combined_model_of__biocrnpyler_585441_biocrnpyler_34510_combined_k = 10;
  r42_ATP_rheostatbiocrnpyler_34510_combined_model_of__biocrnpyler_585441_biocrnpyler_34510_combined: complex_enzyme_eno_2x_molecule_2pg_ATP_rheostatbiocrnpyler_34510_combined_model_of__biocrnpyler_585441_biocrnpyler_34510_1_combined => complex_enzyme_eno_2x_molecule_pep_ATP_rheostatbiocrnpyler_34510_combined_model_of__biocrnpyler_585441_biocrnpyler_34510_1_combined; r42_ATP_rheostatbiocrnpyler_34510_combined_model_of__biocrnpyler_585441_biocrnpyler_34510_combined_k*complex_enzyme_eno_2x_molecule_2pg_ATP_rheostatbiocrnpyler_34510_combined_model_of__biocrnpyler_585441_biocrnpyler_34510_1_combined;
    r42_ATP_rheostatbiocrnpyler_34510_combined_model_of__biocrnpyler_585441_biocrnpyler_34510_combined_k = 36000;
  r43_ATP_rheostatbiocrnpyler_34510_combined_model_of__biocrnpyler_585441_biocrnpyler_34510_combined: complex_enzyme_eno_2x_molecule_pep_ATP_rheostatbiocrnpyler_34510_combined_model_of__biocrnpyler_585441_biocrnpyler_34510_1_combined => enzyme_eno_ATP_rheostatbiocrnpyler_34510_combined_model_of__biocrnpyler_585441_biocrnpyler_34510_1_combined + 2 molecule_pep_ATP_rheostatbiocrnpyler_34510_combined_model_of__biocrnpyler_585441_biocrnpyler_34510_1_combined; r43_ATP_rheostatbiocrnpyler_34510_combined_model_of__biocrnpyler_585441_biocrnpyler_34510_combined_k*complex_enzyme_eno_2x_molecule_pep_ATP_rheostatbiocrnpyler_34510_combined_model_of__biocrnpyler_585441_biocrnpyler_34510_1_combined;
    r43_ATP_rheostatbiocrnpyler_34510_combined_model_of__biocrnpyler_585441_biocrnpyler_34510_combined_k = 100;
  r43_1_ATP_rheostatbiocrnpyler_34510_combined_model_of__biocrnpyler_585441_biocrnpyler_34510_combined: enzyme_eno_ATP_rheostatbiocrnpyler_34510_combined_model_of__biocrnpyler_585441_biocrnpyler_34510_1_combined + 2 molecule_pep_ATP_rheostatbiocrnpyler_34510_combined_model_of__biocrnpyler_585441_biocrnpyler_34510_1_combined => complex_enzyme_eno_2x_molecule_pep_ATP_rheostatbiocrnpyler_34510_combined_model_of__biocrnpyler_585441_biocrnpyler_34510_1_combined; r43_1_ATP_rheostatbiocrnpyler_34510_combined_model_of__biocrnpyler_585441_biocrnpyler_34510_combined_k*enzyme_eno_ATP_rheostatbiocrnpyler_34510_combined_model_of__biocrnpyler_585441_biocrnpyler_34510_1_combined*molecule_pep_ATP_rheostatbiocrnpyler_34510_combined_model_of__biocrnpyler_585441_biocrnpyler_34510_1_combined^2;
    r43_1_ATP_rheostatbiocrnpyler_34510_combined_model_of__biocrnpyler_585441_biocrnpyler_34510_combined_k = 10;
  r45_ATP_rheostatbiocrnpyler_34510_combined_model_of__biocrnpyler_585441_biocrnpyler_34510_combined: enzyme_pyk_ATP_rheostatbiocrnpyler_34510_combined_model_of__biocrnpyler_585441_biocrnpyler_34510_1_combined + 2 ADP_exsAbiocrnpyler_585441_1_combined_combined_model_of__biocrnpyler_585441_biocrnpyler_34510_1_combined + 2 molecule_pep_ATP_rheostatbiocrnpyler_34510_combined_model_of__biocrnpyler_585441_biocrnpyler_34510_1_combined => complex_enzyme_pyk_2x_metabolite_adp_2x_molecule_pep_ATP_rheostatbiocrnpyler_34510_combined_model_of__biocrnpyler_585441_biocrnpyler_34510_1_combined; r45_ATP_rheostatbiocrnpyler_34510_combined_model_of__biocrnpyler_585441_biocrnpyler_34510_combined_k*enzyme_pyk_ATP_rheostatbiocrnpyler_34510_combined_model_of__biocrnpyler_585441_biocrnpyler_34510_1_combined*ADP_exsAbiocrnpyler_585441_1_combined_combined_model_of__biocrnpyler_585441_biocrnpyler_34510_1_combined^2*molecule_pep_ATP_rheostatbiocrnpyler_34510_combined_model_of__biocrnpyler_585441_biocrnpyler_34510_1_combined^2;
    r45_ATP_rheostatbiocrnpyler_34510_combined_model_of__biocrnpyler_585441_biocrnpyler_34510_combined_k = 100;
  r45_1_ATP_rheostatbiocrnpyler_34510_combined_model_of__biocrnpyler_585441_biocrnpyler_34510_combined: complex_enzyme_pyk_2x_metabolite_adp_2x_molecule_pep_ATP_rheostatbiocrnpyler_34510_combined_model_of__biocrnpyler_585441_biocrnpyler_34510_1_combined => enzyme_pyk_ATP_rheostatbiocrnpyler_34510_combined_model_of__biocrnpyler_585441_biocrnpyler_34510_1_combined + 2 ADP_exsAbiocrnpyler_585441_1_combined_combined_model_of__biocrnpyler_585441_biocrnpyler_34510_1_combined + 2 molecule_pep_ATP_rheostatbiocrnpyler_34510_combined_model_of__biocrnpyler_585441_biocrnpyler_34510_1_combined; r45_1_ATP_rheostatbiocrnpyler_34510_combined_model_of__biocrnpyler_585441_biocrnpyler_34510_combined_k*complex_enzyme_pyk_2x_metabolite_adp_2x_molecule_pep_ATP_rheostatbiocrnpyler_34510_combined_model_of__biocrnpyler_585441_biocrnpyler_34510_1_combined;
    r45_1_ATP_rheostatbiocrnpyler_34510_combined_model_of__biocrnpyler_585441_biocrnpyler_34510_combined_k = 10;
  r47_ATP_rheostatbiocrnpyler_34510_combined_model_of__biocrnpyler_585441_biocrnpyler_34510_combined: complex_enzyme_pyk_2x_metabolite_adp_2x_molecule_pep_ATP_rheostatbiocrnpyler_34510_combined_model_of__biocrnpyler_585441_biocrnpyler_34510_1_combined => complex_enzyme_pyk_2x_metabolite_atp_2x_molecule_pyruvate_ATP_rheostatbiocrnpyler_34510_combined_model_of__biocrnpyler_585441_biocrnpyler_34510_1_combined; r47_ATP_rheostatbiocrnpyler_34510_combined_model_of__biocrnpyler_585441_biocrnpyler_34510_combined_k*complex_enzyme_pyk_2x_metabolite_adp_2x_molecule_pep_ATP_rheostatbiocrnpyler_34510_combined_model_of__biocrnpyler_585441_biocrnpyler_34510_1_combined;
    r47_ATP_rheostatbiocrnpyler_34510_combined_model_of__biocrnpyler_585441_biocrnpyler_34510_combined_k = 36000;
  r48_ATP_rheostatbiocrnpyler_34510_combined_model_of__biocrnpyler_585441_biocrnpyler_34510_combined: complex_enzyme_pyk_2x_metabolite_atp_2x_molecule_pyruvate_ATP_rheostatbiocrnpyler_34510_combined_model_of__biocrnpyler_585441_biocrnpyler_34510_1_combined => enzyme_pyk_ATP_rheostatbiocrnpyler_34510_combined_model_of__biocrnpyler_585441_biocrnpyler_34510_1_combined + 2 molecule_pyruvate_ATP_rheostatbiocrnpyler_34510_combined_model_of__biocrnpyler_585441_biocrnpyler_34510_1_combined + 2 ATP_exsAbiocrnpyler_585441_1_combined_combined_model_of__biocrnpyler_585441_biocrnpyler_34510_1_combined; r48_ATP_rheostatbiocrnpyler_34510_combined_model_of__biocrnpyler_585441_biocrnpyler_34510_combined_k*complex_enzyme_pyk_2x_metabolite_atp_2x_molecule_pyruvate_ATP_rheostatbiocrnpyler_34510_combined_model_of__biocrnpyler_585441_biocrnpyler_34510_1_combined;
    r48_ATP_rheostatbiocrnpyler_34510_combined_model_of__biocrnpyler_585441_biocrnpyler_34510_combined_k = 100;
  r48_1_ATP_rheostatbiocrnpyler_34510_combined_model_of__biocrnpyler_585441_biocrnpyler_34510_combined: enzyme_pyk_ATP_rheostatbiocrnpyler_34510_combined_model_of__biocrnpyler_585441_biocrnpyler_34510_1_combined + 2 molecule_pyruvate_ATP_rheostatbiocrnpyler_34510_combined_model_of__biocrnpyler_585441_biocrnpyler_34510_1_combined + 2 ATP_exsAbiocrnpyler_585441_1_combined_combined_model_of__biocrnpyler_585441_biocrnpyler_34510_1_combined => complex_enzyme_pyk_2x_metabolite_atp_2x_molecule_pyruvate_ATP_rheostatbiocrnpyler_34510_combined_model_of__biocrnpyler_585441_biocrnpyler_34510_1_combined; r48_1_ATP_rheostatbiocrnpyler_34510_combined_model_of__biocrnpyler_585441_biocrnpyler_34510_combined_k*enzyme_pyk_ATP_rheostatbiocrnpyler_34510_combined_model_of__biocrnpyler_585441_biocrnpyler_34510_1_combined*molecule_pyruvate_ATP_rheostatbiocrnpyler_34510_combined_model_of__biocrnpyler_585441_biocrnpyler_34510_1_combined^2*ATP_exsAbiocrnpyler_585441_1_combined_combined_model_of__biocrnpyler_585441_biocrnpyler_34510_1_combined^2;
    r48_1_ATP_rheostatbiocrnpyler_34510_combined_model_of__biocrnpyler_585441_biocrnpyler_34510_combined_k = 10;
  r50_ATP_rheostatbiocrnpyler_34510_combined_model_of__biocrnpyler_585441_biocrnpyler_34510_combined: enzyme_alsS_ATP_rheostatbiocrnpyler_34510_combined_model_of__biocrnpyler_585441_biocrnpyler_34510_1_combined + 2 molecule_pyruvate_ATP_rheostatbiocrnpyler_34510_combined_model_of__biocrnpyler_585441_biocrnpyler_34510_1_combined => complex_enzyme_alsS_2x_molecule_pyruvate_ATP_rheostatbiocrnpyler_34510_combined_model_of__biocrnpyler_585441_biocrnpyler_34510_1_combined; r50_ATP_rheostatbiocrnpyler_34510_combined_model_of__biocrnpyler_585441_biocrnpyler_34510_combined_k*enzyme_alsS_ATP_rheostatbiocrnpyler_34510_combined_model_of__biocrnpyler_585441_biocrnpyler_34510_1_combined*molecule_pyruvate_ATP_rheostatbiocrnpyler_34510_combined_model_of__biocrnpyler_585441_biocrnpyler_34510_1_combined^2;
    r50_ATP_rheostatbiocrnpyler_34510_combined_model_of__biocrnpyler_585441_biocrnpyler_34510_combined_k = 100;
  r50_1_ATP_rheostatbiocrnpyler_34510_combined_model_of__biocrnpyler_585441_biocrnpyler_34510_combined: complex_enzyme_alsS_2x_molecule_pyruvate_ATP_rheostatbiocrnpyler_34510_combined_model_of__biocrnpyler_585441_biocrnpyler_34510_1_combined => enzyme_alsS_ATP_rheostatbiocrnpyler_34510_combined_model_of__biocrnpyler_585441_biocrnpyler_34510_1_combined + 2 molecule_pyruvate_ATP_rheostatbiocrnpyler_34510_combined_model_of__biocrnpyler_585441_biocrnpyler_34510_1_combined; r50_1_ATP_rheostatbiocrnpyler_34510_combined_model_of__biocrnpyler_585441_biocrnpyler_34510_combined_k*complex_enzyme_alsS_2x_molecule_pyruvate_ATP_rheostatbiocrnpyler_34510_combined_model_of__biocrnpyler_585441_biocrnpyler_34510_1_combined;
    r50_1_ATP_rheostatbiocrnpyler_34510_combined_model_of__biocrnpyler_585441_biocrnpyler_34510_combined_k = 10;
  r52_ATP_rheostatbiocrnpyler_34510_combined_model_of__biocrnpyler_585441_biocrnpyler_34510_combined: complex_enzyme_alsS_2x_molecule_pyruvate_ATP_rheostatbiocrnpyler_34510_combined_model_of__biocrnpyler_585441_biocrnpyler_34510_1_combined => complex_enzyme_alsS_molecule_acetolac_ATP_rheostatbiocrnpyler_34510_combined_model_of__biocrnpyler_585441_biocrnpyler_34510_1_combined; r52_ATP_rheostatbiocrnpyler_34510_combined_model_of__biocrnpyler_585441_biocrnpyler_34510_combined_k*complex_enzyme_alsS_2x_molecule_pyruvate_ATP_rheostatbiocrnpyler_34510_combined_model_of__biocrnpyler_585441_biocrnpyler_34510_1_combined;
    r52_ATP_rheostatbiocrnpyler_34510_combined_model_of__biocrnpyler_585441_biocrnpyler_34510_combined_k = 36000;
  r53_ATP_rheostatbiocrnpyler_34510_combined_model_of__biocrnpyler_585441_biocrnpyler_34510_combined: complex_enzyme_alsS_molecule_acetolac_ATP_rheostatbiocrnpyler_34510_combined_model_of__biocrnpyler_585441_biocrnpyler_34510_1_combined => enzyme_alsS_ATP_rheostatbiocrnpyler_34510_combined_model_of__biocrnpyler_585441_biocrnpyler_34510_1_combined + molecule_acetolac_ATP_rheostatbiocrnpyler_34510_combined_model_of__biocrnpyler_585441_biocrnpyler_34510_1_combined; r53_ATP_rheostatbiocrnpyler_34510_combined_model_of__biocrnpyler_585441_biocrnpyler_34510_combined_k*complex_enzyme_alsS_molecule_acetolac_ATP_rheostatbiocrnpyler_34510_combined_model_of__biocrnpyler_585441_biocrnpyler_34510_1_combined;
    r53_ATP_rheostatbiocrnpyler_34510_combined_model_of__biocrnpyler_585441_biocrnpyler_34510_combined_k = 100;
  r53_1_ATP_rheostatbiocrnpyler_34510_combined_model_of__biocrnpyler_585441_biocrnpyler_34510_combined: enzyme_alsS_ATP_rheostatbiocrnpyler_34510_combined_model_of__biocrnpyler_585441_biocrnpyler_34510_1_combined + molecule_acetolac_ATP_rheostatbiocrnpyler_34510_combined_model_of__biocrnpyler_585441_biocrnpyler_34510_1_combined => complex_enzyme_alsS_molecule_acetolac_ATP_rheostatbiocrnpyler_34510_combined_model_of__biocrnpyler_585441_biocrnpyler_34510_1_combined; r53_1_ATP_rheostatbiocrnpyler_34510_combined_model_of__biocrnpyler_585441_biocrnpyler_34510_combined_k*enzyme_alsS_ATP_rheostatbiocrnpyler_34510_combined_model_of__biocrnpyler_585441_biocrnpyler_34510_1_combined*molecule_acetolac_ATP_rheostatbiocrnpyler_34510_combined_model_of__biocrnpyler_585441_biocrnpyler_34510_1_combined;
    r53_1_ATP_rheostatbiocrnpyler_34510_combined_model_of__biocrnpyler_585441_biocrnpyler_34510_combined_k = 10;
  r55_ATP_rheostatbiocrnpyler_34510_combined_model_of__biocrnpyler_585441_biocrnpyler_34510_combined: enzyme_IlvC_ATP_rheostatbiocrnpyler_34510_combined_model_of__biocrnpyler_585441_biocrnpyler_34510_1_combined + metabolite_nadph_ATP_rheostatbiocrnpyler_34510_combined_model_of__biocrnpyler_585441_biocrnpyler_34510_1_combined + molecule_acetolac_ATP_rheostatbiocrnpyler_34510_combined_model_of__biocrnpyler_585441_biocrnpyler_34510_1_combined => complex_enzyme_IlvC_metabolite_nadph_molecule_acetolac_ATP_rheostatbiocrnpyler_34510_combined_model_of__biocrnpyler_585441_biocrnpyler_34510_1_combined; r55_ATP_rheostatbiocrnpyler_34510_combined_model_of__biocrnpyler_585441_biocrnpyler_34510_combined_k*enzyme_IlvC_ATP_rheostatbiocrnpyler_34510_combined_model_of__biocrnpyler_585441_biocrnpyler_34510_1_combined*metabolite_nadph_ATP_rheostatbiocrnpyler_34510_combined_model_of__biocrnpyler_585441_biocrnpyler_34510_1_combined*molecule_acetolac_ATP_rheostatbiocrnpyler_34510_combined_model_of__biocrnpyler_585441_biocrnpyler_34510_1_combined;
    r55_ATP_rheostatbiocrnpyler_34510_combined_model_of__biocrnpyler_585441_biocrnpyler_34510_combined_k = 100;
  r55_1_ATP_rheostatbiocrnpyler_34510_combined_model_of__biocrnpyler_585441_biocrnpyler_34510_combined: complex_enzyme_IlvC_metabolite_nadph_molecule_acetolac_ATP_rheostatbiocrnpyler_34510_combined_model_of__biocrnpyler_585441_biocrnpyler_34510_1_combined => enzyme_IlvC_ATP_rheostatbiocrnpyler_34510_combined_model_of__biocrnpyler_585441_biocrnpyler_34510_1_combined + metabolite_nadph_ATP_rheostatbiocrnpyler_34510_combined_model_of__biocrnpyler_585441_biocrnpyler_34510_1_combined + molecule_acetolac_ATP_rheostatbiocrnpyler_34510_combined_model_of__biocrnpyler_585441_biocrnpyler_34510_1_combined; r55_1_ATP_rheostatbiocrnpyler_34510_combined_model_of__biocrnpyler_585441_biocrnpyler_34510_combined_k*complex_enzyme_IlvC_metabolite_nadph_molecule_acetolac_ATP_rheostatbiocrnpyler_34510_combined_model_of__biocrnpyler_585441_biocrnpyler_34510_1_combined;
    r55_1_ATP_rheostatbiocrnpyler_34510_combined_model_of__biocrnpyler_585441_biocrnpyler_34510_combined_k = 10;
  r57_ATP_rheostatbiocrnpyler_34510_combined_model_of__biocrnpyler_585441_biocrnpyler_34510_combined: complex_enzyme_IlvC_metabolite_nadph_molecule_acetolac_ATP_rheostatbiocrnpyler_34510_combined_model_of__biocrnpyler_585441_biocrnpyler_34510_1_combined => complex_enzyme_IlvC_metabolite_nadp_molecule_23dih3mebut_ATP_rheostatbiocrnpyler_34510_combined_model_of__biocrnpyler_585441_biocrnpyler_34510_1_combined; r57_ATP_rheostatbiocrnpyler_34510_combined_model_of__biocrnpyler_585441_biocrnpyler_34510_combined_k*complex_enzyme_IlvC_metabolite_nadph_molecule_acetolac_ATP_rheostatbiocrnpyler_34510_combined_model_of__biocrnpyler_585441_biocrnpyler_34510_1_combined;
    r57_ATP_rheostatbiocrnpyler_34510_combined_model_of__biocrnpyler_585441_biocrnpyler_34510_combined_k = 36000;
  r58_ATP_rheostatbiocrnpyler_34510_combined_model_of__biocrnpyler_585441_biocrnpyler_34510_combined: complex_enzyme_IlvC_metabolite_nadp_molecule_23dih3mebut_ATP_rheostatbiocrnpyler_34510_combined_model_of__biocrnpyler_585441_biocrnpyler_34510_1_combined => enzyme_IlvC_ATP_rheostatbiocrnpyler_34510_combined_model_of__biocrnpyler_585441_biocrnpyler_34510_1_combined + molecule_23dih3mebut_ATP_rheostatbiocrnpyler_34510_combined_model_of__biocrnpyler_585441_biocrnpyler_34510_1_combined + metabolite_nadp_ATP_rheostatbiocrnpyler_34510_combined_model_of__biocrnpyler_585441_biocrnpyler_34510_1_combined; r58_ATP_rheostatbiocrnpyler_34510_combined_model_of__biocrnpyler_585441_biocrnpyler_34510_combined_k*complex_enzyme_IlvC_metabolite_nadp_molecule_23dih3mebut_ATP_rheostatbiocrnpyler_34510_combined_model_of__biocrnpyler_585441_biocrnpyler_34510_1_combined;
    r58_ATP_rheostatbiocrnpyler_34510_combined_model_of__biocrnpyler_585441_biocrnpyler_34510_combined_k = 100;
  r58_1_ATP_rheostatbiocrnpyler_34510_combined_model_of__biocrnpyler_585441_biocrnpyler_34510_combined: enzyme_IlvC_ATP_rheostatbiocrnpyler_34510_combined_model_of__biocrnpyler_585441_biocrnpyler_34510_1_combined + molecule_23dih3mebut_ATP_rheostatbiocrnpyler_34510_combined_model_of__biocrnpyler_585441_biocrnpyler_34510_1_combined + metabolite_nadp_ATP_rheostatbiocrnpyler_34510_combined_model_of__biocrnpyler_585441_biocrnpyler_34510_1_combined => complex_enzyme_IlvC_metabolite_nadp_molecule_23dih3mebut_ATP_rheostatbiocrnpyler_34510_combined_model_of__biocrnpyler_585441_biocrnpyler_34510_1_combined; r58_1_ATP_rheostatbiocrnpyler_34510_combined_model_of__biocrnpyler_585441_biocrnpyler_34510_combined_k*enzyme_IlvC_ATP_rheostatbiocrnpyler_34510_combined_model_of__biocrnpyler_585441_biocrnpyler_34510_1_combined*molecule_23dih3mebut_ATP_rheostatbiocrnpyler_34510_combined_model_of__biocrnpyler_585441_biocrnpyler_34510_1_combined*metabolite_nadp_ATP_rheostatbiocrnpyler_34510_combined_model_of__biocrnpyler_585441_biocrnpyler_34510_1_combined;
    r58_1_ATP_rheostatbiocrnpyler_34510_combined_model_of__biocrnpyler_585441_biocrnpyler_34510_combined_k = 10;
  r60_ATP_rheostatbiocrnpyler_34510_combined_model_of__biocrnpyler_585441_biocrnpyler_34510_combined: enzyme_IlvD_ATP_rheostatbiocrnpyler_34510_combined_model_of__biocrnpyler_585441_biocrnpyler_34510_1_combined + molecule_23dih3mebut_ATP_rheostatbiocrnpyler_34510_combined_model_of__biocrnpyler_585441_biocrnpyler_34510_1_combined => complex_enzyme_IlvD_molecule_23dih3mebut_ATP_rheostatbiocrnpyler_34510_combined_model_of__biocrnpyler_585441_biocrnpyler_34510_1_combined; r60_ATP_rheostatbiocrnpyler_34510_combined_model_of__biocrnpyler_585441_biocrnpyler_34510_combined_k*enzyme_IlvD_ATP_rheostatbiocrnpyler_34510_combined_model_of__biocrnpyler_585441_biocrnpyler_34510_1_combined*molecule_23dih3mebut_ATP_rheostatbiocrnpyler_34510_combined_model_of__biocrnpyler_585441_biocrnpyler_34510_1_combined;
    r60_ATP_rheostatbiocrnpyler_34510_combined_model_of__biocrnpyler_585441_biocrnpyler_34510_combined_k = 100;
  r60_1_ATP_rheostatbiocrnpyler_34510_combined_model_of__biocrnpyler_585441_biocrnpyler_34510_combined: complex_enzyme_IlvD_molecule_23dih3mebut_ATP_rheostatbiocrnpyler_34510_combined_model_of__biocrnpyler_585441_biocrnpyler_34510_1_combined => enzyme_IlvD_ATP_rheostatbiocrnpyler_34510_combined_model_of__biocrnpyler_585441_biocrnpyler_34510_1_combined + molecule_23dih3mebut_ATP_rheostatbiocrnpyler_34510_combined_model_of__biocrnpyler_585441_biocrnpyler_34510_1_combined; r60_1_ATP_rheostatbiocrnpyler_34510_combined_model_of__biocrnpyler_585441_biocrnpyler_34510_combined_k*complex_enzyme_IlvD_molecule_23dih3mebut_ATP_rheostatbiocrnpyler_34510_combined_model_of__biocrnpyler_585441_biocrnpyler_34510_1_combined;
    r60_1_ATP_rheostatbiocrnpyler_34510_combined_model_of__biocrnpyler_585441_biocrnpyler_34510_combined_k = 10;
  r62_ATP_rheostatbiocrnpyler_34510_combined_model_of__biocrnpyler_585441_biocrnpyler_34510_combined: complex_enzyme_IlvD_molecule_23dih3mebut_ATP_rheostatbiocrnpyler_34510_combined_model_of__biocrnpyler_585441_biocrnpyler_34510_1_combined => complex_enzyme_IlvD_molecule_3me2oxo_ATP_rheostatbiocrnpyler_34510_combined_model_of__biocrnpyler_585441_biocrnpyler_34510_1_combined; r62_ATP_rheostatbiocrnpyler_34510_combined_model_of__biocrnpyler_585441_biocrnpyler_34510_combined_k*complex_enzyme_IlvD_molecule_23dih3mebut_ATP_rheostatbiocrnpyler_34510_combined_model_of__biocrnpyler_585441_biocrnpyler_34510_1_combined;
    r62_ATP_rheostatbiocrnpyler_34510_combined_model_of__biocrnpyler_585441_biocrnpyler_34510_combined_k = 36000;
  r63_ATP_rheostatbiocrnpyler_34510_combined_model_of__biocrnpyler_585441_biocrnpyler_34510_combined: complex_enzyme_IlvD_molecule_3me2oxo_ATP_rheostatbiocrnpyler_34510_combined_model_of__biocrnpyler_585441_biocrnpyler_34510_1_combined => enzyme_IlvD_ATP_rheostatbiocrnpyler_34510_combined_model_of__biocrnpyler_585441_biocrnpyler_34510_1_combined + molecule_3me2oxo_ATP_rheostatbiocrnpyler_34510_combined_model_of__biocrnpyler_585441_biocrnpyler_34510_1_combined; r63_ATP_rheostatbiocrnpyler_34510_combined_model_of__biocrnpyler_585441_biocrnpyler_34510_combined_k*complex_enzyme_IlvD_molecule_3me2oxo_ATP_rheostatbiocrnpyler_34510_combined_model_of__biocrnpyler_585441_biocrnpyler_34510_1_combined;
    r63_ATP_rheostatbiocrnpyler_34510_combined_model_of__biocrnpyler_585441_biocrnpyler_34510_combined_k = 100;
  r63_1_ATP_rheostatbiocrnpyler_34510_combined_model_of__biocrnpyler_585441_biocrnpyler_34510_combined: enzyme_IlvD_ATP_rheostatbiocrnpyler_34510_combined_model_of__biocrnpyler_585441_biocrnpyler_34510_1_combined + molecule_3me2oxo_ATP_rheostatbiocrnpyler_34510_combined_model_of__biocrnpyler_585441_biocrnpyler_34510_1_combined => complex_enzyme_IlvD_molecule_3me2oxo_ATP_rheostatbiocrnpyler_34510_combined_model_of__biocrnpyler_585441_biocrnpyler_34510_1_combined; r63_1_ATP_rheostatbiocrnpyler_34510_combined_model_of__biocrnpyler_585441_biocrnpyler_34510_combined_k*enzyme_IlvD_ATP_rheostatbiocrnpyler_34510_combined_model_of__biocrnpyler_585441_biocrnpyler_34510_1_combined*molecule_3me2oxo_ATP_rheostatbiocrnpyler_34510_combined_model_of__biocrnpyler_585441_biocrnpyler_34510_1_combined;
    r63_1_ATP_rheostatbiocrnpyler_34510_combined_model_of__biocrnpyler_585441_biocrnpyler_34510_combined_k = 10;
  r65_ATP_rheostatbiocrnpyler_34510_combined_model_of__biocrnpyler_585441_biocrnpyler_34510_combined: enzyme_kivD_ATP_rheostatbiocrnpyler_34510_combined_model_of__biocrnpyler_585441_biocrnpyler_34510_1_combined + molecule_3me2oxo_ATP_rheostatbiocrnpyler_34510_combined_model_of__biocrnpyler_585441_biocrnpyler_34510_1_combined => complex_enzyme_kivD_molecule_3me2oxo_ATP_rheostatbiocrnpyler_34510_combined_model_of__biocrnpyler_585441_biocrnpyler_34510_1_combined; r65_ATP_rheostatbiocrnpyler_34510_combined_model_of__biocrnpyler_585441_biocrnpyler_34510_combined_k*enzyme_kivD_ATP_rheostatbiocrnpyler_34510_combined_model_of__biocrnpyler_585441_biocrnpyler_34510_1_combined*molecule_3me2oxo_ATP_rheostatbiocrnpyler_34510_combined_model_of__biocrnpyler_585441_biocrnpyler_34510_1_combined;
    r65_ATP_rheostatbiocrnpyler_34510_combined_model_of__biocrnpyler_585441_biocrnpyler_34510_combined_k = 100;
  r65_1_ATP_rheostatbiocrnpyler_34510_combined_model_of__biocrnpyler_585441_biocrnpyler_34510_combined: complex_enzyme_kivD_molecule_3me2oxo_ATP_rheostatbiocrnpyler_34510_combined_model_of__biocrnpyler_585441_biocrnpyler_34510_1_combined => enzyme_kivD_ATP_rheostatbiocrnpyler_34510_combined_model_of__biocrnpyler_585441_biocrnpyler_34510_1_combined + molecule_3me2oxo_ATP_rheostatbiocrnpyler_34510_combined_model_of__biocrnpyler_585441_biocrnpyler_34510_1_combined; r65_1_ATP_rheostatbiocrnpyler_34510_combined_model_of__biocrnpyler_585441_biocrnpyler_34510_combined_k*complex_enzyme_kivD_molecule_3me2oxo_ATP_rheostatbiocrnpyler_34510_combined_model_of__biocrnpyler_585441_biocrnpyler_34510_1_combined;
    r65_1_ATP_rheostatbiocrnpyler_34510_combined_model_of__biocrnpyler_585441_biocrnpyler_34510_combined_k = 10;
  r67_ATP_rheostatbiocrnpyler_34510_combined_model_of__biocrnpyler_585441_biocrnpyler_34510_combined: complex_enzyme_kivD_molecule_3me2oxo_ATP_rheostatbiocrnpyler_34510_combined_model_of__biocrnpyler_585441_biocrnpyler_34510_1_combined => complex_enzyme_kivD_molecule_isobutanal_ATP_rheostatbiocrnpyler_34510_combined_model_of__biocrnpyler_585441_biocrnpyler_34510_1_combined; r67_ATP_rheostatbiocrnpyler_34510_combined_model_of__biocrnpyler_585441_biocrnpyler_34510_combined_k*complex_enzyme_kivD_molecule_3me2oxo_ATP_rheostatbiocrnpyler_34510_combined_model_of__biocrnpyler_585441_biocrnpyler_34510_1_combined;
    r67_ATP_rheostatbiocrnpyler_34510_combined_model_of__biocrnpyler_585441_biocrnpyler_34510_combined_k = 36000;
  r68_ATP_rheostatbiocrnpyler_34510_combined_model_of__biocrnpyler_585441_biocrnpyler_34510_combined: complex_enzyme_kivD_molecule_isobutanal_ATP_rheostatbiocrnpyler_34510_combined_model_of__biocrnpyler_585441_biocrnpyler_34510_1_combined => enzyme_kivD_ATP_rheostatbiocrnpyler_34510_combined_model_of__biocrnpyler_585441_biocrnpyler_34510_1_combined + molecule_isobutanal_ATP_rheostatbiocrnpyler_34510_combined_model_of__biocrnpyler_585441_biocrnpyler_34510_1_combined; r68_ATP_rheostatbiocrnpyler_34510_combined_model_of__biocrnpyler_585441_biocrnpyler_34510_combined_k*complex_enzyme_kivD_molecule_isobutanal_ATP_rheostatbiocrnpyler_34510_combined_model_of__biocrnpyler_585441_biocrnpyler_34510_1_combined;
    r68_ATP_rheostatbiocrnpyler_34510_combined_model_of__biocrnpyler_585441_biocrnpyler_34510_combined_k = 100;
  r68_1_ATP_rheostatbiocrnpyler_34510_combined_model_of__biocrnpyler_585441_biocrnpyler_34510_combined: enzyme_kivD_ATP_rheostatbiocrnpyler_34510_combined_model_of__biocrnpyler_585441_biocrnpyler_34510_1_combined + molecule_isobutanal_ATP_rheostatbiocrnpyler_34510_combined_model_of__biocrnpyler_585441_biocrnpyler_34510_1_combined => complex_enzyme_kivD_molecule_isobutanal_ATP_rheostatbiocrnpyler_34510_combined_model_of__biocrnpyler_585441_biocrnpyler_34510_1_combined; r68_1_ATP_rheostatbiocrnpyler_34510_combined_model_of__biocrnpyler_585441_biocrnpyler_34510_combined_k*enzyme_kivD_ATP_rheostatbiocrnpyler_34510_combined_model_of__biocrnpyler_585441_biocrnpyler_34510_1_combined*molecule_isobutanal_ATP_rheostatbiocrnpyler_34510_combined_model_of__biocrnpyler_585441_biocrnpyler_34510_1_combined;
    r68_1_ATP_rheostatbiocrnpyler_34510_combined_model_of__biocrnpyler_585441_biocrnpyler_34510_combined_k = 10;
  r70_ATP_rheostatbiocrnpyler_34510_combined_model_of__biocrnpyler_585441_biocrnpyler_34510_combined: enzyme_yahk_ATP_rheostatbiocrnpyler_34510_combined_model_of__biocrnpyler_585441_biocrnpyler_34510_1_combined + metabolite_nadph_ATP_rheostatbiocrnpyler_34510_combined_model_of__biocrnpyler_585441_biocrnpyler_34510_1_combined + molecule_isobutanal_ATP_rheostatbiocrnpyler_34510_combined_model_of__biocrnpyler_585441_biocrnpyler_34510_1_combined => complex_enzyme_yahk_metabolite_nadph_molecule_isobutanal_ATP_rheostatbiocrnpyler_34510_combined_model_of__biocrnpyler_585441_biocrnpyler_34510_1_combined; r70_ATP_rheostatbiocrnpyler_34510_combined_model_of__biocrnpyler_585441_biocrnpyler_34510_combined_k*enzyme_yahk_ATP_rheostatbiocrnpyler_34510_combined_model_of__biocrnpyler_585441_biocrnpyler_34510_1_combined*metabolite_nadph_ATP_rheostatbiocrnpyler_34510_combined_model_of__biocrnpyler_585441_biocrnpyler_34510_1_combined*molecule_isobutanal_ATP_rheostatbiocrnpyler_34510_combined_model_of__biocrnpyler_585441_biocrnpyler_34510_1_combined;
    r70_ATP_rheostatbiocrnpyler_34510_combined_model_of__biocrnpyler_585441_biocrnpyler_34510_combined_k = 100;
  r70_1_ATP_rheostatbiocrnpyler_34510_combined_model_of__biocrnpyler_585441_biocrnpyler_34510_combined: complex_enzyme_yahk_metabolite_nadph_molecule_isobutanal_ATP_rheostatbiocrnpyler_34510_combined_model_of__biocrnpyler_585441_biocrnpyler_34510_1_combined => enzyme_yahk_ATP_rheostatbiocrnpyler_34510_combined_model_of__biocrnpyler_585441_biocrnpyler_34510_1_combined + metabolite_nadph_ATP_rheostatbiocrnpyler_34510_combined_model_of__biocrnpyler_585441_biocrnpyler_34510_1_combined + molecule_isobutanal_ATP_rheostatbiocrnpyler_34510_combined_model_of__biocrnpyler_585441_biocrnpyler_34510_1_combined; r70_1_ATP_rheostatbiocrnpyler_34510_combined_model_of__biocrnpyler_585441_biocrnpyler_34510_combined_k*complex_enzyme_yahk_metabolite_nadph_molecule_isobutanal_ATP_rheostatbiocrnpyler_34510_combined_model_of__biocrnpyler_585441_biocrnpyler_34510_1_combined;
    r70_1_ATP_rheostatbiocrnpyler_34510_combined_model_of__biocrnpyler_585441_biocrnpyler_34510_combined_k = 10;
  r72_ATP_rheostatbiocrnpyler_34510_combined_model_of__biocrnpyler_585441_biocrnpyler_34510_combined: complex_enzyme_yahk_metabolite_nadph_molecule_isobutanal_ATP_rheostatbiocrnpyler_34510_combined_model_of__biocrnpyler_585441_biocrnpyler_34510_1_combined => complex_enzyme_yahk_metabolite_nadp_molecule_isobutanol_ATP_rheostatbiocrnpyler_34510_combined_model_of__biocrnpyler_585441_biocrnpyler_34510_1_combined; r72_ATP_rheostatbiocrnpyler_34510_combined_model_of__biocrnpyler_585441_biocrnpyler_34510_combined_k*complex_enzyme_yahk_metabolite_nadph_molecule_isobutanal_ATP_rheostatbiocrnpyler_34510_combined_model_of__biocrnpyler_585441_biocrnpyler_34510_1_combined;
    r72_ATP_rheostatbiocrnpyler_34510_combined_model_of__biocrnpyler_585441_biocrnpyler_34510_combined_k = 36000;
  r73_ATP_rheostatbiocrnpyler_34510_combined_model_of__biocrnpyler_585441_biocrnpyler_34510_combined: complex_enzyme_yahk_metabolite_nadp_molecule_isobutanol_ATP_rheostatbiocrnpyler_34510_combined_model_of__biocrnpyler_585441_biocrnpyler_34510_1_combined => enzyme_yahk_ATP_rheostatbiocrnpyler_34510_combined_model_of__biocrnpyler_585441_biocrnpyler_34510_1_combined + molecule_isobutanol_ATP_rheostatbiocrnpyler_34510_combined_model_of__biocrnpyler_585441_biocrnpyler_34510_1_combined + metabolite_nadp_ATP_rheostatbiocrnpyler_34510_combined_model_of__biocrnpyler_585441_biocrnpyler_34510_1_combined; r73_ATP_rheostatbiocrnpyler_34510_combined_model_of__biocrnpyler_585441_biocrnpyler_34510_combined_k*complex_enzyme_yahk_metabolite_nadp_molecule_isobutanol_ATP_rheostatbiocrnpyler_34510_combined_model_of__biocrnpyler_585441_biocrnpyler_34510_1_combined;
    r73_ATP_rheostatbiocrnpyler_34510_combined_model_of__biocrnpyler_585441_biocrnpyler_34510_combined_k = 100;
  r73_1_ATP_rheostatbiocrnpyler_34510_combined_model_of__biocrnpyler_585441_biocrnpyler_34510_combined: enzyme_yahk_ATP_rheostatbiocrnpyler_34510_combined_model_of__biocrnpyler_585441_biocrnpyler_34510_1_combined + molecule_isobutanol_ATP_rheostatbiocrnpyler_34510_combined_model_of__biocrnpyler_585441_biocrnpyler_34510_1_combined + metabolite_nadp_ATP_rheostatbiocrnpyler_34510_combined_model_of__biocrnpyler_585441_biocrnpyler_34510_1_combined => complex_enzyme_yahk_metabolite_nadp_molecule_isobutanol_ATP_rheostatbiocrnpyler_34510_combined_model_of__biocrnpyler_585441_biocrnpyler_34510_1_combined; r73_1_ATP_rheostatbiocrnpyler_34510_combined_model_of__biocrnpyler_585441_biocrnpyler_34510_combined_k*enzyme_yahk_ATP_rheostatbiocrnpyler_34510_combined_model_of__biocrnpyler_585441_biocrnpyler_34510_1_combined*molecule_isobutanol_ATP_rheostatbiocrnpyler_34510_combined_model_of__biocrnpyler_585441_biocrnpyler_34510_1_combined*metabolite_nadp_ATP_rheostatbiocrnpyler_34510_combined_model_of__biocrnpyler_585441_biocrnpyler_34510_1_combined;
    r73_1_ATP_rheostatbiocrnpyler_34510_combined_model_of__biocrnpyler_585441_biocrnpyler_34510_combined_k = 10;
  r1_cell3: atc_e_external_reservoir_model_1_combined_1_combined -> atc_i_cell3; kb_combined*atc_e_external_reservoir_model_1_combined_1_combined - kd_combined*atc_i_cell3;
  r0_gfpbiocrnpyler_948323_combined_model_of__biocrnpyler_948323_biocrnpyler_34510: dna_h_gfpbiocrnpyler_948323_combined_model_of__biocrnpyler_948323_biocrnpyler_34510 + exsA_exsAbiocrnpyler_585441_combined_model_of__biocrnpyler_585441_biocrnpyler_34510_1_combined => complex_dna_h_exsA_gfpbiocrnpyler_948323_combined_model_of__biocrnpyler_948323_biocrnpyler_34510; r0_gfpbiocrnpyler_948323_combined_model_of__biocrnpyler_948323_biocrnpyler_34510_k*dna_h_gfpbiocrnpyler_948323_combined_model_of__biocrnpyler_948323_biocrnpyler_34510*exsA_exsAbiocrnpyler_585441_combined_model_of__biocrnpyler_585441_biocrnpyler_34510_1_combined;
    r0_gfpbiocrnpyler_948323_combined_model_of__biocrnpyler_948323_biocrnpyler_34510_k = 4e-5;
  r0_1_gfpbiocrnpyler_948323_combined_model_of__biocrnpyler_948323_biocrnpyler_34510: complex_dna_h_exsA_gfpbiocrnpyler_948323_combined_model_of__biocrnpyler_948323_biocrnpyler_34510 => dna_h_gfpbiocrnpyler_948323_combined_model_of__biocrnpyler_948323_biocrnpyler_34510 + exsA_exsAbiocrnpyler_585441_combined_model_of__biocrnpyler_585441_biocrnpyler_34510_1_combined; r0_1_gfpbiocrnpyler_948323_combined_model_of__biocrnpyler_948323_biocrnpyler_34510_k*complex_dna_h_exsA_gfpbiocrnpyler_948323_combined_model_of__biocrnpyler_948323_biocrnpyler_34510;
    r0_1_gfpbiocrnpyler_948323_combined_model_of__biocrnpyler_948323_biocrnpyler_34510_k = 1e-12;
  r2_gfpbiocrnpyler_948323_combined_model_of__biocrnpyler_948323_biocrnpyler_34510: complex_dna_h_exsA_gfpbiocrnpyler_948323_combined_model_of__biocrnpyler_948323_biocrnpyler_34510 => complex_dna_h_exsA_gfpbiocrnpyler_948323_combined_model_of__biocrnpyler_948323_biocrnpyler_34510 + rna_h_gfpbiocrnpyler_948323_combined_model_of__biocrnpyler_948323_biocrnpyler_34510; r2_gfpbiocrnpyler_948323_combined_model_of__biocrnpyler_948323_biocrnpyler_34510_k*complex_dna_h_exsA_gfpbiocrnpyler_948323_combined_model_of__biocrnpyler_948323_biocrnpyler_34510;
    r2_gfpbiocrnpyler_948323_combined_model_of__biocrnpyler_948323_biocrnpyler_34510_k = 0.001875;
  r3_gfpbiocrnpyler_948323_combined_model_of__biocrnpyler_948323_biocrnpyler_34510: rna_h_gfpbiocrnpyler_948323_combined_model_of__biocrnpyler_948323_biocrnpyler_34510 + ATP_exsAbiocrnpyler_585441_1_combined_combined_model_of__biocrnpyler_585441_biocrnpyler_34510_1_combined => rna_h_gfpbiocrnpyler_948323_combined_model_of__biocrnpyler_948323_biocrnpyler_34510 + ADP_exsAbiocrnpyler_585441_1_combined_combined_model_of__biocrnpyler_585441_biocrnpyler_34510_1_combined + gfp_gfpbiocrnpyler_948323_combined_model_of__biocrnpyler_948323_biocrnpyler_34510 + P_exsAbiocrnpyler_585441_1_combined_combined_model_of__biocrnpyler_585441_biocrnpyler_34510_1_combined; r3_gfpbiocrnpyler_948323_combined_model_of__biocrnpyler_948323_biocrnpyler_34510_k*rna_h_gfpbiocrnpyler_948323_combined_model_of__biocrnpyler_948323_biocrnpyler_34510*ATP_exsAbiocrnpyler_585441_1_combined_combined_model_of__biocrnpyler_585441_biocrnpyler_34510_1_combined^r3_gfpbiocrnpyler_948323_combined_model_of__biocrnpyler_948323_biocrnpyler_34510_n/(ATP_exsAbiocrnpyler_585441_1_combined_combined_model_of__biocrnpyler_585441_biocrnpyler_34510_1_combined^r3_gfpbiocrnpyler_948323_combined_model_of__biocrnpyler_948323_biocrnpyler_34510_n + r3_gfpbiocrnpyler_948323_combined_model_of__biocrnpyler_948323_biocrnpyler_34510_K);
    r3_gfpbiocrnpyler_948323_combined_model_of__biocrnpyler_948323_biocrnpyler_34510_k = 0.0005; r3_gfpbiocrnpyler_948323_combined_model_of__biocrnpyler_948323_biocrnpyler_34510_n = 1; r3_gfpbiocrnpyler_948323_combined_model_of__biocrnpyler_948323_biocrnpyler_34510_K = 1;
  r4_gfpbiocrnpyler_948323_combined_model_of__biocrnpyler_948323_biocrnpyler_34510: rna_h_gfpbiocrnpyler_948323_combined_model_of__biocrnpyler_948323_biocrnpyler_34510 => ; r4_gfpbiocrnpyler_948323_combined_model_of__biocrnpyler_948323_biocrnpyler_34510_k*rna_h_gfpbiocrnpyler_948323_combined_model_of__biocrnpyler_948323_biocrnpyler_34510;
    r4_gfpbiocrnpyler_948323_combined_model_of__biocrnpyler_948323_biocrnpyler_34510_k = 0.001;

  // Unit definitions:
  unit square_metre = metre^2;
  unit per_second = 1 / second;
  unit substance = dimensionless;
end
