// SBML level 3 version 2

model combined_model_of__combined_model_of__external_reservoir_model_combined_model_of__atc_membrane_dnaexp_membrane_combined_model_of__biocrnpyler_269558()
  // model units - substance: mole, time: second, volume: litre, area: square_metre, length: metre, extent: mole

  // Compartments:
  compartment cell_1_internal_combined_cell1combined_model_of__combined_model_of__external_reservoir_model_combined_model_of__atc_membrane_dnaexp_membrane_combined_model_of__biocrnpyler_269558 = 3e-6 litre;
  compartment cell_external_cell1combined_model_of__combined_model_of__external_reservoir_model_combined_model_of__atc_membrane_dnaexp_membrane_combined_model_of__biocrnpyler_269558 = 0.0001 litre;

  // Species:
  species atc_e_external_reservoir_model_1_combined_cell1combined_model_of__combined_model_of__external_reservoir_model_combined_model_of__atc_membrane_dnaexp_membrane_combined_model_of__biocrnpyler_269558 in cell_external_cell1combined_model_of__combined_model_of__external_reservoir_model_combined_model_of__atc_membrane_dnaexp_membrane_combined_model_of__biocrnpyler_269558 = 0;
  species ssDNA_e_cell1combined_model_of__combined_model_of__external_reservoir_model_combined_model_of__atc_membrane_dnaexp_membrane_combined_model_of__biocrnpyler_269558 in cell_external_cell1combined_model_of__combined_model_of__external_reservoir_model_combined_model_of__atc_membrane_dnaexp_membrane_combined_model_of__biocrnpyler_269558 = 0;
  species ssDNA_cell1combined_model_of__combined_model_of__external_reservoir_model_combined_model_of__atc_membrane_dnaexp_membrane_combined_model_of__biocrnpyler_269558 in cell_1_internal_combined_cell1combined_model_of__combined_model_of__external_reservoir_model_combined_model_of__atc_membrane_dnaexp_membrane_combined_model_of__biocrnpyler_269558 = 0;
  species VirE2_b_ssDNA_cell1combined_model_of__combined_model_of__external_reservoir_model_combined_model_of__atc_membrane_dnaexp_membrane_combined_model_of__biocrnpyler_269558 in cell_1_internal_combined_cell1combined_model_of__combined_model_of__external_reservoir_model_combined_model_of__atc_membrane_dnaexp_membrane_combined_model_of__biocrnpyler_269558 = 0;
  species dna_g_biocrnpyler_269558_cell1combined_model_of__combined_model_of__external_reservoir_model_combined_model_of__atc_membrane_dnaexp_membrane_combined_model_of__biocrnpyler_269558 in cell_1_internal_combined_cell1combined_model_of__combined_model_of__external_reservoir_model_combined_model_of__atc_membrane_dnaexp_membrane_combined_model_of__biocrnpyler_269558 = 0;
  species tetR_biocrnpyler_269558_cell1combined_model_of__combined_model_of__external_reservoir_model_combined_model_of__atc_membrane_dnaexp_membrane_combined_model_of__biocrnpyler_269558 in cell_1_internal_combined_cell1combined_model_of__combined_model_of__external_reservoir_model_combined_model_of__atc_membrane_dnaexp_membrane_combined_model_of__biocrnpyler_269558 = 0;
  species rna_g_biocrnpyler_269558_cell1combined_model_of__combined_model_of__external_reservoir_model_combined_model_of__atc_membrane_dnaexp_membrane_combined_model_of__biocrnpyler_269558 in cell_1_internal_combined_cell1combined_model_of__combined_model_of__external_reservoir_model_combined_model_of__atc_membrane_dnaexp_membrane_combined_model_of__biocrnpyler_269558 = 0;
  species VirE2_f_biocrnpyler_269558_cell1combined_model_of__combined_model_of__external_reservoir_model_combined_model_of__atc_membrane_dnaexp_membrane_combined_model_of__biocrnpyler_269558 in cell_1_internal_combined_cell1combined_model_of__combined_model_of__external_reservoir_model_combined_model_of__atc_membrane_dnaexp_membrane_combined_model_of__biocrnpyler_269558 = 0;
  species ATP_biocrnpyler_269558_cell1combined_model_of__combined_model_of__external_reservoir_model_combined_model_of__atc_membrane_dnaexp_membrane_combined_model_of__biocrnpyler_269558 in cell_1_internal_combined_cell1combined_model_of__combined_model_of__external_reservoir_model_combined_model_of__atc_membrane_dnaexp_membrane_combined_model_of__biocrnpyler_269558 = 0;
  species ADP_biocrnpyler_269558_cell1combined_model_of__combined_model_of__external_reservoir_model_combined_model_of__atc_membrane_dnaexp_membrane_combined_model_of__biocrnpyler_269558 in cell_1_internal_combined_cell1combined_model_of__combined_model_of__external_reservoir_model_combined_model_of__atc_membrane_dnaexp_membrane_combined_model_of__biocrnpyler_269558 = 0;
  species atc_i_1_combined_cell1combined_model_of__combined_model_of__external_reservoir_model_combined_model_of__atc_membrane_dnaexp_membrane_combined_model_of__biocrnpyler_269558 in cell_1_internal_combined_cell1combined_model_of__combined_model_of__external_reservoir_model_combined_model_of__atc_membrane_dnaexp_membrane_combined_model_of__biocrnpyler_269558 = 0;
  species complex_atc_i_tetR_biocrnpyler_269558_cell1combined_model_of__combined_model_of__external_reservoir_model_combined_model_of__atc_membrane_dnaexp_membrane_combined_model_of__biocrnpyler_269558 in cell_1_internal_combined_cell1combined_model_of__combined_model_of__external_reservoir_model_combined_model_of__atc_membrane_dnaexp_membrane_combined_model_of__biocrnpyler_269558 = 0;
  species VirE2_b_1_combined_cell1combined_model_of__combined_model_of__external_reservoir_model_combined_model_of__atc_membrane_dnaexp_membrane_combined_model_of__biocrnpyler_269558 in cell_1_internal_combined_cell1combined_model_of__combined_model_of__external_reservoir_model_combined_model_of__atc_membrane_dnaexp_membrane_combined_model_of__biocrnpyler_269558 = 0;
  species complex_dna_g_tetR_biocrnpyler_269558_cell1combined_model_of__combined_model_of__external_reservoir_model_combined_model_of__atc_membrane_dnaexp_membrane_combined_model_of__biocrnpyler_269558 in cell_1_internal_combined_cell1combined_model_of__combined_model_of__external_reservoir_model_combined_model_of__atc_membrane_dnaexp_membrane_combined_model_of__biocrnpyler_269558 = 0;
  species complex_atc_i_dna_g_tetR_biocrnpyler_269558_cell1combined_model_of__combined_model_of__external_reservoir_model_combined_model_of__atc_membrane_dnaexp_membrane_combined_model_of__biocrnpyler_269558 in cell_1_internal_combined_cell1combined_model_of__combined_model_of__external_reservoir_model_combined_model_of__atc_membrane_dnaexp_membrane_combined_model_of__biocrnpyler_269558 = 0;
  species P_biocrnpyler_269558_cell1combined_model_of__combined_model_of__external_reservoir_model_combined_model_of__atc_membrane_dnaexp_membrane_combined_model_of__biocrnpyler_269558 in cell_1_internal_combined_cell1combined_model_of__combined_model_of__external_reservoir_model_combined_model_of__atc_membrane_dnaexp_membrane_combined_model_of__biocrnpyler_269558 = 0;

  // Parameters:
  kb_cell1combined_model_of__combined_model_of__external_reservoir_model_combined_model_of__atc_membrane_dnaexp_membrane_combined_model_of__biocrnpyler_269558 = 0.002 per_second;
  kd_cell1combined_model_of__combined_model_of__external_reservoir_model_combined_model_of__atc_membrane_dnaexp_membrane_combined_model_of__biocrnpyler_269558 = 1e-5 per_second;
  kb1_cell1combined_model_of__combined_model_of__external_reservoir_model_combined_model_of__atc_membrane_dnaexp_membrane_combined_model_of__biocrnpyler_269558 = 0.002 per_second;
  kd1_cell1combined_model_of__combined_model_of__external_reservoir_model_combined_model_of__atc_membrane_dnaexp_membrane_combined_model_of__biocrnpyler_269558 = 1e-5 per_second;
  kd2_cell1combined_model_of__combined_model_of__external_reservoir_model_combined_model_of__atc_membrane_dnaexp_membrane_combined_model_of__biocrnpyler_269558 = 0.0002 per_second;

  // Reactions:
  r1_cell1_cell1combined_model_of__combined_model_of__external_reservoir_model_combined_model_of__atc_membrane_dnaexp_membrane_combined_model_of__biocrnpyler_269558: atc_e_external_reservoir_model_1_combined_cell1combined_model_of__combined_model_of__external_reservoir_model_combined_model_of__atc_membrane_dnaexp_membrane_combined_model_of__biocrnpyler_269558 -> atc_i_1_combined_cell1combined_model_of__combined_model_of__external_reservoir_model_combined_model_of__atc_membrane_dnaexp_membrane_combined_model_of__biocrnpyler_269558; kb_cell1combined_model_of__combined_model_of__external_reservoir_model_combined_model_of__atc_membrane_dnaexp_membrane_combined_model_of__biocrnpyler_269558*atc_e_external_reservoir_model_1_combined_cell1combined_model_of__combined_model_of__external_reservoir_model_combined_model_of__atc_membrane_dnaexp_membrane_combined_model_of__biocrnpyler_269558 - kd_cell1combined_model_of__combined_model_of__external_reservoir_model_combined_model_of__atc_membrane_dnaexp_membrane_combined_model_of__biocrnpyler_269558*atc_i_1_combined_cell1combined_model_of__combined_model_of__external_reservoir_model_combined_model_of__atc_membrane_dnaexp_membrane_combined_model_of__biocrnpyler_269558;
  R1_cell1combined_model_of__combined_model_of__external_reservoir_model_combined_model_of__atc_membrane_dnaexp_membrane_combined_model_of__biocrnpyler_269558: VirE2_b_1_combined_cell1combined_model_of__combined_model_of__external_reservoir_model_combined_model_of__atc_membrane_dnaexp_membrane_combined_model_of__biocrnpyler_269558 + ssDNA_cell1combined_model_of__combined_model_of__external_reservoir_model_combined_model_of__atc_membrane_dnaexp_membrane_combined_model_of__biocrnpyler_269558 -> VirE2_b_ssDNA_cell1combined_model_of__combined_model_of__external_reservoir_model_combined_model_of__atc_membrane_dnaexp_membrane_combined_model_of__biocrnpyler_269558; kb1_cell1combined_model_of__combined_model_of__external_reservoir_model_combined_model_of__atc_membrane_dnaexp_membrane_combined_model_of__biocrnpyler_269558*VirE2_b_1_combined_cell1combined_model_of__combined_model_of__external_reservoir_model_combined_model_of__atc_membrane_dnaexp_membrane_combined_model_of__biocrnpyler_269558*ssDNA_cell1combined_model_of__combined_model_of__external_reservoir_model_combined_model_of__atc_membrane_dnaexp_membrane_combined_model_of__biocrnpyler_269558 - kd1_cell1combined_model_of__combined_model_of__external_reservoir_model_combined_model_of__atc_membrane_dnaexp_membrane_combined_model_of__biocrnpyler_269558*VirE2_b_ssDNA_cell1combined_model_of__combined_model_of__external_reservoir_model_combined_model_of__atc_membrane_dnaexp_membrane_combined_model_of__biocrnpyler_269558;
  R2_cell1combined_model_of__combined_model_of__external_reservoir_model_combined_model_of__atc_membrane_dnaexp_membrane_combined_model_of__biocrnpyler_269558: VirE2_b_ssDNA_cell1combined_model_of__combined_model_of__external_reservoir_model_combined_model_of__atc_membrane_dnaexp_membrane_combined_model_of__biocrnpyler_269558 => ssDNA_e_cell1combined_model_of__combined_model_of__external_reservoir_model_combined_model_of__atc_membrane_dnaexp_membrane_combined_model_of__biocrnpyler_269558 + VirE2_b_1_combined_cell1combined_model_of__combined_model_of__external_reservoir_model_combined_model_of__atc_membrane_dnaexp_membrane_combined_model_of__biocrnpyler_269558; kd2_cell1combined_model_of__combined_model_of__external_reservoir_model_combined_model_of__atc_membrane_dnaexp_membrane_combined_model_of__biocrnpyler_269558*VirE2_b_ssDNA_cell1combined_model_of__combined_model_of__external_reservoir_model_combined_model_of__atc_membrane_dnaexp_membrane_combined_model_of__biocrnpyler_269558;
  r0_biocrnpyler_269558_cell1combined_model_of__combined_model_of__external_reservoir_model_combined_model_of__atc_membrane_dnaexp_membrane_combined_model_of__biocrnpyler_269558: atc_i_1_combined_cell1combined_model_of__combined_model_of__external_reservoir_model_combined_model_of__atc_membrane_dnaexp_membrane_combined_model_of__biocrnpyler_269558 + tetR_biocrnpyler_269558_cell1combined_model_of__combined_model_of__external_reservoir_model_combined_model_of__atc_membrane_dnaexp_membrane_combined_model_of__biocrnpyler_269558 => complex_atc_i_tetR_biocrnpyler_269558_cell1combined_model_of__combined_model_of__external_reservoir_model_combined_model_of__atc_membrane_dnaexp_membrane_combined_model_of__biocrnpyler_269558; r0_biocrnpyler_269558_cell1combined_model_of__combined_model_of__external_reservoir_model_combined_model_of__atc_membrane_dnaexp_membrane_combined_model_of__biocrnpyler_269558_k*atc_i_1_combined_cell1combined_model_of__combined_model_of__external_reservoir_model_combined_model_of__atc_membrane_dnaexp_membrane_combined_model_of__biocrnpyler_269558*tetR_biocrnpyler_269558_cell1combined_model_of__combined_model_of__external_reservoir_model_combined_model_of__atc_membrane_dnaexp_membrane_combined_model_of__biocrnpyler_269558;
    r0_biocrnpyler_269558_cell1combined_model_of__combined_model_of__external_reservoir_model_combined_model_of__atc_membrane_dnaexp_membrane_combined_model_of__biocrnpyler_269558_k = 0.0002;
  r0_1_biocrnpyler_269558_cell1combined_model_of__combined_model_of__external_reservoir_model_combined_model_of__atc_membrane_dnaexp_membrane_combined_model_of__biocrnpyler_269558: complex_atc_i_tetR_biocrnpyler_269558_cell1combined_model_of__combined_model_of__external_reservoir_model_combined_model_of__atc_membrane_dnaexp_membrane_combined_model_of__biocrnpyler_269558 => atc_i_1_combined_cell1combined_model_of__combined_model_of__external_reservoir_model_combined_model_of__atc_membrane_dnaexp_membrane_combined_model_of__biocrnpyler_269558 + tetR_biocrnpyler_269558_cell1combined_model_of__combined_model_of__external_reservoir_model_combined_model_of__atc_membrane_dnaexp_membrane_combined_model_of__biocrnpyler_269558; r0_1_biocrnpyler_269558_cell1combined_model_of__combined_model_of__external_reservoir_model_combined_model_of__atc_membrane_dnaexp_membrane_combined_model_of__biocrnpyler_269558_k*complex_atc_i_tetR_biocrnpyler_269558_cell1combined_model_of__combined_model_of__external_reservoir_model_combined_model_of__atc_membrane_dnaexp_membrane_combined_model_of__biocrnpyler_269558;
    r0_1_biocrnpyler_269558_cell1combined_model_of__combined_model_of__external_reservoir_model_combined_model_of__atc_membrane_dnaexp_membrane_combined_model_of__biocrnpyler_269558_k = 2e-9;
  r2_biocrnpyler_269558_cell1combined_model_of__combined_model_of__external_reservoir_model_combined_model_of__atc_membrane_dnaexp_membrane_combined_model_of__biocrnpyler_269558: dna_g_biocrnpyler_269558_cell1combined_model_of__combined_model_of__external_reservoir_model_combined_model_of__atc_membrane_dnaexp_membrane_combined_model_of__biocrnpyler_269558 + tetR_biocrnpyler_269558_cell1combined_model_of__combined_model_of__external_reservoir_model_combined_model_of__atc_membrane_dnaexp_membrane_combined_model_of__biocrnpyler_269558 => complex_dna_g_tetR_biocrnpyler_269558_cell1combined_model_of__combined_model_of__external_reservoir_model_combined_model_of__atc_membrane_dnaexp_membrane_combined_model_of__biocrnpyler_269558; r2_biocrnpyler_269558_cell1combined_model_of__combined_model_of__external_reservoir_model_combined_model_of__atc_membrane_dnaexp_membrane_combined_model_of__biocrnpyler_269558_k*dna_g_biocrnpyler_269558_cell1combined_model_of__combined_model_of__external_reservoir_model_combined_model_of__atc_membrane_dnaexp_membrane_combined_model_of__biocrnpyler_269558*tetR_biocrnpyler_269558_cell1combined_model_of__combined_model_of__external_reservoir_model_combined_model_of__atc_membrane_dnaexp_membrane_combined_model_of__biocrnpyler_269558;
    r2_biocrnpyler_269558_cell1combined_model_of__combined_model_of__external_reservoir_model_combined_model_of__atc_membrane_dnaexp_membrane_combined_model_of__biocrnpyler_269558_k = 4e-5;
  r2_1_biocrnpyler_269558_cell1combined_model_of__combined_model_of__external_reservoir_model_combined_model_of__atc_membrane_dnaexp_membrane_combined_model_of__biocrnpyler_269558: complex_dna_g_tetR_biocrnpyler_269558_cell1combined_model_of__combined_model_of__external_reservoir_model_combined_model_of__atc_membrane_dnaexp_membrane_combined_model_of__biocrnpyler_269558 => dna_g_biocrnpyler_269558_cell1combined_model_of__combined_model_of__external_reservoir_model_combined_model_of__atc_membrane_dnaexp_membrane_combined_model_of__biocrnpyler_269558 + tetR_biocrnpyler_269558_cell1combined_model_of__combined_model_of__external_reservoir_model_combined_model_of__atc_membrane_dnaexp_membrane_combined_model_of__biocrnpyler_269558; r2_1_biocrnpyler_269558_cell1combined_model_of__combined_model_of__external_reservoir_model_combined_model_of__atc_membrane_dnaexp_membrane_combined_model_of__biocrnpyler_269558_k*complex_dna_g_tetR_biocrnpyler_269558_cell1combined_model_of__combined_model_of__external_reservoir_model_combined_model_of__atc_membrane_dnaexp_membrane_combined_model_of__biocrnpyler_269558;
    r2_1_biocrnpyler_269558_cell1combined_model_of__combined_model_of__external_reservoir_model_combined_model_of__atc_membrane_dnaexp_membrane_combined_model_of__biocrnpyler_269558_k = 1e-12;
  r4_biocrnpyler_269558_cell1combined_model_of__combined_model_of__external_reservoir_model_combined_model_of__atc_membrane_dnaexp_membrane_combined_model_of__biocrnpyler_269558: complex_dna_g_tetR_biocrnpyler_269558_cell1combined_model_of__combined_model_of__external_reservoir_model_combined_model_of__atc_membrane_dnaexp_membrane_combined_model_of__biocrnpyler_269558 + atc_i_1_combined_cell1combined_model_of__combined_model_of__external_reservoir_model_combined_model_of__atc_membrane_dnaexp_membrane_combined_model_of__biocrnpyler_269558 => complex_atc_i_dna_g_tetR_biocrnpyler_269558_cell1combined_model_of__combined_model_of__external_reservoir_model_combined_model_of__atc_membrane_dnaexp_membrane_combined_model_of__biocrnpyler_269558; r4_biocrnpyler_269558_cell1combined_model_of__combined_model_of__external_reservoir_model_combined_model_of__atc_membrane_dnaexp_membrane_combined_model_of__biocrnpyler_269558_k*complex_dna_g_tetR_biocrnpyler_269558_cell1combined_model_of__combined_model_of__external_reservoir_model_combined_model_of__atc_membrane_dnaexp_membrane_combined_model_of__biocrnpyler_269558*atc_i_1_combined_cell1combined_model_of__combined_model_of__external_reservoir_model_combined_model_of__atc_membrane_dnaexp_membrane_combined_model_of__biocrnpyler_269558;
    r4_biocrnpyler_269558_cell1combined_model_of__combined_model_of__external_reservoir_model_combined_model_of__atc_membrane_dnaexp_membrane_combined_model_of__biocrnpyler_269558_k = 6e-6;
  r4_1_biocrnpyler_269558_cell1combined_model_of__combined_model_of__external_reservoir_model_combined_model_of__atc_membrane_dnaexp_membrane_combined_model_of__biocrnpyler_269558: complex_atc_i_dna_g_tetR_biocrnpyler_269558_cell1combined_model_of__combined_model_of__external_reservoir_model_combined_model_of__atc_membrane_dnaexp_membrane_combined_model_of__biocrnpyler_269558 => complex_dna_g_tetR_biocrnpyler_269558_cell1combined_model_of__combined_model_of__external_reservoir_model_combined_model_of__atc_membrane_dnaexp_membrane_combined_model_of__biocrnpyler_269558 + atc_i_1_combined_cell1combined_model_of__combined_model_of__external_reservoir_model_combined_model_of__atc_membrane_dnaexp_membrane_combined_model_of__biocrnpyler_269558; r4_1_biocrnpyler_269558_cell1combined_model_of__combined_model_of__external_reservoir_model_combined_model_of__atc_membrane_dnaexp_membrane_combined_model_of__biocrnpyler_269558_k*complex_atc_i_dna_g_tetR_biocrnpyler_269558_cell1combined_model_of__combined_model_of__external_reservoir_model_combined_model_of__atc_membrane_dnaexp_membrane_combined_model_of__biocrnpyler_269558;
    r4_1_biocrnpyler_269558_cell1combined_model_of__combined_model_of__external_reservoir_model_combined_model_of__atc_membrane_dnaexp_membrane_combined_model_of__biocrnpyler_269558_k = 3e-9;
  r6_biocrnpyler_269558_cell1combined_model_of__combined_model_of__external_reservoir_model_combined_model_of__atc_membrane_dnaexp_membrane_combined_model_of__biocrnpyler_269558: complex_atc_i_dna_g_tetR_biocrnpyler_269558_cell1combined_model_of__combined_model_of__external_reservoir_model_combined_model_of__atc_membrane_dnaexp_membrane_combined_model_of__biocrnpyler_269558 => dna_g_biocrnpyler_269558_cell1combined_model_of__combined_model_of__external_reservoir_model_combined_model_of__atc_membrane_dnaexp_membrane_combined_model_of__biocrnpyler_269558 + complex_atc_i_tetR_biocrnpyler_269558_cell1combined_model_of__combined_model_of__external_reservoir_model_combined_model_of__atc_membrane_dnaexp_membrane_combined_model_of__biocrnpyler_269558; r6_biocrnpyler_269558_cell1combined_model_of__combined_model_of__external_reservoir_model_combined_model_of__atc_membrane_dnaexp_membrane_combined_model_of__biocrnpyler_269558_k*complex_atc_i_dna_g_tetR_biocrnpyler_269558_cell1combined_model_of__combined_model_of__external_reservoir_model_combined_model_of__atc_membrane_dnaexp_membrane_combined_model_of__biocrnpyler_269558;
    r6_biocrnpyler_269558_cell1combined_model_of__combined_model_of__external_reservoir_model_combined_model_of__atc_membrane_dnaexp_membrane_combined_model_of__biocrnpyler_269558_k = 0.005;
  r6_1_biocrnpyler_269558_cell1combined_model_of__combined_model_of__external_reservoir_model_combined_model_of__atc_membrane_dnaexp_membrane_combined_model_of__biocrnpyler_269558: dna_g_biocrnpyler_269558_cell1combined_model_of__combined_model_of__external_reservoir_model_combined_model_of__atc_membrane_dnaexp_membrane_combined_model_of__biocrnpyler_269558 + complex_atc_i_tetR_biocrnpyler_269558_cell1combined_model_of__combined_model_of__external_reservoir_model_combined_model_of__atc_membrane_dnaexp_membrane_combined_model_of__biocrnpyler_269558 => complex_atc_i_dna_g_tetR_biocrnpyler_269558_cell1combined_model_of__combined_model_of__external_reservoir_model_combined_model_of__atc_membrane_dnaexp_membrane_combined_model_of__biocrnpyler_269558; r6_1_biocrnpyler_269558_cell1combined_model_of__combined_model_of__external_reservoir_model_combined_model_of__atc_membrane_dnaexp_membrane_combined_model_of__biocrnpyler_269558_k*dna_g_biocrnpyler_269558_cell1combined_model_of__combined_model_of__external_reservoir_model_combined_model_of__atc_membrane_dnaexp_membrane_combined_model_of__biocrnpyler_269558*complex_atc_i_tetR_biocrnpyler_269558_cell1combined_model_of__combined_model_of__external_reservoir_model_combined_model_of__atc_membrane_dnaexp_membrane_combined_model_of__biocrnpyler_269558;
    r6_1_biocrnpyler_269558_cell1combined_model_of__combined_model_of__external_reservoir_model_combined_model_of__atc_membrane_dnaexp_membrane_combined_model_of__biocrnpyler_269558_k = 1e-10;
  r8_biocrnpyler_269558_cell1combined_model_of__combined_model_of__external_reservoir_model_combined_model_of__atc_membrane_dnaexp_membrane_combined_model_of__biocrnpyler_269558: dna_g_biocrnpyler_269558_cell1combined_model_of__combined_model_of__external_reservoir_model_combined_model_of__atc_membrane_dnaexp_membrane_combined_model_of__biocrnpyler_269558 => dna_g_biocrnpyler_269558_cell1combined_model_of__combined_model_of__external_reservoir_model_combined_model_of__atc_membrane_dnaexp_membrane_combined_model_of__biocrnpyler_269558 + rna_g_biocrnpyler_269558_cell1combined_model_of__combined_model_of__external_reservoir_model_combined_model_of__atc_membrane_dnaexp_membrane_combined_model_of__biocrnpyler_269558; r8_biocrnpyler_269558_cell1combined_model_of__combined_model_of__external_reservoir_model_combined_model_of__atc_membrane_dnaexp_membrane_combined_model_of__biocrnpyler_269558_k*dna_g_biocrnpyler_269558_cell1combined_model_of__combined_model_of__external_reservoir_model_combined_model_of__atc_membrane_dnaexp_membrane_combined_model_of__biocrnpyler_269558;
    r8_biocrnpyler_269558_cell1combined_model_of__combined_model_of__external_reservoir_model_combined_model_of__atc_membrane_dnaexp_membrane_combined_model_of__biocrnpyler_269558_k = 0.0031875;
  r9_biocrnpyler_269558_cell1combined_model_of__combined_model_of__external_reservoir_model_combined_model_of__atc_membrane_dnaexp_membrane_combined_model_of__biocrnpyler_269558: rna_g_biocrnpyler_269558_cell1combined_model_of__combined_model_of__external_reservoir_model_combined_model_of__atc_membrane_dnaexp_membrane_combined_model_of__biocrnpyler_269558 + ATP_biocrnpyler_269558_cell1combined_model_of__combined_model_of__external_reservoir_model_combined_model_of__atc_membrane_dnaexp_membrane_combined_model_of__biocrnpyler_269558 => rna_g_biocrnpyler_269558_cell1combined_model_of__combined_model_of__external_reservoir_model_combined_model_of__atc_membrane_dnaexp_membrane_combined_model_of__biocrnpyler_269558 + ADP_biocrnpyler_269558_cell1combined_model_of__combined_model_of__external_reservoir_model_combined_model_of__atc_membrane_dnaexp_membrane_combined_model_of__biocrnpyler_269558 + VirE2_f_biocrnpyler_269558_cell1combined_model_of__combined_model_of__external_reservoir_model_combined_model_of__atc_membrane_dnaexp_membrane_combined_model_of__biocrnpyler_269558 + P_biocrnpyler_269558_cell1combined_model_of__combined_model_of__external_reservoir_model_combined_model_of__atc_membrane_dnaexp_membrane_combined_model_of__biocrnpyler_269558; r9_biocrnpyler_269558_cell1combined_model_of__combined_model_of__external_reservoir_model_combined_model_of__atc_membrane_dnaexp_membrane_combined_model_of__biocrnpyler_269558_k*rna_g_biocrnpyler_269558_cell1combined_model_of__combined_model_of__external_reservoir_model_combined_model_of__atc_membrane_dnaexp_membrane_combined_model_of__biocrnpyler_269558*ATP_biocrnpyler_269558_cell1combined_model_of__combined_model_of__external_reservoir_model_combined_model_of__atc_membrane_dnaexp_membrane_combined_model_of__biocrnpyler_269558^n/(ATP_biocrnpyler_269558_cell1combined_model_of__combined_model_of__external_reservoir_model_combined_model_of__atc_membrane_dnaexp_membrane_combined_model_of__biocrnpyler_269558^n + K);
    r9_biocrnpyler_269558_cell1combined_model_of__combined_model_of__external_reservoir_model_combined_model_of__atc_membrane_dnaexp_membrane_combined_model_of__biocrnpyler_269558_k = 0.001; n = 1; K = 1;
  r10_biocrnpyler_269558_cell1combined_model_of__combined_model_of__external_reservoir_model_combined_model_of__atc_membrane_dnaexp_membrane_combined_model_of__biocrnpyler_269558: VirE2_f_biocrnpyler_269558_cell1combined_model_of__combined_model_of__external_reservoir_model_combined_model_of__atc_membrane_dnaexp_membrane_combined_model_of__biocrnpyler_269558 => VirE2_b_1_combined_cell1combined_model_of__combined_model_of__external_reservoir_model_combined_model_of__atc_membrane_dnaexp_membrane_combined_model_of__biocrnpyler_269558; r10_biocrnpyler_269558_cell1combined_model_of__combined_model_of__external_reservoir_model_combined_model_of__atc_membrane_dnaexp_membrane_combined_model_of__biocrnpyler_269558_k*VirE2_f_biocrnpyler_269558_cell1combined_model_of__combined_model_of__external_reservoir_model_combined_model_of__atc_membrane_dnaexp_membrane_combined_model_of__biocrnpyler_269558;
    r10_biocrnpyler_269558_cell1combined_model_of__combined_model_of__external_reservoir_model_combined_model_of__atc_membrane_dnaexp_membrane_combined_model_of__biocrnpyler_269558_k = 5e-5;
  r10_1_biocrnpyler_269558_cell1combined_model_of__combined_model_of__external_reservoir_model_combined_model_of__atc_membrane_dnaexp_membrane_combined_model_of__biocrnpyler_269558: VirE2_b_1_combined_cell1combined_model_of__combined_model_of__external_reservoir_model_combined_model_of__atc_membrane_dnaexp_membrane_combined_model_of__biocrnpyler_269558 => VirE2_f_biocrnpyler_269558_cell1combined_model_of__combined_model_of__external_reservoir_model_combined_model_of__atc_membrane_dnaexp_membrane_combined_model_of__biocrnpyler_269558; r10_1_biocrnpyler_269558_cell1combined_model_of__combined_model_of__external_reservoir_model_combined_model_of__atc_membrane_dnaexp_membrane_combined_model_of__biocrnpyler_269558_k*VirE2_b_1_combined_cell1combined_model_of__combined_model_of__external_reservoir_model_combined_model_of__atc_membrane_dnaexp_membrane_combined_model_of__biocrnpyler_269558;
    r10_1_biocrnpyler_269558_cell1combined_model_of__combined_model_of__external_reservoir_model_combined_model_of__atc_membrane_dnaexp_membrane_combined_model_of__biocrnpyler_269558_k = 1e-10;
  r12_biocrnpyler_269558_cell1combined_model_of__combined_model_of__external_reservoir_model_combined_model_of__atc_membrane_dnaexp_membrane_combined_model_of__biocrnpyler_269558: rna_g_biocrnpyler_269558_cell1combined_model_of__combined_model_of__external_reservoir_model_combined_model_of__atc_membrane_dnaexp_membrane_combined_model_of__biocrnpyler_269558 => ; r12_biocrnpyler_269558_cell1combined_model_of__combined_model_of__external_reservoir_model_combined_model_of__atc_membrane_dnaexp_membrane_combined_model_of__biocrnpyler_269558_k*rna_g_biocrnpyler_269558_cell1combined_model_of__combined_model_of__external_reservoir_model_combined_model_of__atc_membrane_dnaexp_membrane_combined_model_of__biocrnpyler_269558;
    r12_biocrnpyler_269558_cell1combined_model_of__combined_model_of__external_reservoir_model_combined_model_of__atc_membrane_dnaexp_membrane_combined_model_of__biocrnpyler_269558_k = 0.001;
  r13_biocrnpyler_269558_cell1combined_model_of__combined_model_of__external_reservoir_model_combined_model_of__atc_membrane_dnaexp_membrane_combined_model_of__biocrnpyler_269558: VirE2_f_biocrnpyler_269558_cell1combined_model_of__combined_model_of__external_reservoir_model_combined_model_of__atc_membrane_dnaexp_membrane_combined_model_of__biocrnpyler_269558 => ; r13_biocrnpyler_269558_cell1combined_model_of__combined_model_of__external_reservoir_model_combined_model_of__atc_membrane_dnaexp_membrane_combined_model_of__biocrnpyler_269558_k*VirE2_f_biocrnpyler_269558_cell1combined_model_of__combined_model_of__external_reservoir_model_combined_model_of__atc_membrane_dnaexp_membrane_combined_model_of__biocrnpyler_269558;
    r13_biocrnpyler_269558_cell1combined_model_of__combined_model_of__external_reservoir_model_combined_model_of__atc_membrane_dnaexp_membrane_combined_model_of__biocrnpyler_269558_k = 1e-5;

  // Unit definitions:
  unit square_metre = metre^2;
  unit per_second = 1 / second;
  unit substance = dimensionless;
end
