// SBML level 3 version 2

model combined_model_of__combined_model_of__external_reservoir_model_combined_model_of__atc_membrane2_combined_model_of__biocrnpyler_77342()
  // model units - substance: mole, time: second, volume: litre, area: square_metre, length: metre, extent: mole

  // Compartments:
  compartment cell_external_cell2combined_model_of__combined_model_of__external_reservoir_model_combined_model_of__atc_membrane2_combined_model_of__biocrnpyler_77342 = 2e-6 litre;
  compartment cell_2_internal_combined_cell2combined_model_of__combined_model_of__external_reservoir_model_combined_model_of__atc_membrane2_combined_model_of__biocrnpyler_77342 = 0.0001 litre;

  // Species:
  species atc_e_external_reservoir_model_1_combined_cell2combined_model_of__combined_model_of__external_reservoir_model_combined_model_of__atc_membrane2_combined_model_of__biocrnpyler_77342 in cell_external_cell2combined_model_of__combined_model_of__external_reservoir_model_combined_model_of__atc_membrane2_combined_model_of__biocrnpyler_77342 = 0;
  species ssDNA_comp1_cell2combined_model_of__combined_model_of__external_reservoir_model_combined_model_of__atc_membrane2_combined_model_of__biocrnpyler_77342 in cell_2_internal_combined_cell2combined_model_of__combined_model_of__external_reservoir_model_combined_model_of__atc_membrane2_combined_model_of__biocrnpyler_77342 = 0;
  species dna_f_biocrnpyler_77342_cell2combined_model_of__combined_model_of__external_reservoir_model_combined_model_of__atc_membrane2_combined_model_of__biocrnpyler_77342 in cell_2_internal_combined_cell2combined_model_of__combined_model_of__external_reservoir_model_combined_model_of__atc_membrane2_combined_model_of__biocrnpyler_77342 = 0;
  species tetR_biocrnpyler_77342_cell2combined_model_of__combined_model_of__external_reservoir_model_combined_model_of__atc_membrane2_combined_model_of__biocrnpyler_77342 in cell_2_internal_combined_cell2combined_model_of__combined_model_of__external_reservoir_model_combined_model_of__atc_membrane2_combined_model_of__biocrnpyler_77342 = 0;
  species rna_f_biocrnpyler_77342_cell2combined_model_of__combined_model_of__external_reservoir_model_combined_model_of__atc_membrane2_combined_model_of__biocrnpyler_77342 in cell_2_internal_combined_cell2combined_model_of__combined_model_of__external_reservoir_model_combined_model_of__atc_membrane2_combined_model_of__biocrnpyler_77342 = 0;
  species exsA_biocrnpyler_77342_cell2combined_model_of__combined_model_of__external_reservoir_model_combined_model_of__atc_membrane2_combined_model_of__biocrnpyler_77342 in cell_2_internal_combined_cell2combined_model_of__combined_model_of__external_reservoir_model_combined_model_of__atc_membrane2_combined_model_of__biocrnpyler_77342 = 0;
  species ATP_biocrnpyler_77342_cell2combined_model_of__combined_model_of__external_reservoir_model_combined_model_of__atc_membrane2_combined_model_of__biocrnpyler_77342 in cell_2_internal_combined_cell2combined_model_of__combined_model_of__external_reservoir_model_combined_model_of__atc_membrane2_combined_model_of__biocrnpyler_77342 = 0;
  species ADP_biocrnpyler_77342_cell2combined_model_of__combined_model_of__external_reservoir_model_combined_model_of__atc_membrane2_combined_model_of__biocrnpyler_77342 in cell_2_internal_combined_cell2combined_model_of__combined_model_of__external_reservoir_model_combined_model_of__atc_membrane2_combined_model_of__biocrnpyler_77342 = 0;
  species atc_i_1_combined_cell2combined_model_of__combined_model_of__external_reservoir_model_combined_model_of__atc_membrane2_combined_model_of__biocrnpyler_77342 in cell_2_internal_combined_cell2combined_model_of__combined_model_of__external_reservoir_model_combined_model_of__atc_membrane2_combined_model_of__biocrnpyler_77342 = 0; atc_i_1_combined_cell2combined_model_of__combined_model_of__external_reservoir_model_combined_model_of__atc_membrane2_combined_model_of__biocrnpyler_77342 is "atc_i_cell2";
  species complex_atc_i_tetR_biocrnpyler_77342_cell2combined_model_of__combined_model_of__external_reservoir_model_combined_model_of__atc_membrane2_combined_model_of__biocrnpyler_77342 in cell_2_internal_combined_cell2combined_model_of__combined_model_of__external_reservoir_model_combined_model_of__atc_membrane2_combined_model_of__biocrnpyler_77342 = 0;
  species complex_dna_f_tetR_biocrnpyler_77342_cell2combined_model_of__combined_model_of__external_reservoir_model_combined_model_of__atc_membrane2_combined_model_of__biocrnpyler_77342 in cell_2_internal_combined_cell2combined_model_of__combined_model_of__external_reservoir_model_combined_model_of__atc_membrane2_combined_model_of__biocrnpyler_77342 = 0;
  species complex_atc_i_dna_f_tetR_biocrnpyler_77342_cell2combined_model_of__combined_model_of__external_reservoir_model_combined_model_of__atc_membrane2_combined_model_of__biocrnpyler_77342 in cell_2_internal_combined_cell2combined_model_of__combined_model_of__external_reservoir_model_combined_model_of__atc_membrane2_combined_model_of__biocrnpyler_77342 = 0;
  species P_biocrnpyler_77342_cell2combined_model_of__combined_model_of__external_reservoir_model_combined_model_of__atc_membrane2_combined_model_of__biocrnpyler_77342 in cell_2_internal_combined_cell2combined_model_of__combined_model_of__external_reservoir_model_combined_model_of__atc_membrane2_combined_model_of__biocrnpyler_77342 = 0;

  // Parameters:
  kb_cell2combined_model_of__combined_model_of__external_reservoir_model_combined_model_of__atc_membrane2_combined_model_of__biocrnpyler_77342 = 0.002 per_second;
  kd_cell2combined_model_of__combined_model_of__external_reservoir_model_combined_model_of__atc_membrane2_combined_model_of__biocrnpyler_77342 = 1e-5 per_second;

  // Reactions:
  r1_cell2_cell2combined_model_of__combined_model_of__external_reservoir_model_combined_model_of__atc_membrane2_combined_model_of__biocrnpyler_77342: atc_e_external_reservoir_model_1_combined_cell2combined_model_of__combined_model_of__external_reservoir_model_combined_model_of__atc_membrane2_combined_model_of__biocrnpyler_77342 -> atc_i_1_combined_cell2combined_model_of__combined_model_of__external_reservoir_model_combined_model_of__atc_membrane2_combined_model_of__biocrnpyler_77342; kb_cell2combined_model_of__combined_model_of__external_reservoir_model_combined_model_of__atc_membrane2_combined_model_of__biocrnpyler_77342*atc_e_external_reservoir_model_1_combined_cell2combined_model_of__combined_model_of__external_reservoir_model_combined_model_of__atc_membrane2_combined_model_of__biocrnpyler_77342 - kd_cell2combined_model_of__combined_model_of__external_reservoir_model_combined_model_of__atc_membrane2_combined_model_of__biocrnpyler_77342*atc_i_1_combined_cell2combined_model_of__combined_model_of__external_reservoir_model_combined_model_of__atc_membrane2_combined_model_of__biocrnpyler_77342;
  r0_biocrnpyler_77342_cell2combined_model_of__combined_model_of__external_reservoir_model_combined_model_of__atc_membrane2_combined_model_of__biocrnpyler_77342: atc_i_1_combined_cell2combined_model_of__combined_model_of__external_reservoir_model_combined_model_of__atc_membrane2_combined_model_of__biocrnpyler_77342 + tetR_biocrnpyler_77342_cell2combined_model_of__combined_model_of__external_reservoir_model_combined_model_of__atc_membrane2_combined_model_of__biocrnpyler_77342 => complex_atc_i_tetR_biocrnpyler_77342_cell2combined_model_of__combined_model_of__external_reservoir_model_combined_model_of__atc_membrane2_combined_model_of__biocrnpyler_77342; r0_biocrnpyler_77342_cell2combined_model_of__combined_model_of__external_reservoir_model_combined_model_of__atc_membrane2_combined_model_of__biocrnpyler_77342_k*atc_i_1_combined_cell2combined_model_of__combined_model_of__external_reservoir_model_combined_model_of__atc_membrane2_combined_model_of__biocrnpyler_77342*tetR_biocrnpyler_77342_cell2combined_model_of__combined_model_of__external_reservoir_model_combined_model_of__atc_membrane2_combined_model_of__biocrnpyler_77342; r0_biocrnpyler_77342_cell2combined_model_of__combined_model_of__external_reservoir_model_combined_model_of__atc_membrane2_combined_model_of__biocrnpyler_77342 is "r0cell2";
    r0_biocrnpyler_77342_cell2combined_model_of__combined_model_of__external_reservoir_model_combined_model_of__atc_membrane2_combined_model_of__biocrnpyler_77342_k = 2e-5;
  r0_1_biocrnpyler_77342_cell2combined_model_of__combined_model_of__external_reservoir_model_combined_model_of__atc_membrane2_combined_model_of__biocrnpyler_77342: complex_atc_i_tetR_biocrnpyler_77342_cell2combined_model_of__combined_model_of__external_reservoir_model_combined_model_of__atc_membrane2_combined_model_of__biocrnpyler_77342 => atc_i_1_combined_cell2combined_model_of__combined_model_of__external_reservoir_model_combined_model_of__atc_membrane2_combined_model_of__biocrnpyler_77342 + tetR_biocrnpyler_77342_cell2combined_model_of__combined_model_of__external_reservoir_model_combined_model_of__atc_membrane2_combined_model_of__biocrnpyler_77342; r0_1_biocrnpyler_77342_cell2combined_model_of__combined_model_of__external_reservoir_model_combined_model_of__atc_membrane2_combined_model_of__biocrnpyler_77342_k*complex_atc_i_tetR_biocrnpyler_77342_cell2combined_model_of__combined_model_of__external_reservoir_model_combined_model_of__atc_membrane2_combined_model_of__biocrnpyler_77342; r0_1_biocrnpyler_77342_cell2combined_model_of__combined_model_of__external_reservoir_model_combined_model_of__atc_membrane2_combined_model_of__biocrnpyler_77342 is "r0_1cell2";
    r0_1_biocrnpyler_77342_cell2combined_model_of__combined_model_of__external_reservoir_model_combined_model_of__atc_membrane2_combined_model_of__biocrnpyler_77342_k = 2e-9;
  r2_biocrnpyler_77342_cell2combined_model_of__combined_model_of__external_reservoir_model_combined_model_of__atc_membrane2_combined_model_of__biocrnpyler_77342: dna_f_biocrnpyler_77342_cell2combined_model_of__combined_model_of__external_reservoir_model_combined_model_of__atc_membrane2_combined_model_of__biocrnpyler_77342 + tetR_biocrnpyler_77342_cell2combined_model_of__combined_model_of__external_reservoir_model_combined_model_of__atc_membrane2_combined_model_of__biocrnpyler_77342 => complex_dna_f_tetR_biocrnpyler_77342_cell2combined_model_of__combined_model_of__external_reservoir_model_combined_model_of__atc_membrane2_combined_model_of__biocrnpyler_77342; r2_biocrnpyler_77342_cell2combined_model_of__combined_model_of__external_reservoir_model_combined_model_of__atc_membrane2_combined_model_of__biocrnpyler_77342_k*dna_f_biocrnpyler_77342_cell2combined_model_of__combined_model_of__external_reservoir_model_combined_model_of__atc_membrane2_combined_model_of__biocrnpyler_77342*tetR_biocrnpyler_77342_cell2combined_model_of__combined_model_of__external_reservoir_model_combined_model_of__atc_membrane2_combined_model_of__biocrnpyler_77342;
    r2_biocrnpyler_77342_cell2combined_model_of__combined_model_of__external_reservoir_model_combined_model_of__atc_membrane2_combined_model_of__biocrnpyler_77342_k = 4e-7;
  r2_1_biocrnpyler_77342_cell2combined_model_of__combined_model_of__external_reservoir_model_combined_model_of__atc_membrane2_combined_model_of__biocrnpyler_77342: complex_dna_f_tetR_biocrnpyler_77342_cell2combined_model_of__combined_model_of__external_reservoir_model_combined_model_of__atc_membrane2_combined_model_of__biocrnpyler_77342 => dna_f_biocrnpyler_77342_cell2combined_model_of__combined_model_of__external_reservoir_model_combined_model_of__atc_membrane2_combined_model_of__biocrnpyler_77342 + tetR_biocrnpyler_77342_cell2combined_model_of__combined_model_of__external_reservoir_model_combined_model_of__atc_membrane2_combined_model_of__biocrnpyler_77342; r2_1_biocrnpyler_77342_cell2combined_model_of__combined_model_of__external_reservoir_model_combined_model_of__atc_membrane2_combined_model_of__biocrnpyler_77342_k*complex_dna_f_tetR_biocrnpyler_77342_cell2combined_model_of__combined_model_of__external_reservoir_model_combined_model_of__atc_membrane2_combined_model_of__biocrnpyler_77342;
    r2_1_biocrnpyler_77342_cell2combined_model_of__combined_model_of__external_reservoir_model_combined_model_of__atc_membrane2_combined_model_of__biocrnpyler_77342_k = 1e-12;
  r4_biocrnpyler_77342_cell2combined_model_of__combined_model_of__external_reservoir_model_combined_model_of__atc_membrane2_combined_model_of__biocrnpyler_77342: complex_dna_f_tetR_biocrnpyler_77342_cell2combined_model_of__combined_model_of__external_reservoir_model_combined_model_of__atc_membrane2_combined_model_of__biocrnpyler_77342 + atc_i_1_combined_cell2combined_model_of__combined_model_of__external_reservoir_model_combined_model_of__atc_membrane2_combined_model_of__biocrnpyler_77342 => complex_atc_i_dna_f_tetR_biocrnpyler_77342_cell2combined_model_of__combined_model_of__external_reservoir_model_combined_model_of__atc_membrane2_combined_model_of__biocrnpyler_77342; r4_biocrnpyler_77342_cell2combined_model_of__combined_model_of__external_reservoir_model_combined_model_of__atc_membrane2_combined_model_of__biocrnpyler_77342_k*complex_dna_f_tetR_biocrnpyler_77342_cell2combined_model_of__combined_model_of__external_reservoir_model_combined_model_of__atc_membrane2_combined_model_of__biocrnpyler_77342*atc_i_1_combined_cell2combined_model_of__combined_model_of__external_reservoir_model_combined_model_of__atc_membrane2_combined_model_of__biocrnpyler_77342;
    r4_biocrnpyler_77342_cell2combined_model_of__combined_model_of__external_reservoir_model_combined_model_of__atc_membrane2_combined_model_of__biocrnpyler_77342_k = 6e-8;
  r4_1_biocrnpyler_77342_cell2combined_model_of__combined_model_of__external_reservoir_model_combined_model_of__atc_membrane2_combined_model_of__biocrnpyler_77342: complex_atc_i_dna_f_tetR_biocrnpyler_77342_cell2combined_model_of__combined_model_of__external_reservoir_model_combined_model_of__atc_membrane2_combined_model_of__biocrnpyler_77342 => complex_dna_f_tetR_biocrnpyler_77342_cell2combined_model_of__combined_model_of__external_reservoir_model_combined_model_of__atc_membrane2_combined_model_of__biocrnpyler_77342 + atc_i_1_combined_cell2combined_model_of__combined_model_of__external_reservoir_model_combined_model_of__atc_membrane2_combined_model_of__biocrnpyler_77342; r4_1_biocrnpyler_77342_cell2combined_model_of__combined_model_of__external_reservoir_model_combined_model_of__atc_membrane2_combined_model_of__biocrnpyler_77342_k*complex_atc_i_dna_f_tetR_biocrnpyler_77342_cell2combined_model_of__combined_model_of__external_reservoir_model_combined_model_of__atc_membrane2_combined_model_of__biocrnpyler_77342;
    r4_1_biocrnpyler_77342_cell2combined_model_of__combined_model_of__external_reservoir_model_combined_model_of__atc_membrane2_combined_model_of__biocrnpyler_77342_k = 3e-9;
  r6_biocrnpyler_77342_cell2combined_model_of__combined_model_of__external_reservoir_model_combined_model_of__atc_membrane2_combined_model_of__biocrnpyler_77342: complex_atc_i_dna_f_tetR_biocrnpyler_77342_cell2combined_model_of__combined_model_of__external_reservoir_model_combined_model_of__atc_membrane2_combined_model_of__biocrnpyler_77342 => dna_f_biocrnpyler_77342_cell2combined_model_of__combined_model_of__external_reservoir_model_combined_model_of__atc_membrane2_combined_model_of__biocrnpyler_77342 + complex_atc_i_tetR_biocrnpyler_77342_cell2combined_model_of__combined_model_of__external_reservoir_model_combined_model_of__atc_membrane2_combined_model_of__biocrnpyler_77342; r6_biocrnpyler_77342_cell2combined_model_of__combined_model_of__external_reservoir_model_combined_model_of__atc_membrane2_combined_model_of__biocrnpyler_77342_k*complex_atc_i_dna_f_tetR_biocrnpyler_77342_cell2combined_model_of__combined_model_of__external_reservoir_model_combined_model_of__atc_membrane2_combined_model_of__biocrnpyler_77342;
    r6_biocrnpyler_77342_cell2combined_model_of__combined_model_of__external_reservoir_model_combined_model_of__atc_membrane2_combined_model_of__biocrnpyler_77342_k = 5e-5;
  r6_1_biocrnpyler_77342_cell2combined_model_of__combined_model_of__external_reservoir_model_combined_model_of__atc_membrane2_combined_model_of__biocrnpyler_77342: dna_f_biocrnpyler_77342_cell2combined_model_of__combined_model_of__external_reservoir_model_combined_model_of__atc_membrane2_combined_model_of__biocrnpyler_77342 + complex_atc_i_tetR_biocrnpyler_77342_cell2combined_model_of__combined_model_of__external_reservoir_model_combined_model_of__atc_membrane2_combined_model_of__biocrnpyler_77342 => complex_atc_i_dna_f_tetR_biocrnpyler_77342_cell2combined_model_of__combined_model_of__external_reservoir_model_combined_model_of__atc_membrane2_combined_model_of__biocrnpyler_77342; r6_1_biocrnpyler_77342_cell2combined_model_of__combined_model_of__external_reservoir_model_combined_model_of__atc_membrane2_combined_model_of__biocrnpyler_77342_k*dna_f_biocrnpyler_77342_cell2combined_model_of__combined_model_of__external_reservoir_model_combined_model_of__atc_membrane2_combined_model_of__biocrnpyler_77342*complex_atc_i_tetR_biocrnpyler_77342_cell2combined_model_of__combined_model_of__external_reservoir_model_combined_model_of__atc_membrane2_combined_model_of__biocrnpyler_77342;
    r6_1_biocrnpyler_77342_cell2combined_model_of__combined_model_of__external_reservoir_model_combined_model_of__atc_membrane2_combined_model_of__biocrnpyler_77342_k = 1e-10;
  r8_biocrnpyler_77342_cell2combined_model_of__combined_model_of__external_reservoir_model_combined_model_of__atc_membrane2_combined_model_of__biocrnpyler_77342: dna_f_biocrnpyler_77342_cell2combined_model_of__combined_model_of__external_reservoir_model_combined_model_of__atc_membrane2_combined_model_of__biocrnpyler_77342 => dna_f_biocrnpyler_77342_cell2combined_model_of__combined_model_of__external_reservoir_model_combined_model_of__atc_membrane2_combined_model_of__biocrnpyler_77342 + rna_f_biocrnpyler_77342_cell2combined_model_of__combined_model_of__external_reservoir_model_combined_model_of__atc_membrane2_combined_model_of__biocrnpyler_77342; r8_biocrnpyler_77342_cell2combined_model_of__combined_model_of__external_reservoir_model_combined_model_of__atc_membrane2_combined_model_of__biocrnpyler_77342_k*dna_f_biocrnpyler_77342_cell2combined_model_of__combined_model_of__external_reservoir_model_combined_model_of__atc_membrane2_combined_model_of__biocrnpyler_77342;
    r8_biocrnpyler_77342_cell2combined_model_of__combined_model_of__external_reservoir_model_combined_model_of__atc_membrane2_combined_model_of__biocrnpyler_77342_k = 0.001875;
  r9_biocrnpyler_77342_cell2combined_model_of__combined_model_of__external_reservoir_model_combined_model_of__atc_membrane2_combined_model_of__biocrnpyler_77342: rna_f_biocrnpyler_77342_cell2combined_model_of__combined_model_of__external_reservoir_model_combined_model_of__atc_membrane2_combined_model_of__biocrnpyler_77342 + ATP_biocrnpyler_77342_cell2combined_model_of__combined_model_of__external_reservoir_model_combined_model_of__atc_membrane2_combined_model_of__biocrnpyler_77342 => rna_f_biocrnpyler_77342_cell2combined_model_of__combined_model_of__external_reservoir_model_combined_model_of__atc_membrane2_combined_model_of__biocrnpyler_77342 + ADP_biocrnpyler_77342_cell2combined_model_of__combined_model_of__external_reservoir_model_combined_model_of__atc_membrane2_combined_model_of__biocrnpyler_77342 + exsA_biocrnpyler_77342_cell2combined_model_of__combined_model_of__external_reservoir_model_combined_model_of__atc_membrane2_combined_model_of__biocrnpyler_77342 + P_biocrnpyler_77342_cell2combined_model_of__combined_model_of__external_reservoir_model_combined_model_of__atc_membrane2_combined_model_of__biocrnpyler_77342; r9_biocrnpyler_77342_cell2combined_model_of__combined_model_of__external_reservoir_model_combined_model_of__atc_membrane2_combined_model_of__biocrnpyler_77342_k*rna_f_biocrnpyler_77342_cell2combined_model_of__combined_model_of__external_reservoir_model_combined_model_of__atc_membrane2_combined_model_of__biocrnpyler_77342*ATP_biocrnpyler_77342_cell2combined_model_of__combined_model_of__external_reservoir_model_combined_model_of__atc_membrane2_combined_model_of__biocrnpyler_77342^n/(ATP_biocrnpyler_77342_cell2combined_model_of__combined_model_of__external_reservoir_model_combined_model_of__atc_membrane2_combined_model_of__biocrnpyler_77342^n + K);
    r9_biocrnpyler_77342_cell2combined_model_of__combined_model_of__external_reservoir_model_combined_model_of__atc_membrane2_combined_model_of__biocrnpyler_77342_k = 0.0005; n = 1; K = 1;
  r10_biocrnpyler_77342_cell2combined_model_of__combined_model_of__external_reservoir_model_combined_model_of__atc_membrane2_combined_model_of__biocrnpyler_77342: rna_f_biocrnpyler_77342_cell2combined_model_of__combined_model_of__external_reservoir_model_combined_model_of__atc_membrane2_combined_model_of__biocrnpyler_77342 => ; r10_biocrnpyler_77342_cell2combined_model_of__combined_model_of__external_reservoir_model_combined_model_of__atc_membrane2_combined_model_of__biocrnpyler_77342_k*rna_f_biocrnpyler_77342_cell2combined_model_of__combined_model_of__external_reservoir_model_combined_model_of__atc_membrane2_combined_model_of__biocrnpyler_77342;
    r10_biocrnpyler_77342_cell2combined_model_of__combined_model_of__external_reservoir_model_combined_model_of__atc_membrane2_combined_model_of__biocrnpyler_77342_k = 0.001;

  // Unit definitions:
  unit square_metre = metre^2;
  unit per_second = 1 / second;
  unit substance = dimensionless;
end
