// SBML level 3 version 2

model combined_model_of__external_reservoir_model_biocrnpyler_609105()
  // model units - substance: mole, time: second, volume: litre, area: square_metre, length: metre, extent: mole

  // Compartments:
  compartment external_reservoir_external_reservoir_model = 2e-6 litre;
  compartment default_biocrnpyler_609105 = 1e-6;

  // Species:
  species atc_e_external_reservoir_model in external_reservoir_external_reservoir_model = 0;
  species ssDNA_e_biocrnpyler_609105 in default_biocrnpyler_609105 = 0;
  species ssDNA_comp1_biocrnpyler_609105 in default_biocrnpyler_609105 = 0;
  species ssDNA_comp2_biocrnpyler_609105 in default_biocrnpyler_609105 = 0;
  species dsDNA_biocrnpyler_609105 in default_biocrnpyler_609105 = 0;

  // Reactions:
  r0_biocrnpyler_609105: ssDNA_e_biocrnpyler_609105 + ssDNA_comp1_biocrnpyler_609105 + ssDNA_comp2_biocrnpyler_609105 => dsDNA_biocrnpyler_609105; k*ssDNA_e_biocrnpyler_609105*ssDNA_comp1_biocrnpyler_609105*ssDNA_comp2_biocrnpyler_609105;
    k = 1;

  // Unit definitions:
  unit square_metre = metre^2;
  unit per_second = 1 / second;
  unit substance = dimensionless;
end
