// SBML level 3 version 2

model combined_model_of__combined_model_of__external_reservoir_model_combined_model_of__atc_membrane_dnaexp_membrane_combined_model_of__biocrnpyler_605209()
  // model units - substance: mole, time: second, volume: litre, area: square_metre, length: metre, extent: mole

  // Compartments:
  compartment cell_1_internal_combined = 3e-6 litre;
  compartment cell_external = 0.0001 litre;

  // Species:
  species atc_e_external_reservoir_model_1_combined in cell_external = 10000;
  species ssDNA_e in cell_external = 0;
  species ssDNA in cell_1_internal_combined = 50;
  species VirE2_b_ssDNA in cell_1_internal_combined = 0;
  species dna_g_biocrnpyler_605209 in cell_1_internal_combined = 1;
  species tetR_biocrnpyler_605209 in cell_1_internal_combined = 10;
  species rna_g_biocrnpyler_605209 in cell_1_internal_combined = 0;
  species VirE2_f_biocrnpyler_605209 in cell_1_internal_combined = 0;
  species ATP_biocrnpyler_605209 in cell_1_internal_combined = 15;
  species ADP_biocrnpyler_605209 in cell_1_internal_combined = 0;
  species atc_i_1_combined in cell_1_internal_combined = 0;
  species complex_atc_i_tetR_biocrnpyler_605209 in cell_1_internal_combined = 0;
  species VirE2_b_1_combined in cell_1_internal_combined = 0;
  species complex_dna_g_tetR_biocrnpyler_605209 in cell_1_internal_combined = 0;
  species complex_atc_i_dna_g_tetR_biocrnpyler_605209 in cell_1_internal_combined = 0;
  species P_biocrnpyler_605209 in cell_1_internal_combined = 0;

  // Parameters:
  kb = 0.002 per_second;
  kd = 1e-5 per_second;
  kb1 = 0.004 per_second;
  kd1 = 1e-5 per_second;
  kd2 = 0.0025 per_second;

  // Reactions:
  r1_cell1: atc_e_external_reservoir_model_1_combined -> atc_i_1_combined; kb*atc_e_external_reservoir_model_1_combined - kd*atc_i_1_combined;
  R1: VirE2_b_1_combined + ssDNA -> VirE2_b_ssDNA; kb1*VirE2_b_1_combined*ssDNA - kd1*VirE2_b_ssDNA;
  R2: VirE2_b_ssDNA => ssDNA_e + VirE2_b_1_combined; kd2*VirE2_b_ssDNA;
  r0_biocrnpyler_605209: atc_i_1_combined + tetR_biocrnpyler_605209 => complex_atc_i_tetR_biocrnpyler_605209; r0_biocrnpyler_605209_k*atc_i_1_combined*tetR_biocrnpyler_605209;
    r0_biocrnpyler_605209_k = 0.0002;
  r0_1_biocrnpyler_605209: complex_atc_i_tetR_biocrnpyler_605209 => atc_i_1_combined + tetR_biocrnpyler_605209; r0_1_biocrnpyler_605209_k*complex_atc_i_tetR_biocrnpyler_605209;
    r0_1_biocrnpyler_605209_k = 2e-9;
  r2_biocrnpyler_605209: dna_g_biocrnpyler_605209 + tetR_biocrnpyler_605209 => complex_dna_g_tetR_biocrnpyler_605209; r2_biocrnpyler_605209_k*dna_g_biocrnpyler_605209*tetR_biocrnpyler_605209;
    r2_biocrnpyler_605209_k = 4e-5;
  r2_1_biocrnpyler_605209: complex_dna_g_tetR_biocrnpyler_605209 => dna_g_biocrnpyler_605209 + tetR_biocrnpyler_605209; r2_1_biocrnpyler_605209_k*complex_dna_g_tetR_biocrnpyler_605209;
    r2_1_biocrnpyler_605209_k = 1e-12;
  r4_biocrnpyler_605209: complex_dna_g_tetR_biocrnpyler_605209 + atc_i_1_combined => complex_atc_i_dna_g_tetR_biocrnpyler_605209; r4_biocrnpyler_605209_k*complex_dna_g_tetR_biocrnpyler_605209*atc_i_1_combined;
    r4_biocrnpyler_605209_k = 6e-6;
  r4_1_biocrnpyler_605209: complex_atc_i_dna_g_tetR_biocrnpyler_605209 => complex_dna_g_tetR_biocrnpyler_605209 + atc_i_1_combined; r4_1_biocrnpyler_605209_k*complex_atc_i_dna_g_tetR_biocrnpyler_605209;
    r4_1_biocrnpyler_605209_k = 3e-9;
  r6_biocrnpyler_605209: complex_atc_i_dna_g_tetR_biocrnpyler_605209 => dna_g_biocrnpyler_605209 + complex_atc_i_tetR_biocrnpyler_605209; r6_biocrnpyler_605209_k*complex_atc_i_dna_g_tetR_biocrnpyler_605209;
    r6_biocrnpyler_605209_k = 0.005;
  r6_1_biocrnpyler_605209: dna_g_biocrnpyler_605209 + complex_atc_i_tetR_biocrnpyler_605209 => complex_atc_i_dna_g_tetR_biocrnpyler_605209; r6_1_biocrnpyler_605209_k*dna_g_biocrnpyler_605209*complex_atc_i_tetR_biocrnpyler_605209;
    r6_1_biocrnpyler_605209_k = 1e-10;
  r8_biocrnpyler_605209: dna_g_biocrnpyler_605209 => dna_g_biocrnpyler_605209 + rna_g_biocrnpyler_605209; r8_biocrnpyler_605209_k*dna_g_biocrnpyler_605209;
    r8_biocrnpyler_605209_k = 0.0031875;
  r9_biocrnpyler_605209: rna_g_biocrnpyler_605209 + ATP_biocrnpyler_605209 => rna_g_biocrnpyler_605209 + ADP_biocrnpyler_605209 + VirE2_f_biocrnpyler_605209 + P_biocrnpyler_605209; r9_biocrnpyler_605209_k*rna_g_biocrnpyler_605209*ATP_biocrnpyler_605209^n/(ATP_biocrnpyler_605209^n + K);
    r9_biocrnpyler_605209_k = 0.001; n = 1; K = 1;
  r10_biocrnpyler_605209: VirE2_f_biocrnpyler_605209 => VirE2_b_1_combined; r10_biocrnpyler_605209_k*VirE2_f_biocrnpyler_605209;
    r10_biocrnpyler_605209_k = 5e-5;
  r10_1_biocrnpyler_605209: VirE2_b_1_combined => VirE2_f_biocrnpyler_605209; r10_1_biocrnpyler_605209_k*VirE2_b_1_combined;
    r10_1_biocrnpyler_605209_k = 1e-10;
  r12_biocrnpyler_605209: rna_g_biocrnpyler_605209 => ; r12_biocrnpyler_605209_k*rna_g_biocrnpyler_605209;
    r12_biocrnpyler_605209_k = 0.001;
  r13_biocrnpyler_605209: VirE2_f_biocrnpyler_605209 => ; r13_biocrnpyler_605209_k*VirE2_f_biocrnpyler_605209;
    r13_biocrnpyler_605209_k = 1e-5;

  // Unit definitions:
  unit square_metre = metre^2;
  unit per_second = 1 / second;
  unit substance = dimensionless;
end
