// SBML level 3 version 2

model combined_model_of__combined_model_of__external_reservoir_model_combined_model_of__atc_membrane2_combined_model_of__biocrnpyler_844781()
  // model units - substance: mole, time: second, volume: litre, area: square_metre, length: metre, extent: mole

  // Compartments:
  compartment cell_external = 0.0001 litre;
  compartment cell_2_internal_combined = 1e-10 litre;

  // Species:
  species atc_e_external_reservoir_model_1_combined in cell_external = 10000;
  species ssDNA_comp1 in cell_2_internal_combined = 10;
  species dna_f_biocrnpyler_844781 in cell_2_internal_combined = 1;
  species tetR_biocrnpyler_844781 in cell_2_internal_combined = 10;
  species rna_f_biocrnpyler_844781 in cell_2_internal_combined = 0;
  species exsA_biocrnpyler_844781 in cell_2_internal_combined = 0;
  species ATP_biocrnpyler_844781 in cell_2_internal_combined = 10;
  species ADP_biocrnpyler_844781 in cell_2_internal_combined = 0;
  species atc_i_cell2_1_combined in cell_2_internal_combined = 0;
  species complex_atc_i_cell2_tetR_biocrnpyler_844781 in cell_2_internal_combined = 0;
  species complex_dna_f_tetR_biocrnpyler_844781 in cell_2_internal_combined = 0;
  species complex_atc_i_cell2_dna_f_tetR_biocrnpyler_844781 in cell_2_internal_combined = 0;
  species P_biocrnpyler_844781 in cell_2_internal_combined = 0;

  // Parameters:
  kb = 0.002 per_second;
  kd = 1e-5 per_second;

  // Reactions:
  r1_cell2: atc_e_external_reservoir_model_1_combined -> atc_i_cell2_1_combined; kb*atc_e_external_reservoir_model_1_combined - kd*atc_i_cell2_1_combined;
  r0_biocrnpyler_844781: atc_i_cell2_1_combined + tetR_biocrnpyler_844781 => complex_atc_i_cell2_tetR_biocrnpyler_844781; r0_biocrnpyler_844781_k*atc_i_cell2_1_combined*tetR_biocrnpyler_844781; r0_biocrnpyler_844781 is "r0cell2";
    r0_biocrnpyler_844781_k = 2e-5;
  r0_1_biocrnpyler_844781: complex_atc_i_cell2_tetR_biocrnpyler_844781 => atc_i_cell2_1_combined + tetR_biocrnpyler_844781; r0_1_biocrnpyler_844781_k*complex_atc_i_cell2_tetR_biocrnpyler_844781; r0_1_biocrnpyler_844781 is "r0_1cell2";
    r0_1_biocrnpyler_844781_k = 2e-9;
  r2_biocrnpyler_844781: dna_f_biocrnpyler_844781 + tetR_biocrnpyler_844781 => complex_dna_f_tetR_biocrnpyler_844781; r2_biocrnpyler_844781_k*dna_f_biocrnpyler_844781*tetR_biocrnpyler_844781;
    r2_biocrnpyler_844781_k = 4e-7;
  r2_1_biocrnpyler_844781: complex_dna_f_tetR_biocrnpyler_844781 => dna_f_biocrnpyler_844781 + tetR_biocrnpyler_844781; r2_1_biocrnpyler_844781_k*complex_dna_f_tetR_biocrnpyler_844781;
    r2_1_biocrnpyler_844781_k = 1e-12;
  r4_biocrnpyler_844781: complex_dna_f_tetR_biocrnpyler_844781 + atc_i_cell2_1_combined => complex_atc_i_cell2_dna_f_tetR_biocrnpyler_844781; r4_biocrnpyler_844781_k*complex_dna_f_tetR_biocrnpyler_844781*atc_i_cell2_1_combined;
    r4_biocrnpyler_844781_k = 6e-8;
  r4_1_biocrnpyler_844781: complex_atc_i_cell2_dna_f_tetR_biocrnpyler_844781 => complex_dna_f_tetR_biocrnpyler_844781 + atc_i_cell2_1_combined; r4_1_biocrnpyler_844781_k*complex_atc_i_cell2_dna_f_tetR_biocrnpyler_844781;
    r4_1_biocrnpyler_844781_k = 3e-9;
  r6_biocrnpyler_844781: complex_atc_i_cell2_dna_f_tetR_biocrnpyler_844781 => dna_f_biocrnpyler_844781 + complex_atc_i_cell2_tetR_biocrnpyler_844781; r6_biocrnpyler_844781_k*complex_atc_i_cell2_dna_f_tetR_biocrnpyler_844781;
    r6_biocrnpyler_844781_k = 5e-5;
  r6_1_biocrnpyler_844781: dna_f_biocrnpyler_844781 + complex_atc_i_cell2_tetR_biocrnpyler_844781 => complex_atc_i_cell2_dna_f_tetR_biocrnpyler_844781; r6_1_biocrnpyler_844781_k*dna_f_biocrnpyler_844781*complex_atc_i_cell2_tetR_biocrnpyler_844781;
    r6_1_biocrnpyler_844781_k = 1e-10;
  r8_biocrnpyler_844781: dna_f_biocrnpyler_844781 => dna_f_biocrnpyler_844781 + rna_f_biocrnpyler_844781; r8_biocrnpyler_844781_k*dna_f_biocrnpyler_844781;
    r8_biocrnpyler_844781_k = 0.001875;
  r9_biocrnpyler_844781: rna_f_biocrnpyler_844781 + ATP_biocrnpyler_844781 => rna_f_biocrnpyler_844781 + ADP_biocrnpyler_844781 + exsA_biocrnpyler_844781 + P_biocrnpyler_844781; r9_biocrnpyler_844781_k*rna_f_biocrnpyler_844781*ATP_biocrnpyler_844781^n/(ATP_biocrnpyler_844781^n + K);
    r9_biocrnpyler_844781_k = 0.0005; n = 1; K = 1;
  r10_biocrnpyler_844781: rna_f_biocrnpyler_844781 => ; r10_biocrnpyler_844781_k*rna_f_biocrnpyler_844781;
    r10_biocrnpyler_844781_k = 0.001;

  // Unit definitions:
  unit square_metre = metre^2;
  unit per_second = 1 / second;
  unit substance = dimensionless;
end
