// SBML level 3 version 2

model combined_model_of__combined_model_of__external_reservoir_model_combined_model_of__atc_membrane3_combined_model_of__biocrnpyler_864602()
  // model units - substance: mole, time: second, volume: litre, area: square_metre, length: metre, extent: mole

  // Compartments:
  compartment cell_external = 0.0001 litre;
  compartment cell_3_internal_combined = 1e-10 litre;

  // Species:
  species atc_e_external_reservoir_model_1_combined in cell_external = 10000;
  species atc_i_cell3 in cell_3_internal_combined = 0;
  species ssDNA_comp2 in cell_3_internal_combined = 10;
  species dna_h_biocrnpyler_864602 in cell_3_internal_combined = 1;
  species rna_h_biocrnpyler_864602 in cell_3_internal_combined = 0;
  species exsA_biocrnpyler_864602 in cell_3_internal_combined = 0;
  species ATP_biocrnpyler_864602 in cell_3_internal_combined = 15;
  species ADP_biocrnpyler_864602 in cell_3_internal_combined = 0;
  species P_biocrnpyler_864602 in cell_3_internal_combined = 0;
  species complex_dna_h_exsA_biocrnpyler_864602 in cell_3_internal_combined = 0;
  species gfp_biocrnpyler_864602 in cell_3_internal_combined = 0;

  // Parameters:
  kb = 0.002 per_second;
  kd = 1e-5 per_second;

  // Reactions:
  r1_cell3: atc_e_external_reservoir_model_1_combined -> atc_i_cell3; kb*atc_e_external_reservoir_model_1_combined - kd*atc_i_cell3;
  r0_biocrnpyler_864602: dna_h_biocrnpyler_864602 + exsA_biocrnpyler_864602 => complex_dna_h_exsA_biocrnpyler_864602; r0_biocrnpyler_864602_k*dna_h_biocrnpyler_864602*exsA_biocrnpyler_864602;
    r0_biocrnpyler_864602_k = 4e-5;
  r0_1_biocrnpyler_864602: complex_dna_h_exsA_biocrnpyler_864602 => dna_h_biocrnpyler_864602 + exsA_biocrnpyler_864602; r0_1_biocrnpyler_864602_k*complex_dna_h_exsA_biocrnpyler_864602;
    r0_1_biocrnpyler_864602_k = 1e-12;
  r2_biocrnpyler_864602: complex_dna_h_exsA_biocrnpyler_864602 => complex_dna_h_exsA_biocrnpyler_864602 + rna_h_biocrnpyler_864602; r2_biocrnpyler_864602_k*complex_dna_h_exsA_biocrnpyler_864602;
    r2_biocrnpyler_864602_k = 0.001875;
  r3_biocrnpyler_864602: rna_h_biocrnpyler_864602 + ATP_biocrnpyler_864602 => rna_h_biocrnpyler_864602 + ADP_biocrnpyler_864602 + gfp_biocrnpyler_864602 + P_biocrnpyler_864602; r3_biocrnpyler_864602_k*rna_h_biocrnpyler_864602*ATP_biocrnpyler_864602^n/(ATP_biocrnpyler_864602^n + K);
    r3_biocrnpyler_864602_k = 0.0005; n = 1; K = 1;
  r4_biocrnpyler_864602: rna_h_biocrnpyler_864602 => ; r4_biocrnpyler_864602_k*rna_h_biocrnpyler_864602;
    r4_biocrnpyler_864602_k = 0.001;

  // Unit definitions:
  unit square_metre = metre^2;
  unit per_second = 1 / second;
  unit substance = dimensionless;
end
