// SBML level 3 version 2

model combined_model_of__combined_model_of__combined_model_of__external_reservoir_model_combined_model_of__atc_membrane_dnaexp_membrane_combined_model_of__biocrnpyler_906589_combined_model_of__combined_model_of__external_reservoir_model_combined_model_of__atc_membrane2_combined_model_of__biocrnpyler_315933_combined_model_of__combined_model_of__external_reservoir_model_combined_model_of__atc_membrane3_combined_model_of__biocrnpyler_312668()
  // model units - substance: mole, time: second, volume: litre, area: square_metre, length: metre, extent: mole

  // Compartments:
  compartment cell_1_internal_combined = 0.000105 litre;
  compartment cell_external_combined = 0.0001 litre;
  compartment cell_2_internal_combined = 0.0001 litre;
  compartment cell_3_internal_combined = 1e-6 litre;

  // Species:
  species ssDNA_e in cell_external_combined = 0;
  species ssDNA in cell_1_internal_combined = 0;
  species VirE2_b_ssDNA in cell_1_internal_combined = 0;
  species dna_g_biocrnpyler_906589 in cell_1_internal_combined = 0;
  species tetR_biocrnpyler_906589 in cell_1_internal_combined = 0;
  species rna_g_biocrnpyler_906589 in cell_1_internal_combined = 0;
  species VirE2_f_biocrnpyler_906589 in cell_1_internal_combined = 0;
  species ATP_biocrnpyler_906589 in cell_1_internal_combined = 0;
  species ADP_biocrnpyler_906589 in cell_1_internal_combined = 0;
  species atc_i_1_combined in cell_1_internal_combined = 0;
  species complex_atc_i_tetR_biocrnpyler_906589 in cell_1_internal_combined = 0;
  species VirE2_b_1_combined in cell_1_internal_combined = 0;
  species complex_dna_g_tetR_biocrnpyler_906589 in cell_1_internal_combined = 0;
  species complex_atc_i_dna_g_tetR_biocrnpyler_906589 in cell_1_internal_combined = 0;
  species P_biocrnpyler_906589 in cell_1_internal_combined = 0;
  species ssDNA_comp1 in cell_2_internal_combined = 0;
  species dna_f_biocrnpyler_315933 in cell_2_internal_combined = 0;
  species tetR_biocrnpyler_315933 in cell_2_internal_combined = 0;
  species rna_f_biocrnpyler_315933 in cell_2_internal_combined = 0;
  species exsA_biocrnpyler_315933 in cell_2_internal_combined = 0;
  species ATP_biocrnpyler_315933 in cell_2_internal_combined = 0;
  species ADP_biocrnpyler_315933 in cell_2_internal_combined = 0;
  species complex_atc_i_tetR_biocrnpyler_315933 in cell_2_internal_combined = 0;
  species complex_dna_f_tetR_biocrnpyler_315933 in cell_2_internal_combined = 0;
  species complex_atc_i_dna_f_tetR_biocrnpyler_315933 in cell_2_internal_combined = 0;
  species P_biocrnpyler_315933 in cell_2_internal_combined = 0;
  species atc_i in cell_3_internal_combined = 0;
  species ssDNA_comp2 in cell_3_internal_combined = 0;
  species dna_h_biocrnpyler_312668 in cell_3_internal_combined = 0;
  species rna_h_biocrnpyler_312668 in cell_3_internal_combined = 0;
  species exsA_biocrnpyler_312668 in cell_3_internal_combined = 0;
  species ATP_biocrnpyler_312668 in cell_3_internal_combined = 0;
  species ADP_biocrnpyler_312668 in cell_3_internal_combined = 0;
  species P_biocrnpyler_312668 in cell_3_internal_combined = 0;
  species complex_dna_h_exsA_biocrnpyler_312668 in cell_3_internal_combined = 0;
  species gfp_biocrnpyler_312668 in cell_3_internal_combined = 0;
  species atc_e_external_reservoir_model_1_combined_1_combined in cell_external = 0;

  // Parameters:
  kb1 = 0.002 per_second;
  kd1 = 1e-5 per_second;
  kd2 = 0.0002 per_second;
  kb_combined = 0.002 per_second;
  kd_combined = 1e-5 per_second;

  // Reactions:
  r1_cell1_combined: atc_e_external_reservoir_model_1_combined_1_combined -> atc_i_1_combined; kb_combined*atc_e_external_reservoir_model_1_combined_1_combined - kd_combined*atc_i_1_combined;
  R1: VirE2_b_1_combined + ssDNA -> VirE2_b_ssDNA; kb1*VirE2_b_1_combined*ssDNA - kd1*VirE2_b_ssDNA;
  R2: VirE2_b_ssDNA => ssDNA_e + VirE2_b_1_combined; kd2*VirE2_b_ssDNA;
  r0_biocrnpyler_906589: atc_i_1_combined + tetR_biocrnpyler_906589 => complex_atc_i_tetR_biocrnpyler_906589; r0_biocrnpyler_906589_k*atc_i_1_combined*tetR_biocrnpyler_906589;
    r0_biocrnpyler_906589_k = 0.0002;
  r0_1_biocrnpyler_906589: complex_atc_i_tetR_biocrnpyler_906589 => atc_i_1_combined + tetR_biocrnpyler_906589; r0_1_biocrnpyler_906589_k*complex_atc_i_tetR_biocrnpyler_906589;
    r0_1_biocrnpyler_906589_k = 2e-9;
  r2_biocrnpyler_906589: dna_g_biocrnpyler_906589 + tetR_biocrnpyler_906589 => complex_dna_g_tetR_biocrnpyler_906589; r2_biocrnpyler_906589_k*dna_g_biocrnpyler_906589*tetR_biocrnpyler_906589;
    r2_biocrnpyler_906589_k = 4e-5;
  r2_1_biocrnpyler_906589: complex_dna_g_tetR_biocrnpyler_906589 => dna_g_biocrnpyler_906589 + tetR_biocrnpyler_906589; r2_1_biocrnpyler_906589_k*complex_dna_g_tetR_biocrnpyler_906589;
    r2_1_biocrnpyler_906589_k = 1e-12;
  r4_biocrnpyler_906589: complex_dna_g_tetR_biocrnpyler_906589 + atc_i_1_combined => complex_atc_i_dna_g_tetR_biocrnpyler_906589; r4_biocrnpyler_906589_k*complex_dna_g_tetR_biocrnpyler_906589*atc_i_1_combined;
    r4_biocrnpyler_906589_k = 6e-6;
  r4_1_biocrnpyler_906589: complex_atc_i_dna_g_tetR_biocrnpyler_906589 => complex_dna_g_tetR_biocrnpyler_906589 + atc_i_1_combined; r4_1_biocrnpyler_906589_k*complex_atc_i_dna_g_tetR_biocrnpyler_906589;
    r4_1_biocrnpyler_906589_k = 3e-9;
  r6_biocrnpyler_906589: complex_atc_i_dna_g_tetR_biocrnpyler_906589 => dna_g_biocrnpyler_906589 + complex_atc_i_tetR_biocrnpyler_906589; r6_biocrnpyler_906589_k*complex_atc_i_dna_g_tetR_biocrnpyler_906589;
    r6_biocrnpyler_906589_k = 0.005;
  r6_1_biocrnpyler_906589: dna_g_biocrnpyler_906589 + complex_atc_i_tetR_biocrnpyler_906589 => complex_atc_i_dna_g_tetR_biocrnpyler_906589; r6_1_biocrnpyler_906589_k*dna_g_biocrnpyler_906589*complex_atc_i_tetR_biocrnpyler_906589;
    r6_1_biocrnpyler_906589_k = 1e-10;
  r8_biocrnpyler_906589: dna_g_biocrnpyler_906589 => dna_g_biocrnpyler_906589 + rna_g_biocrnpyler_906589; r8_biocrnpyler_906589_k*dna_g_biocrnpyler_906589;
    r8_biocrnpyler_906589_k = 0.0031875;
  r9_biocrnpyler_906589: rna_g_biocrnpyler_906589 + ATP_biocrnpyler_906589 => rna_g_biocrnpyler_906589 + ADP_biocrnpyler_906589 + VirE2_f_biocrnpyler_906589 + P_biocrnpyler_906589; r9_biocrnpyler_906589_k*rna_g_biocrnpyler_906589*ATP_biocrnpyler_906589^r9_biocrnpyler_906589_n/(ATP_biocrnpyler_906589^r9_biocrnpyler_906589_n + r9_biocrnpyler_906589_K);
    r9_biocrnpyler_906589_k = 0.001; r9_biocrnpyler_906589_n = 1; r9_biocrnpyler_906589_K = 1;
  r10_biocrnpyler_906589: VirE2_f_biocrnpyler_906589 => VirE2_b_1_combined; r10_biocrnpyler_906589_k*VirE2_f_biocrnpyler_906589;
    r10_biocrnpyler_906589_k = 5e-5;
  r10_1_biocrnpyler_906589: VirE2_b_1_combined => VirE2_f_biocrnpyler_906589; r10_1_biocrnpyler_906589_k*VirE2_b_1_combined;
    r10_1_biocrnpyler_906589_k = 1e-10;
  r12_biocrnpyler_906589: rna_g_biocrnpyler_906589 => ; r12_biocrnpyler_906589_k*rna_g_biocrnpyler_906589;
    r12_biocrnpyler_906589_k = 0.001;
  r13_biocrnpyler_906589: VirE2_f_biocrnpyler_906589 => ; r13_biocrnpyler_906589_k*VirE2_f_biocrnpyler_906589;
    r13_biocrnpyler_906589_k = 1e-5;
  r0_biocrnpyler_315933: atc_i_1_combined + tetR_biocrnpyler_315933 => complex_atc_i_tetR_biocrnpyler_315933; r0_biocrnpyler_315933_k*atc_i_1_combined*tetR_biocrnpyler_315933; r0_biocrnpyler_315933 is "r0cell2";
    r0_biocrnpyler_315933_k = 2e-5;
  r0_1_biocrnpyler_315933: complex_atc_i_tetR_biocrnpyler_315933 => atc_i_1_combined + tetR_biocrnpyler_315933; r0_1_biocrnpyler_315933_k*complex_atc_i_tetR_biocrnpyler_315933; r0_1_biocrnpyler_315933 is "r0_1cell2";
    r0_1_biocrnpyler_315933_k = 2e-9;
  r2_biocrnpyler_315933: dna_f_biocrnpyler_315933 + tetR_biocrnpyler_315933 => complex_dna_f_tetR_biocrnpyler_315933; r2_biocrnpyler_315933_k*dna_f_biocrnpyler_315933*tetR_biocrnpyler_315933;
    r2_biocrnpyler_315933_k = 4e-7;
  r2_1_biocrnpyler_315933: complex_dna_f_tetR_biocrnpyler_315933 => dna_f_biocrnpyler_315933 + tetR_biocrnpyler_315933; r2_1_biocrnpyler_315933_k*complex_dna_f_tetR_biocrnpyler_315933;
    r2_1_biocrnpyler_315933_k = 1e-12;
  r4_biocrnpyler_315933: complex_dna_f_tetR_biocrnpyler_315933 + atc_i_1_combined => complex_atc_i_dna_f_tetR_biocrnpyler_315933; r4_biocrnpyler_315933_k*complex_dna_f_tetR_biocrnpyler_315933*atc_i_1_combined;
    r4_biocrnpyler_315933_k = 6e-8;
  r4_1_biocrnpyler_315933: complex_atc_i_dna_f_tetR_biocrnpyler_315933 => complex_dna_f_tetR_biocrnpyler_315933 + atc_i_1_combined; r4_1_biocrnpyler_315933_k*complex_atc_i_dna_f_tetR_biocrnpyler_315933;
    r4_1_biocrnpyler_315933_k = 3e-9;
  r6_biocrnpyler_315933: complex_atc_i_dna_f_tetR_biocrnpyler_315933 => dna_f_biocrnpyler_315933 + complex_atc_i_tetR_biocrnpyler_315933; r6_biocrnpyler_315933_k*complex_atc_i_dna_f_tetR_biocrnpyler_315933;
    r6_biocrnpyler_315933_k = 5e-5;
  r6_1_biocrnpyler_315933: dna_f_biocrnpyler_315933 + complex_atc_i_tetR_biocrnpyler_315933 => complex_atc_i_dna_f_tetR_biocrnpyler_315933; r6_1_biocrnpyler_315933_k*dna_f_biocrnpyler_315933*complex_atc_i_tetR_biocrnpyler_315933;
    r6_1_biocrnpyler_315933_k = 1e-10;
  r8_biocrnpyler_315933: dna_f_biocrnpyler_315933 => dna_f_biocrnpyler_315933 + rna_f_biocrnpyler_315933; r8_biocrnpyler_315933_k*dna_f_biocrnpyler_315933;
    r8_biocrnpyler_315933_k = 0.001875;
  r9_biocrnpyler_315933: rna_f_biocrnpyler_315933 + ATP_biocrnpyler_315933 => rna_f_biocrnpyler_315933 + ADP_biocrnpyler_315933 + exsA_biocrnpyler_315933 + P_biocrnpyler_315933; r9_biocrnpyler_315933_k*rna_f_biocrnpyler_315933*ATP_biocrnpyler_315933^r9_biocrnpyler_315933_n/(ATP_biocrnpyler_315933^r9_biocrnpyler_315933_n + r9_biocrnpyler_315933_K);
    r9_biocrnpyler_315933_k = 0.0005; r9_biocrnpyler_315933_n = 1; r9_biocrnpyler_315933_K = 1;
  r10_biocrnpyler_315933: rna_f_biocrnpyler_315933 => ; r10_biocrnpyler_315933_k*rna_f_biocrnpyler_315933;
    r10_biocrnpyler_315933_k = 0.001;
  r0_biocrnpyler_312668: dna_h_biocrnpyler_312668 + exsA_biocrnpyler_312668 => complex_dna_h_exsA_biocrnpyler_312668; r0_biocrnpyler_312668_k*dna_h_biocrnpyler_312668*exsA_biocrnpyler_312668;
    r0_biocrnpyler_312668_k = 4e-5;
  r0_1_biocrnpyler_312668: complex_dna_h_exsA_biocrnpyler_312668 => dna_h_biocrnpyler_312668 + exsA_biocrnpyler_312668; r0_1_biocrnpyler_312668_k*complex_dna_h_exsA_biocrnpyler_312668;
    r0_1_biocrnpyler_312668_k = 1e-12;
  r2_biocrnpyler_312668: complex_dna_h_exsA_biocrnpyler_312668 => complex_dna_h_exsA_biocrnpyler_312668 + rna_h_biocrnpyler_312668; r2_biocrnpyler_312668_k*complex_dna_h_exsA_biocrnpyler_312668;
    r2_biocrnpyler_312668_k = 0.001875;
  r3_biocrnpyler_312668: rna_h_biocrnpyler_312668 + ATP_biocrnpyler_312668 => rna_h_biocrnpyler_312668 + ADP_biocrnpyler_312668 + gfp_biocrnpyler_312668 + P_biocrnpyler_312668; r3_biocrnpyler_312668_k*rna_h_biocrnpyler_312668*ATP_biocrnpyler_312668^r3_biocrnpyler_312668_n/(ATP_biocrnpyler_312668^r3_biocrnpyler_312668_n + r3_biocrnpyler_312668_K);
    r3_biocrnpyler_312668_k = 0.0005; r3_biocrnpyler_312668_n = 1; r3_biocrnpyler_312668_K = 1;
  r4_biocrnpyler_312668: rna_h_biocrnpyler_312668 => ; r4_biocrnpyler_312668_k*rna_h_biocrnpyler_312668;
    r4_biocrnpyler_312668_k = 0.001;

  // Unit definitions:
  unit square_metre = metre^2;
  unit per_second = 1 / second;
  unit substance = dimensionless;
end
