// SBML level 3 version 2

model combined_model_of__combined_model_of__combined_model_of__external_reservoir_model_combined_model_of__atc_membrane_dnaexp_membrane_combined_model_of__biocrnpyler_269558_combined_model_of__combined_model_of__external_reservoir_model_combined_model_of__atc_membrane2_combined_model_of__biocrnpyler_77342_combined_model_of__combined_model_of__external_reservoir_model_combined_model_of__atc_membrane3_combined_model_of__biocrnpyler_872167()
  // model units - substance: mole, time: second, volume: litre, area: square_metre, length: metre, extent: mole

  // Compartments:
  compartment cell_1_internal_combined_cell1combined_model_of__combined_model_of__external_reservoir_model_combined_model_of__atc_membrane_dnaexp_membrane_combined_model_of__biocrnpyler_269558 = 0.000105 litre;
  compartment cell_external_cell1combined_model_of__combined_model_of__external_reservoir_model_combined_model_of__atc_membrane_dnaexp_membrane_combined_model_of__biocrnpyler_269558_combined = 0.0001 litre;
  compartment cell_external_cell2combined_model_of__combined_model_of__external_reservoir_model_combined_model_of__atc_membrane2_combined_model_of__biocrnpyler_77342 = 2e-6 litre;
  compartment cell_2_internal_combined_cell2combined_model_of__combined_model_of__external_reservoir_model_combined_model_of__atc_membrane2_combined_model_of__biocrnpyler_77342 = 0.0001 litre;
  compartment cell_external_cell3combined_model_of__combined_model_of__external_reservoir_model_combined_model_of__atc_membrane3_combined_model_of__biocrnpyler_872167 = 0.0001 litre;
  compartment cell_3_internal_combined_cell3combined_model_of__combined_model_of__external_reservoir_model_combined_model_of__atc_membrane3_combined_model_of__biocrnpyler_872167 = 1e-6 litre;

  // Species:
  species ssDNA_e_cell1combined_model_of__combined_model_of__external_reservoir_model_combined_model_of__atc_membrane_dnaexp_membrane_combined_model_of__biocrnpyler_269558 in cell_external_cell1combined_model_of__combined_model_of__external_reservoir_model_combined_model_of__atc_membrane_dnaexp_membrane_combined_model_of__biocrnpyler_269558_combined = 0;
  species ssDNA_cell1combined_model_of__combined_model_of__external_reservoir_model_combined_model_of__atc_membrane_dnaexp_membrane_combined_model_of__biocrnpyler_269558 in cell_1_internal_combined_cell1combined_model_of__combined_model_of__external_reservoir_model_combined_model_of__atc_membrane_dnaexp_membrane_combined_model_of__biocrnpyler_269558 = 0;
  species VirE2_b_ssDNA_cell1combined_model_of__combined_model_of__external_reservoir_model_combined_model_of__atc_membrane_dnaexp_membrane_combined_model_of__biocrnpyler_269558 in cell_1_internal_combined_cell1combined_model_of__combined_model_of__external_reservoir_model_combined_model_of__atc_membrane_dnaexp_membrane_combined_model_of__biocrnpyler_269558 = 0;
  species dna_g_biocrnpyler_269558_cell1combined_model_of__combined_model_of__external_reservoir_model_combined_model_of__atc_membrane_dnaexp_membrane_combined_model_of__biocrnpyler_269558 in cell_1_internal_combined_cell1combined_model_of__combined_model_of__external_reservoir_model_combined_model_of__atc_membrane_dnaexp_membrane_combined_model_of__biocrnpyler_269558 = 0;
  species tetR_biocrnpyler_269558_cell1combined_model_of__combined_model_of__external_reservoir_model_combined_model_of__atc_membrane_dnaexp_membrane_combined_model_of__biocrnpyler_269558 in cell_1_internal_combined_cell1combined_model_of__combined_model_of__external_reservoir_model_combined_model_of__atc_membrane_dnaexp_membrane_combined_model_of__biocrnpyler_269558 = 0;
  species rna_g_biocrnpyler_269558_cell1combined_model_of__combined_model_of__external_reservoir_model_combined_model_of__atc_membrane_dnaexp_membrane_combined_model_of__biocrnpyler_269558 in cell_1_internal_combined_cell1combined_model_of__combined_model_of__external_reservoir_model_combined_model_of__atc_membrane_dnaexp_membrane_combined_model_of__biocrnpyler_269558 = 0;
  species VirE2_f_biocrnpyler_269558_cell1combined_model_of__combined_model_of__external_reservoir_model_combined_model_of__atc_membrane_dnaexp_membrane_combined_model_of__biocrnpyler_269558 in cell_1_internal_combined_cell1combined_model_of__combined_model_of__external_reservoir_model_combined_model_of__atc_membrane_dnaexp_membrane_combined_model_of__biocrnpyler_269558 = 0;
  species ATP_biocrnpyler_269558_cell1combined_model_of__combined_model_of__external_reservoir_model_combined_model_of__atc_membrane_dnaexp_membrane_combined_model_of__biocrnpyler_269558 in cell_1_internal_combined_cell1combined_model_of__combined_model_of__external_reservoir_model_combined_model_of__atc_membrane_dnaexp_membrane_combined_model_of__biocrnpyler_269558 = 0;
  species ADP_biocrnpyler_269558_cell1combined_model_of__combined_model_of__external_reservoir_model_combined_model_of__atc_membrane_dnaexp_membrane_combined_model_of__biocrnpyler_269558 in cell_1_internal_combined_cell1combined_model_of__combined_model_of__external_reservoir_model_combined_model_of__atc_membrane_dnaexp_membrane_combined_model_of__biocrnpyler_269558 = 0;
  species atc_i_1_combined_cell1combined_model_of__combined_model_of__external_reservoir_model_combined_model_of__atc_membrane_dnaexp_membrane_combined_model_of__biocrnpyler_269558 in cell_1_internal_combined_cell1combined_model_of__combined_model_of__external_reservoir_model_combined_model_of__atc_membrane_dnaexp_membrane_combined_model_of__biocrnpyler_269558 = 0;
  species complex_atc_i_tetR_biocrnpyler_269558_cell1combined_model_of__combined_model_of__external_reservoir_model_combined_model_of__atc_membrane_dnaexp_membrane_combined_model_of__biocrnpyler_269558 in cell_1_internal_combined_cell1combined_model_of__combined_model_of__external_reservoir_model_combined_model_of__atc_membrane_dnaexp_membrane_combined_model_of__biocrnpyler_269558 = 0;
  species VirE2_b_1_combined_cell1combined_model_of__combined_model_of__external_reservoir_model_combined_model_of__atc_membrane_dnaexp_membrane_combined_model_of__biocrnpyler_269558 in cell_1_internal_combined_cell1combined_model_of__combined_model_of__external_reservoir_model_combined_model_of__atc_membrane_dnaexp_membrane_combined_model_of__biocrnpyler_269558 = 0;
  species complex_dna_g_tetR_biocrnpyler_269558_cell1combined_model_of__combined_model_of__external_reservoir_model_combined_model_of__atc_membrane_dnaexp_membrane_combined_model_of__biocrnpyler_269558 in cell_1_internal_combined_cell1combined_model_of__combined_model_of__external_reservoir_model_combined_model_of__atc_membrane_dnaexp_membrane_combined_model_of__biocrnpyler_269558 = 0;
  species complex_atc_i_dna_g_tetR_biocrnpyler_269558_cell1combined_model_of__combined_model_of__external_reservoir_model_combined_model_of__atc_membrane_dnaexp_membrane_combined_model_of__biocrnpyler_269558 in cell_1_internal_combined_cell1combined_model_of__combined_model_of__external_reservoir_model_combined_model_of__atc_membrane_dnaexp_membrane_combined_model_of__biocrnpyler_269558 = 0;
  species P_biocrnpyler_269558_cell1combined_model_of__combined_model_of__external_reservoir_model_combined_model_of__atc_membrane_dnaexp_membrane_combined_model_of__biocrnpyler_269558 in cell_1_internal_combined_cell1combined_model_of__combined_model_of__external_reservoir_model_combined_model_of__atc_membrane_dnaexp_membrane_combined_model_of__biocrnpyler_269558 = 0;
  species ssDNA_comp1_cell2combined_model_of__combined_model_of__external_reservoir_model_combined_model_of__atc_membrane2_combined_model_of__biocrnpyler_77342 in cell_2_internal_combined_cell2combined_model_of__combined_model_of__external_reservoir_model_combined_model_of__atc_membrane2_combined_model_of__biocrnpyler_77342 = 0;
  species dna_f_biocrnpyler_77342_cell2combined_model_of__combined_model_of__external_reservoir_model_combined_model_of__atc_membrane2_combined_model_of__biocrnpyler_77342 in cell_2_internal_combined_cell2combined_model_of__combined_model_of__external_reservoir_model_combined_model_of__atc_membrane2_combined_model_of__biocrnpyler_77342 = 0;
  species tetR_biocrnpyler_77342_cell2combined_model_of__combined_model_of__external_reservoir_model_combined_model_of__atc_membrane2_combined_model_of__biocrnpyler_77342 in cell_2_internal_combined_cell2combined_model_of__combined_model_of__external_reservoir_model_combined_model_of__atc_membrane2_combined_model_of__biocrnpyler_77342 = 0;
  species rna_f_biocrnpyler_77342_cell2combined_model_of__combined_model_of__external_reservoir_model_combined_model_of__atc_membrane2_combined_model_of__biocrnpyler_77342 in cell_2_internal_combined_cell2combined_model_of__combined_model_of__external_reservoir_model_combined_model_of__atc_membrane2_combined_model_of__biocrnpyler_77342 = 0;
  species exsA_biocrnpyler_77342_cell2combined_model_of__combined_model_of__external_reservoir_model_combined_model_of__atc_membrane2_combined_model_of__biocrnpyler_77342 in cell_2_internal_combined_cell2combined_model_of__combined_model_of__external_reservoir_model_combined_model_of__atc_membrane2_combined_model_of__biocrnpyler_77342 = 0;
  species ATP_biocrnpyler_77342_cell2combined_model_of__combined_model_of__external_reservoir_model_combined_model_of__atc_membrane2_combined_model_of__biocrnpyler_77342 in cell_2_internal_combined_cell2combined_model_of__combined_model_of__external_reservoir_model_combined_model_of__atc_membrane2_combined_model_of__biocrnpyler_77342 = 0;
  species ADP_biocrnpyler_77342_cell2combined_model_of__combined_model_of__external_reservoir_model_combined_model_of__atc_membrane2_combined_model_of__biocrnpyler_77342 in cell_2_internal_combined_cell2combined_model_of__combined_model_of__external_reservoir_model_combined_model_of__atc_membrane2_combined_model_of__biocrnpyler_77342 = 0;
  species atc_i_1_combined_cell2combined_model_of__combined_model_of__external_reservoir_model_combined_model_of__atc_membrane2_combined_model_of__biocrnpyler_77342 in cell_2_internal_combined_cell2combined_model_of__combined_model_of__external_reservoir_model_combined_model_of__atc_membrane2_combined_model_of__biocrnpyler_77342 = 0; atc_i_1_combined_cell2combined_model_of__combined_model_of__external_reservoir_model_combined_model_of__atc_membrane2_combined_model_of__biocrnpyler_77342 is "atc_i_cell2";
  species complex_atc_i_tetR_biocrnpyler_77342_cell2combined_model_of__combined_model_of__external_reservoir_model_combined_model_of__atc_membrane2_combined_model_of__biocrnpyler_77342 in cell_2_internal_combined_cell2combined_model_of__combined_model_of__external_reservoir_model_combined_model_of__atc_membrane2_combined_model_of__biocrnpyler_77342 = 0;
  species complex_dna_f_tetR_biocrnpyler_77342_cell2combined_model_of__combined_model_of__external_reservoir_model_combined_model_of__atc_membrane2_combined_model_of__biocrnpyler_77342 in cell_2_internal_combined_cell2combined_model_of__combined_model_of__external_reservoir_model_combined_model_of__atc_membrane2_combined_model_of__biocrnpyler_77342 = 0;
  species complex_atc_i_dna_f_tetR_biocrnpyler_77342_cell2combined_model_of__combined_model_of__external_reservoir_model_combined_model_of__atc_membrane2_combined_model_of__biocrnpyler_77342 in cell_2_internal_combined_cell2combined_model_of__combined_model_of__external_reservoir_model_combined_model_of__atc_membrane2_combined_model_of__biocrnpyler_77342 = 0;
  species P_biocrnpyler_77342_cell2combined_model_of__combined_model_of__external_reservoir_model_combined_model_of__atc_membrane2_combined_model_of__biocrnpyler_77342 in cell_2_internal_combined_cell2combined_model_of__combined_model_of__external_reservoir_model_combined_model_of__atc_membrane2_combined_model_of__biocrnpyler_77342 = 0;
  species atc_e_external_reservoir_model_1_combined_cell1combined_model_of__combined_model_of__external_reservoir_model_combined_model_of__atc_membrane_dnaexp_membrane_combined_model_of__biocrnpyler_269558_1_combined in cell_external_cell3combined_model_of__combined_model_of__external_reservoir_model_combined_model_of__atc_membrane3_combined_model_of__biocrnpyler_872167 = 0;
  species atc_i_cell3combined_model_of__combined_model_of__external_reservoir_model_combined_model_of__atc_membrane3_combined_model_of__biocrnpyler_872167 in cell_3_internal_combined_cell3combined_model_of__combined_model_of__external_reservoir_model_combined_model_of__atc_membrane3_combined_model_of__biocrnpyler_872167 = 0;
  species ssDNA_comp2_cell3combined_model_of__combined_model_of__external_reservoir_model_combined_model_of__atc_membrane3_combined_model_of__biocrnpyler_872167 in cell_3_internal_combined_cell3combined_model_of__combined_model_of__external_reservoir_model_combined_model_of__atc_membrane3_combined_model_of__biocrnpyler_872167 = 0;
  species dna_h_biocrnpyler_872167_cell3combined_model_of__combined_model_of__external_reservoir_model_combined_model_of__atc_membrane3_combined_model_of__biocrnpyler_872167 in cell_3_internal_combined_cell3combined_model_of__combined_model_of__external_reservoir_model_combined_model_of__atc_membrane3_combined_model_of__biocrnpyler_872167 = 0;
  species rna_h_biocrnpyler_872167_cell3combined_model_of__combined_model_of__external_reservoir_model_combined_model_of__atc_membrane3_combined_model_of__biocrnpyler_872167 in cell_3_internal_combined_cell3combined_model_of__combined_model_of__external_reservoir_model_combined_model_of__atc_membrane3_combined_model_of__biocrnpyler_872167 = 0;
  species exsA_biocrnpyler_872167_cell3combined_model_of__combined_model_of__external_reservoir_model_combined_model_of__atc_membrane3_combined_model_of__biocrnpyler_872167 in cell_3_internal_combined_cell3combined_model_of__combined_model_of__external_reservoir_model_combined_model_of__atc_membrane3_combined_model_of__biocrnpyler_872167 = 0;
  species ATP_biocrnpyler_872167_cell3combined_model_of__combined_model_of__external_reservoir_model_combined_model_of__atc_membrane3_combined_model_of__biocrnpyler_872167 in cell_3_internal_combined_cell3combined_model_of__combined_model_of__external_reservoir_model_combined_model_of__atc_membrane3_combined_model_of__biocrnpyler_872167 = 0;
  species ADP_biocrnpyler_872167_cell3combined_model_of__combined_model_of__external_reservoir_model_combined_model_of__atc_membrane3_combined_model_of__biocrnpyler_872167 in cell_3_internal_combined_cell3combined_model_of__combined_model_of__external_reservoir_model_combined_model_of__atc_membrane3_combined_model_of__biocrnpyler_872167 = 0;
  species P_biocrnpyler_872167_cell3combined_model_of__combined_model_of__external_reservoir_model_combined_model_of__atc_membrane3_combined_model_of__biocrnpyler_872167 in cell_3_internal_combined_cell3combined_model_of__combined_model_of__external_reservoir_model_combined_model_of__atc_membrane3_combined_model_of__biocrnpyler_872167 = 0;
  species complex_dna_h_exsA_biocrnpyler_872167_cell3combined_model_of__combined_model_of__external_reservoir_model_combined_model_of__atc_membrane3_combined_model_of__biocrnpyler_872167 in cell_3_internal_combined_cell3combined_model_of__combined_model_of__external_reservoir_model_combined_model_of__atc_membrane3_combined_model_of__biocrnpyler_872167 = 0;
  species gfp_biocrnpyler_872167_cell3combined_model_of__combined_model_of__external_reservoir_model_combined_model_of__atc_membrane3_combined_model_of__biocrnpyler_872167 in cell_3_internal_combined_cell3combined_model_of__combined_model_of__external_reservoir_model_combined_model_of__atc_membrane3_combined_model_of__biocrnpyler_872167 = 0;
  species dsDNA in cell_external_cell1combined_model_of__combined_model_of__external_reservoir_model_combined_model_of__atc_membrane_dnaexp_membrane_combined_model_of__biocrnpyler_906589_combined = 0;

  // Parameters:
  kb1_cell1combined_model_of__combined_model_of__external_reservoir_model_combined_model_of__atc_membrane_dnaexp_membrane_combined_model_of__biocrnpyler_269558 = 0.002 per_second;
  kd1_cell1combined_model_of__combined_model_of__external_reservoir_model_combined_model_of__atc_membrane_dnaexp_membrane_combined_model_of__biocrnpyler_269558 = 1e-5 per_second;
  kd2_cell1combined_model_of__combined_model_of__external_reservoir_model_combined_model_of__atc_membrane_dnaexp_membrane_combined_model_of__biocrnpyler_269558 = 0.0002 per_second;
  kb_combined = 0.002 per_second;
  kd_combined = 1e-5 per_second;
  kf = 0.01 per_second;
  kr = 1e-7 per_second;

  // Reactions:
  r1_cell1_cell1combined_model_of__combined_model_of__external_reservoir_model_combined_model_of__atc_membrane_dnaexp_membrane_combined_model_of__biocrnpyler_269558: atc_e_external_reservoir_model_1_combined_cell1combined_model_of__combined_model_of__external_reservoir_model_combined_model_of__atc_membrane_dnaexp_membrane_combined_model_of__biocrnpyler_269558_1_combined -> atc_i_1_combined_cell1combined_model_of__combined_model_of__external_reservoir_model_combined_model_of__atc_membrane_dnaexp_membrane_combined_model_of__biocrnpyler_269558; kb_combined*atc_e_external_reservoir_model_1_combined_cell1combined_model_of__combined_model_of__external_reservoir_model_combined_model_of__atc_membrane_dnaexp_membrane_combined_model_of__biocrnpyler_269558_1_combined - kd_combined*atc_i_1_combined_cell1combined_model_of__combined_model_of__external_reservoir_model_combined_model_of__atc_membrane_dnaexp_membrane_combined_model_of__biocrnpyler_269558;
  R1_cell1combined_model_of__combined_model_of__external_reservoir_model_combined_model_of__atc_membrane_dnaexp_membrane_combined_model_of__biocrnpyler_269558: VirE2_b_1_combined_cell1combined_model_of__combined_model_of__external_reservoir_model_combined_model_of__atc_membrane_dnaexp_membrane_combined_model_of__biocrnpyler_269558 + ssDNA_cell1combined_model_of__combined_model_of__external_reservoir_model_combined_model_of__atc_membrane_dnaexp_membrane_combined_model_of__biocrnpyler_269558 -> VirE2_b_ssDNA_cell1combined_model_of__combined_model_of__external_reservoir_model_combined_model_of__atc_membrane_dnaexp_membrane_combined_model_of__biocrnpyler_269558; kb1_cell1combined_model_of__combined_model_of__external_reservoir_model_combined_model_of__atc_membrane_dnaexp_membrane_combined_model_of__biocrnpyler_269558*VirE2_b_1_combined_cell1combined_model_of__combined_model_of__external_reservoir_model_combined_model_of__atc_membrane_dnaexp_membrane_combined_model_of__biocrnpyler_269558*ssDNA_cell1combined_model_of__combined_model_of__external_reservoir_model_combined_model_of__atc_membrane_dnaexp_membrane_combined_model_of__biocrnpyler_269558 - kd1_cell1combined_model_of__combined_model_of__external_reservoir_model_combined_model_of__atc_membrane_dnaexp_membrane_combined_model_of__biocrnpyler_269558*VirE2_b_ssDNA_cell1combined_model_of__combined_model_of__external_reservoir_model_combined_model_of__atc_membrane_dnaexp_membrane_combined_model_of__biocrnpyler_269558;
  R2_cell1combined_model_of__combined_model_of__external_reservoir_model_combined_model_of__atc_membrane_dnaexp_membrane_combined_model_of__biocrnpyler_269558: VirE2_b_ssDNA_cell1combined_model_of__combined_model_of__external_reservoir_model_combined_model_of__atc_membrane_dnaexp_membrane_combined_model_of__biocrnpyler_269558 => ssDNA_e_cell1combined_model_of__combined_model_of__external_reservoir_model_combined_model_of__atc_membrane_dnaexp_membrane_combined_model_of__biocrnpyler_269558 + VirE2_b_1_combined_cell1combined_model_of__combined_model_of__external_reservoir_model_combined_model_of__atc_membrane_dnaexp_membrane_combined_model_of__biocrnpyler_269558; kd2_cell1combined_model_of__combined_model_of__external_reservoir_model_combined_model_of__atc_membrane_dnaexp_membrane_combined_model_of__biocrnpyler_269558*VirE2_b_ssDNA_cell1combined_model_of__combined_model_of__external_reservoir_model_combined_model_of__atc_membrane_dnaexp_membrane_combined_model_of__biocrnpyler_269558;
  r0_biocrnpyler_269558_cell1combined_model_of__combined_model_of__external_reservoir_model_combined_model_of__atc_membrane_dnaexp_membrane_combined_model_of__biocrnpyler_269558: atc_i_1_combined_cell1combined_model_of__combined_model_of__external_reservoir_model_combined_model_of__atc_membrane_dnaexp_membrane_combined_model_of__biocrnpyler_269558 + tetR_biocrnpyler_269558_cell1combined_model_of__combined_model_of__external_reservoir_model_combined_model_of__atc_membrane_dnaexp_membrane_combined_model_of__biocrnpyler_269558 => complex_atc_i_tetR_biocrnpyler_269558_cell1combined_model_of__combined_model_of__external_reservoir_model_combined_model_of__atc_membrane_dnaexp_membrane_combined_model_of__biocrnpyler_269558; r0_biocrnpyler_269558_cell1combined_model_of__combined_model_of__external_reservoir_model_combined_model_of__atc_membrane_dnaexp_membrane_combined_model_of__biocrnpyler_269558_k*atc_i_1_combined_cell1combined_model_of__combined_model_of__external_reservoir_model_combined_model_of__atc_membrane_dnaexp_membrane_combined_model_of__biocrnpyler_269558*tetR_biocrnpyler_269558_cell1combined_model_of__combined_model_of__external_reservoir_model_combined_model_of__atc_membrane_dnaexp_membrane_combined_model_of__biocrnpyler_269558;
    r0_biocrnpyler_269558_cell1combined_model_of__combined_model_of__external_reservoir_model_combined_model_of__atc_membrane_dnaexp_membrane_combined_model_of__biocrnpyler_269558_k = 0.0002;
  r0_1_biocrnpyler_269558_cell1combined_model_of__combined_model_of__external_reservoir_model_combined_model_of__atc_membrane_dnaexp_membrane_combined_model_of__biocrnpyler_269558: complex_atc_i_tetR_biocrnpyler_269558_cell1combined_model_of__combined_model_of__external_reservoir_model_combined_model_of__atc_membrane_dnaexp_membrane_combined_model_of__biocrnpyler_269558 => atc_i_1_combined_cell1combined_model_of__combined_model_of__external_reservoir_model_combined_model_of__atc_membrane_dnaexp_membrane_combined_model_of__biocrnpyler_269558 + tetR_biocrnpyler_269558_cell1combined_model_of__combined_model_of__external_reservoir_model_combined_model_of__atc_membrane_dnaexp_membrane_combined_model_of__biocrnpyler_269558; r0_1_biocrnpyler_269558_cell1combined_model_of__combined_model_of__external_reservoir_model_combined_model_of__atc_membrane_dnaexp_membrane_combined_model_of__biocrnpyler_269558_k*complex_atc_i_tetR_biocrnpyler_269558_cell1combined_model_of__combined_model_of__external_reservoir_model_combined_model_of__atc_membrane_dnaexp_membrane_combined_model_of__biocrnpyler_269558;
    r0_1_biocrnpyler_269558_cell1combined_model_of__combined_model_of__external_reservoir_model_combined_model_of__atc_membrane_dnaexp_membrane_combined_model_of__biocrnpyler_269558_k = 2e-9;
  r2_biocrnpyler_269558_cell1combined_model_of__combined_model_of__external_reservoir_model_combined_model_of__atc_membrane_dnaexp_membrane_combined_model_of__biocrnpyler_269558: dna_g_biocrnpyler_269558_cell1combined_model_of__combined_model_of__external_reservoir_model_combined_model_of__atc_membrane_dnaexp_membrane_combined_model_of__biocrnpyler_269558 + tetR_biocrnpyler_269558_cell1combined_model_of__combined_model_of__external_reservoir_model_combined_model_of__atc_membrane_dnaexp_membrane_combined_model_of__biocrnpyler_269558 => complex_dna_g_tetR_biocrnpyler_269558_cell1combined_model_of__combined_model_of__external_reservoir_model_combined_model_of__atc_membrane_dnaexp_membrane_combined_model_of__biocrnpyler_269558; r2_biocrnpyler_269558_cell1combined_model_of__combined_model_of__external_reservoir_model_combined_model_of__atc_membrane_dnaexp_membrane_combined_model_of__biocrnpyler_269558_k*dna_g_biocrnpyler_269558_cell1combined_model_of__combined_model_of__external_reservoir_model_combined_model_of__atc_membrane_dnaexp_membrane_combined_model_of__biocrnpyler_269558*tetR_biocrnpyler_269558_cell1combined_model_of__combined_model_of__external_reservoir_model_combined_model_of__atc_membrane_dnaexp_membrane_combined_model_of__biocrnpyler_269558;
    r2_biocrnpyler_269558_cell1combined_model_of__combined_model_of__external_reservoir_model_combined_model_of__atc_membrane_dnaexp_membrane_combined_model_of__biocrnpyler_269558_k = 4e-5;
  r2_1_biocrnpyler_269558_cell1combined_model_of__combined_model_of__external_reservoir_model_combined_model_of__atc_membrane_dnaexp_membrane_combined_model_of__biocrnpyler_269558: complex_dna_g_tetR_biocrnpyler_269558_cell1combined_model_of__combined_model_of__external_reservoir_model_combined_model_of__atc_membrane_dnaexp_membrane_combined_model_of__biocrnpyler_269558 => dna_g_biocrnpyler_269558_cell1combined_model_of__combined_model_of__external_reservoir_model_combined_model_of__atc_membrane_dnaexp_membrane_combined_model_of__biocrnpyler_269558 + tetR_biocrnpyler_269558_cell1combined_model_of__combined_model_of__external_reservoir_model_combined_model_of__atc_membrane_dnaexp_membrane_combined_model_of__biocrnpyler_269558; r2_1_biocrnpyler_269558_cell1combined_model_of__combined_model_of__external_reservoir_model_combined_model_of__atc_membrane_dnaexp_membrane_combined_model_of__biocrnpyler_269558_k*complex_dna_g_tetR_biocrnpyler_269558_cell1combined_model_of__combined_model_of__external_reservoir_model_combined_model_of__atc_membrane_dnaexp_membrane_combined_model_of__biocrnpyler_269558;
    r2_1_biocrnpyler_269558_cell1combined_model_of__combined_model_of__external_reservoir_model_combined_model_of__atc_membrane_dnaexp_membrane_combined_model_of__biocrnpyler_269558_k = 1e-12;
  r4_biocrnpyler_269558_cell1combined_model_of__combined_model_of__external_reservoir_model_combined_model_of__atc_membrane_dnaexp_membrane_combined_model_of__biocrnpyler_269558: complex_dna_g_tetR_biocrnpyler_269558_cell1combined_model_of__combined_model_of__external_reservoir_model_combined_model_of__atc_membrane_dnaexp_membrane_combined_model_of__biocrnpyler_269558 + atc_i_1_combined_cell1combined_model_of__combined_model_of__external_reservoir_model_combined_model_of__atc_membrane_dnaexp_membrane_combined_model_of__biocrnpyler_269558 => complex_atc_i_dna_g_tetR_biocrnpyler_269558_cell1combined_model_of__combined_model_of__external_reservoir_model_combined_model_of__atc_membrane_dnaexp_membrane_combined_model_of__biocrnpyler_269558; r4_biocrnpyler_269558_cell1combined_model_of__combined_model_of__external_reservoir_model_combined_model_of__atc_membrane_dnaexp_membrane_combined_model_of__biocrnpyler_269558_k*complex_dna_g_tetR_biocrnpyler_269558_cell1combined_model_of__combined_model_of__external_reservoir_model_combined_model_of__atc_membrane_dnaexp_membrane_combined_model_of__biocrnpyler_269558*atc_i_1_combined_cell1combined_model_of__combined_model_of__external_reservoir_model_combined_model_of__atc_membrane_dnaexp_membrane_combined_model_of__biocrnpyler_269558;
    r4_biocrnpyler_269558_cell1combined_model_of__combined_model_of__external_reservoir_model_combined_model_of__atc_membrane_dnaexp_membrane_combined_model_of__biocrnpyler_269558_k = 6e-6;
  r4_1_biocrnpyler_269558_cell1combined_model_of__combined_model_of__external_reservoir_model_combined_model_of__atc_membrane_dnaexp_membrane_combined_model_of__biocrnpyler_269558: complex_atc_i_dna_g_tetR_biocrnpyler_269558_cell1combined_model_of__combined_model_of__external_reservoir_model_combined_model_of__atc_membrane_dnaexp_membrane_combined_model_of__biocrnpyler_269558 => complex_dna_g_tetR_biocrnpyler_269558_cell1combined_model_of__combined_model_of__external_reservoir_model_combined_model_of__atc_membrane_dnaexp_membrane_combined_model_of__biocrnpyler_269558 + atc_i_1_combined_cell1combined_model_of__combined_model_of__external_reservoir_model_combined_model_of__atc_membrane_dnaexp_membrane_combined_model_of__biocrnpyler_269558; r4_1_biocrnpyler_269558_cell1combined_model_of__combined_model_of__external_reservoir_model_combined_model_of__atc_membrane_dnaexp_membrane_combined_model_of__biocrnpyler_269558_k*complex_atc_i_dna_g_tetR_biocrnpyler_269558_cell1combined_model_of__combined_model_of__external_reservoir_model_combined_model_of__atc_membrane_dnaexp_membrane_combined_model_of__biocrnpyler_269558;
    r4_1_biocrnpyler_269558_cell1combined_model_of__combined_model_of__external_reservoir_model_combined_model_of__atc_membrane_dnaexp_membrane_combined_model_of__biocrnpyler_269558_k = 3e-9;
  r6_biocrnpyler_269558_cell1combined_model_of__combined_model_of__external_reservoir_model_combined_model_of__atc_membrane_dnaexp_membrane_combined_model_of__biocrnpyler_269558: complex_atc_i_dna_g_tetR_biocrnpyler_269558_cell1combined_model_of__combined_model_of__external_reservoir_model_combined_model_of__atc_membrane_dnaexp_membrane_combined_model_of__biocrnpyler_269558 => dna_g_biocrnpyler_269558_cell1combined_model_of__combined_model_of__external_reservoir_model_combined_model_of__atc_membrane_dnaexp_membrane_combined_model_of__biocrnpyler_269558 + complex_atc_i_tetR_biocrnpyler_269558_cell1combined_model_of__combined_model_of__external_reservoir_model_combined_model_of__atc_membrane_dnaexp_membrane_combined_model_of__biocrnpyler_269558; r6_biocrnpyler_269558_cell1combined_model_of__combined_model_of__external_reservoir_model_combined_model_of__atc_membrane_dnaexp_membrane_combined_model_of__biocrnpyler_269558_k*complex_atc_i_dna_g_tetR_biocrnpyler_269558_cell1combined_model_of__combined_model_of__external_reservoir_model_combined_model_of__atc_membrane_dnaexp_membrane_combined_model_of__biocrnpyler_269558;
    r6_biocrnpyler_269558_cell1combined_model_of__combined_model_of__external_reservoir_model_combined_model_of__atc_membrane_dnaexp_membrane_combined_model_of__biocrnpyler_269558_k = 0.005;
  r6_1_biocrnpyler_269558_cell1combined_model_of__combined_model_of__external_reservoir_model_combined_model_of__atc_membrane_dnaexp_membrane_combined_model_of__biocrnpyler_269558: dna_g_biocrnpyler_269558_cell1combined_model_of__combined_model_of__external_reservoir_model_combined_model_of__atc_membrane_dnaexp_membrane_combined_model_of__biocrnpyler_269558 + complex_atc_i_tetR_biocrnpyler_269558_cell1combined_model_of__combined_model_of__external_reservoir_model_combined_model_of__atc_membrane_dnaexp_membrane_combined_model_of__biocrnpyler_269558 => complex_atc_i_dna_g_tetR_biocrnpyler_269558_cell1combined_model_of__combined_model_of__external_reservoir_model_combined_model_of__atc_membrane_dnaexp_membrane_combined_model_of__biocrnpyler_269558; r6_1_biocrnpyler_269558_cell1combined_model_of__combined_model_of__external_reservoir_model_combined_model_of__atc_membrane_dnaexp_membrane_combined_model_of__biocrnpyler_269558_k*dna_g_biocrnpyler_269558_cell1combined_model_of__combined_model_of__external_reservoir_model_combined_model_of__atc_membrane_dnaexp_membrane_combined_model_of__biocrnpyler_269558*complex_atc_i_tetR_biocrnpyler_269558_cell1combined_model_of__combined_model_of__external_reservoir_model_combined_model_of__atc_membrane_dnaexp_membrane_combined_model_of__biocrnpyler_269558;
    r6_1_biocrnpyler_269558_cell1combined_model_of__combined_model_of__external_reservoir_model_combined_model_of__atc_membrane_dnaexp_membrane_combined_model_of__biocrnpyler_269558_k = 1e-10;
  r8_biocrnpyler_269558_cell1combined_model_of__combined_model_of__external_reservoir_model_combined_model_of__atc_membrane_dnaexp_membrane_combined_model_of__biocrnpyler_269558: dna_g_biocrnpyler_269558_cell1combined_model_of__combined_model_of__external_reservoir_model_combined_model_of__atc_membrane_dnaexp_membrane_combined_model_of__biocrnpyler_269558 => dna_g_biocrnpyler_269558_cell1combined_model_of__combined_model_of__external_reservoir_model_combined_model_of__atc_membrane_dnaexp_membrane_combined_model_of__biocrnpyler_269558 + rna_g_biocrnpyler_269558_cell1combined_model_of__combined_model_of__external_reservoir_model_combined_model_of__atc_membrane_dnaexp_membrane_combined_model_of__biocrnpyler_269558; r8_biocrnpyler_269558_cell1combined_model_of__combined_model_of__external_reservoir_model_combined_model_of__atc_membrane_dnaexp_membrane_combined_model_of__biocrnpyler_269558_k*dna_g_biocrnpyler_269558_cell1combined_model_of__combined_model_of__external_reservoir_model_combined_model_of__atc_membrane_dnaexp_membrane_combined_model_of__biocrnpyler_269558;
    r8_biocrnpyler_269558_cell1combined_model_of__combined_model_of__external_reservoir_model_combined_model_of__atc_membrane_dnaexp_membrane_combined_model_of__biocrnpyler_269558_k = 0.0031875;
  r9_biocrnpyler_269558_cell1combined_model_of__combined_model_of__external_reservoir_model_combined_model_of__atc_membrane_dnaexp_membrane_combined_model_of__biocrnpyler_269558: rna_g_biocrnpyler_269558_cell1combined_model_of__combined_model_of__external_reservoir_model_combined_model_of__atc_membrane_dnaexp_membrane_combined_model_of__biocrnpyler_269558 + ATP_biocrnpyler_269558_cell1combined_model_of__combined_model_of__external_reservoir_model_combined_model_of__atc_membrane_dnaexp_membrane_combined_model_of__biocrnpyler_269558 => rna_g_biocrnpyler_269558_cell1combined_model_of__combined_model_of__external_reservoir_model_combined_model_of__atc_membrane_dnaexp_membrane_combined_model_of__biocrnpyler_269558 + ADP_biocrnpyler_269558_cell1combined_model_of__combined_model_of__external_reservoir_model_combined_model_of__atc_membrane_dnaexp_membrane_combined_model_of__biocrnpyler_269558 + VirE2_f_biocrnpyler_269558_cell1combined_model_of__combined_model_of__external_reservoir_model_combined_model_of__atc_membrane_dnaexp_membrane_combined_model_of__biocrnpyler_269558 + P_biocrnpyler_269558_cell1combined_model_of__combined_model_of__external_reservoir_model_combined_model_of__atc_membrane_dnaexp_membrane_combined_model_of__biocrnpyler_269558; r9_biocrnpyler_269558_cell1combined_model_of__combined_model_of__external_reservoir_model_combined_model_of__atc_membrane_dnaexp_membrane_combined_model_of__biocrnpyler_269558_k*rna_g_biocrnpyler_269558_cell1combined_model_of__combined_model_of__external_reservoir_model_combined_model_of__atc_membrane_dnaexp_membrane_combined_model_of__biocrnpyler_269558*ATP_biocrnpyler_269558_cell1combined_model_of__combined_model_of__external_reservoir_model_combined_model_of__atc_membrane_dnaexp_membrane_combined_model_of__biocrnpyler_269558^r9_biocrnpyler_269558_cell1combined_model_of__combined_model_of__external_reservoir_model_combined_model_of__atc_membrane_dnaexp_membrane_combined_model_of__biocrnpyler_269558_n/(ATP_biocrnpyler_269558_cell1combined_model_of__combined_model_of__external_reservoir_model_combined_model_of__atc_membrane_dnaexp_membrane_combined_model_of__biocrnpyler_269558^r9_biocrnpyler_269558_cell1combined_model_of__combined_model_of__external_reservoir_model_combined_model_of__atc_membrane_dnaexp_membrane_combined_model_of__biocrnpyler_269558_n + r9_biocrnpyler_269558_cell1combined_model_of__combined_model_of__external_reservoir_model_combined_model_of__atc_membrane_dnaexp_membrane_combined_model_of__biocrnpyler_269558_K);
    r9_biocrnpyler_269558_cell1combined_model_of__combined_model_of__external_reservoir_model_combined_model_of__atc_membrane_dnaexp_membrane_combined_model_of__biocrnpyler_269558_k = 0.001; r9_biocrnpyler_269558_cell1combined_model_of__combined_model_of__external_reservoir_model_combined_model_of__atc_membrane_dnaexp_membrane_combined_model_of__biocrnpyler_269558_n = 1; r9_biocrnpyler_269558_cell1combined_model_of__combined_model_of__external_reservoir_model_combined_model_of__atc_membrane_dnaexp_membrane_combined_model_of__biocrnpyler_269558_K = 1;
  r10_biocrnpyler_269558_cell1combined_model_of__combined_model_of__external_reservoir_model_combined_model_of__atc_membrane_dnaexp_membrane_combined_model_of__biocrnpyler_269558: VirE2_f_biocrnpyler_269558_cell1combined_model_of__combined_model_of__external_reservoir_model_combined_model_of__atc_membrane_dnaexp_membrane_combined_model_of__biocrnpyler_269558 => VirE2_b_1_combined_cell1combined_model_of__combined_model_of__external_reservoir_model_combined_model_of__atc_membrane_dnaexp_membrane_combined_model_of__biocrnpyler_269558; r10_biocrnpyler_269558_cell1combined_model_of__combined_model_of__external_reservoir_model_combined_model_of__atc_membrane_dnaexp_membrane_combined_model_of__biocrnpyler_269558_k*VirE2_f_biocrnpyler_269558_cell1combined_model_of__combined_model_of__external_reservoir_model_combined_model_of__atc_membrane_dnaexp_membrane_combined_model_of__biocrnpyler_269558;
    r10_biocrnpyler_269558_cell1combined_model_of__combined_model_of__external_reservoir_model_combined_model_of__atc_membrane_dnaexp_membrane_combined_model_of__biocrnpyler_269558_k = 5e-5;
  r10_1_biocrnpyler_269558_cell1combined_model_of__combined_model_of__external_reservoir_model_combined_model_of__atc_membrane_dnaexp_membrane_combined_model_of__biocrnpyler_269558: VirE2_b_1_combined_cell1combined_model_of__combined_model_of__external_reservoir_model_combined_model_of__atc_membrane_dnaexp_membrane_combined_model_of__biocrnpyler_269558 => VirE2_f_biocrnpyler_269558_cell1combined_model_of__combined_model_of__external_reservoir_model_combined_model_of__atc_membrane_dnaexp_membrane_combined_model_of__biocrnpyler_269558; r10_1_biocrnpyler_269558_cell1combined_model_of__combined_model_of__external_reservoir_model_combined_model_of__atc_membrane_dnaexp_membrane_combined_model_of__biocrnpyler_269558_k*VirE2_b_1_combined_cell1combined_model_of__combined_model_of__external_reservoir_model_combined_model_of__atc_membrane_dnaexp_membrane_combined_model_of__biocrnpyler_269558;
    r10_1_biocrnpyler_269558_cell1combined_model_of__combined_model_of__external_reservoir_model_combined_model_of__atc_membrane_dnaexp_membrane_combined_model_of__biocrnpyler_269558_k = 1e-10;
  r12_biocrnpyler_269558_cell1combined_model_of__combined_model_of__external_reservoir_model_combined_model_of__atc_membrane_dnaexp_membrane_combined_model_of__biocrnpyler_269558: rna_g_biocrnpyler_269558_cell1combined_model_of__combined_model_of__external_reservoir_model_combined_model_of__atc_membrane_dnaexp_membrane_combined_model_of__biocrnpyler_269558 => ; r12_biocrnpyler_269558_cell1combined_model_of__combined_model_of__external_reservoir_model_combined_model_of__atc_membrane_dnaexp_membrane_combined_model_of__biocrnpyler_269558_k*rna_g_biocrnpyler_269558_cell1combined_model_of__combined_model_of__external_reservoir_model_combined_model_of__atc_membrane_dnaexp_membrane_combined_model_of__biocrnpyler_269558;
    r12_biocrnpyler_269558_cell1combined_model_of__combined_model_of__external_reservoir_model_combined_model_of__atc_membrane_dnaexp_membrane_combined_model_of__biocrnpyler_269558_k = 0.001;
  r13_biocrnpyler_269558_cell1combined_model_of__combined_model_of__external_reservoir_model_combined_model_of__atc_membrane_dnaexp_membrane_combined_model_of__biocrnpyler_269558: VirE2_f_biocrnpyler_269558_cell1combined_model_of__combined_model_of__external_reservoir_model_combined_model_of__atc_membrane_dnaexp_membrane_combined_model_of__biocrnpyler_269558 => ; r13_biocrnpyler_269558_cell1combined_model_of__combined_model_of__external_reservoir_model_combined_model_of__atc_membrane_dnaexp_membrane_combined_model_of__biocrnpyler_269558_k*VirE2_f_biocrnpyler_269558_cell1combined_model_of__combined_model_of__external_reservoir_model_combined_model_of__atc_membrane_dnaexp_membrane_combined_model_of__biocrnpyler_269558;
    r13_biocrnpyler_269558_cell1combined_model_of__combined_model_of__external_reservoir_model_combined_model_of__atc_membrane_dnaexp_membrane_combined_model_of__biocrnpyler_269558_k = 1e-5;
  r1_cell2_cell2combined_model_of__combined_model_of__external_reservoir_model_combined_model_of__atc_membrane2_combined_model_of__biocrnpyler_77342: atc_e_external_reservoir_model_1_combined_cell1combined_model_of__combined_model_of__external_reservoir_model_combined_model_of__atc_membrane_dnaexp_membrane_combined_model_of__biocrnpyler_269558_1_combined -> atc_i_1_combined_cell2combined_model_of__combined_model_of__external_reservoir_model_combined_model_of__atc_membrane2_combined_model_of__biocrnpyler_77342; kb_combined*atc_e_external_reservoir_model_1_combined_cell1combined_model_of__combined_model_of__external_reservoir_model_combined_model_of__atc_membrane_dnaexp_membrane_combined_model_of__biocrnpyler_269558_1_combined - kd_combined*atc_i_1_combined_cell2combined_model_of__combined_model_of__external_reservoir_model_combined_model_of__atc_membrane2_combined_model_of__biocrnpyler_77342;
  r0_biocrnpyler_77342_cell2combined_model_of__combined_model_of__external_reservoir_model_combined_model_of__atc_membrane2_combined_model_of__biocrnpyler_77342: atc_i_1_combined_cell2combined_model_of__combined_model_of__external_reservoir_model_combined_model_of__atc_membrane2_combined_model_of__biocrnpyler_77342 + tetR_biocrnpyler_77342_cell2combined_model_of__combined_model_of__external_reservoir_model_combined_model_of__atc_membrane2_combined_model_of__biocrnpyler_77342 => complex_atc_i_tetR_biocrnpyler_77342_cell2combined_model_of__combined_model_of__external_reservoir_model_combined_model_of__atc_membrane2_combined_model_of__biocrnpyler_77342; r0_biocrnpyler_77342_cell2combined_model_of__combined_model_of__external_reservoir_model_combined_model_of__atc_membrane2_combined_model_of__biocrnpyler_77342_k*atc_i_1_combined_cell2combined_model_of__combined_model_of__external_reservoir_model_combined_model_of__atc_membrane2_combined_model_of__biocrnpyler_77342*tetR_biocrnpyler_77342_cell2combined_model_of__combined_model_of__external_reservoir_model_combined_model_of__atc_membrane2_combined_model_of__biocrnpyler_77342; r0_biocrnpyler_77342_cell2combined_model_of__combined_model_of__external_reservoir_model_combined_model_of__atc_membrane2_combined_model_of__biocrnpyler_77342 is "r0cell2";
    r0_biocrnpyler_77342_cell2combined_model_of__combined_model_of__external_reservoir_model_combined_model_of__atc_membrane2_combined_model_of__biocrnpyler_77342_k = 2e-5;
  r0_1_biocrnpyler_77342_cell2combined_model_of__combined_model_of__external_reservoir_model_combined_model_of__atc_membrane2_combined_model_of__biocrnpyler_77342: complex_atc_i_tetR_biocrnpyler_77342_cell2combined_model_of__combined_model_of__external_reservoir_model_combined_model_of__atc_membrane2_combined_model_of__biocrnpyler_77342 => atc_i_1_combined_cell2combined_model_of__combined_model_of__external_reservoir_model_combined_model_of__atc_membrane2_combined_model_of__biocrnpyler_77342 + tetR_biocrnpyler_77342_cell2combined_model_of__combined_model_of__external_reservoir_model_combined_model_of__atc_membrane2_combined_model_of__biocrnpyler_77342; r0_1_biocrnpyler_77342_cell2combined_model_of__combined_model_of__external_reservoir_model_combined_model_of__atc_membrane2_combined_model_of__biocrnpyler_77342_k*complex_atc_i_tetR_biocrnpyler_77342_cell2combined_model_of__combined_model_of__external_reservoir_model_combined_model_of__atc_membrane2_combined_model_of__biocrnpyler_77342; r0_1_biocrnpyler_77342_cell2combined_model_of__combined_model_of__external_reservoir_model_combined_model_of__atc_membrane2_combined_model_of__biocrnpyler_77342 is "r0_1cell2";
    r0_1_biocrnpyler_77342_cell2combined_model_of__combined_model_of__external_reservoir_model_combined_model_of__atc_membrane2_combined_model_of__biocrnpyler_77342_k = 2e-9;
  r2_biocrnpyler_77342_cell2combined_model_of__combined_model_of__external_reservoir_model_combined_model_of__atc_membrane2_combined_model_of__biocrnpyler_77342: dna_f_biocrnpyler_77342_cell2combined_model_of__combined_model_of__external_reservoir_model_combined_model_of__atc_membrane2_combined_model_of__biocrnpyler_77342 + tetR_biocrnpyler_77342_cell2combined_model_of__combined_model_of__external_reservoir_model_combined_model_of__atc_membrane2_combined_model_of__biocrnpyler_77342 => complex_dna_f_tetR_biocrnpyler_77342_cell2combined_model_of__combined_model_of__external_reservoir_model_combined_model_of__atc_membrane2_combined_model_of__biocrnpyler_77342; r2_biocrnpyler_77342_cell2combined_model_of__combined_model_of__external_reservoir_model_combined_model_of__atc_membrane2_combined_model_of__biocrnpyler_77342_k*dna_f_biocrnpyler_77342_cell2combined_model_of__combined_model_of__external_reservoir_model_combined_model_of__atc_membrane2_combined_model_of__biocrnpyler_77342*tetR_biocrnpyler_77342_cell2combined_model_of__combined_model_of__external_reservoir_model_combined_model_of__atc_membrane2_combined_model_of__biocrnpyler_77342;
    r2_biocrnpyler_77342_cell2combined_model_of__combined_model_of__external_reservoir_model_combined_model_of__atc_membrane2_combined_model_of__biocrnpyler_77342_k = 4e-7;
  r2_1_biocrnpyler_77342_cell2combined_model_of__combined_model_of__external_reservoir_model_combined_model_of__atc_membrane2_combined_model_of__biocrnpyler_77342: complex_dna_f_tetR_biocrnpyler_77342_cell2combined_model_of__combined_model_of__external_reservoir_model_combined_model_of__atc_membrane2_combined_model_of__biocrnpyler_77342 => dna_f_biocrnpyler_77342_cell2combined_model_of__combined_model_of__external_reservoir_model_combined_model_of__atc_membrane2_combined_model_of__biocrnpyler_77342 + tetR_biocrnpyler_77342_cell2combined_model_of__combined_model_of__external_reservoir_model_combined_model_of__atc_membrane2_combined_model_of__biocrnpyler_77342; r2_1_biocrnpyler_77342_cell2combined_model_of__combined_model_of__external_reservoir_model_combined_model_of__atc_membrane2_combined_model_of__biocrnpyler_77342_k*complex_dna_f_tetR_biocrnpyler_77342_cell2combined_model_of__combined_model_of__external_reservoir_model_combined_model_of__atc_membrane2_combined_model_of__biocrnpyler_77342;
    r2_1_biocrnpyler_77342_cell2combined_model_of__combined_model_of__external_reservoir_model_combined_model_of__atc_membrane2_combined_model_of__biocrnpyler_77342_k = 1e-12;
  r4_biocrnpyler_77342_cell2combined_model_of__combined_model_of__external_reservoir_model_combined_model_of__atc_membrane2_combined_model_of__biocrnpyler_77342: complex_dna_f_tetR_biocrnpyler_77342_cell2combined_model_of__combined_model_of__external_reservoir_model_combined_model_of__atc_membrane2_combined_model_of__biocrnpyler_77342 + atc_i_1_combined_cell2combined_model_of__combined_model_of__external_reservoir_model_combined_model_of__atc_membrane2_combined_model_of__biocrnpyler_77342 => complex_atc_i_dna_f_tetR_biocrnpyler_77342_cell2combined_model_of__combined_model_of__external_reservoir_model_combined_model_of__atc_membrane2_combined_model_of__biocrnpyler_77342; r4_biocrnpyler_77342_cell2combined_model_of__combined_model_of__external_reservoir_model_combined_model_of__atc_membrane2_combined_model_of__biocrnpyler_77342_k*complex_dna_f_tetR_biocrnpyler_77342_cell2combined_model_of__combined_model_of__external_reservoir_model_combined_model_of__atc_membrane2_combined_model_of__biocrnpyler_77342*atc_i_1_combined_cell2combined_model_of__combined_model_of__external_reservoir_model_combined_model_of__atc_membrane2_combined_model_of__biocrnpyler_77342;
    r4_biocrnpyler_77342_cell2combined_model_of__combined_model_of__external_reservoir_model_combined_model_of__atc_membrane2_combined_model_of__biocrnpyler_77342_k = 6e-8;
  r4_1_biocrnpyler_77342_cell2combined_model_of__combined_model_of__external_reservoir_model_combined_model_of__atc_membrane2_combined_model_of__biocrnpyler_77342: complex_atc_i_dna_f_tetR_biocrnpyler_77342_cell2combined_model_of__combined_model_of__external_reservoir_model_combined_model_of__atc_membrane2_combined_model_of__biocrnpyler_77342 => complex_dna_f_tetR_biocrnpyler_77342_cell2combined_model_of__combined_model_of__external_reservoir_model_combined_model_of__atc_membrane2_combined_model_of__biocrnpyler_77342 + atc_i_1_combined_cell2combined_model_of__combined_model_of__external_reservoir_model_combined_model_of__atc_membrane2_combined_model_of__biocrnpyler_77342; r4_1_biocrnpyler_77342_cell2combined_model_of__combined_model_of__external_reservoir_model_combined_model_of__atc_membrane2_combined_model_of__biocrnpyler_77342_k*complex_atc_i_dna_f_tetR_biocrnpyler_77342_cell2combined_model_of__combined_model_of__external_reservoir_model_combined_model_of__atc_membrane2_combined_model_of__biocrnpyler_77342;
    r4_1_biocrnpyler_77342_cell2combined_model_of__combined_model_of__external_reservoir_model_combined_model_of__atc_membrane2_combined_model_of__biocrnpyler_77342_k = 3e-9;
  r6_biocrnpyler_77342_cell2combined_model_of__combined_model_of__external_reservoir_model_combined_model_of__atc_membrane2_combined_model_of__biocrnpyler_77342: complex_atc_i_dna_f_tetR_biocrnpyler_77342_cell2combined_model_of__combined_model_of__external_reservoir_model_combined_model_of__atc_membrane2_combined_model_of__biocrnpyler_77342 => dna_f_biocrnpyler_77342_cell2combined_model_of__combined_model_of__external_reservoir_model_combined_model_of__atc_membrane2_combined_model_of__biocrnpyler_77342 + complex_atc_i_tetR_biocrnpyler_77342_cell2combined_model_of__combined_model_of__external_reservoir_model_combined_model_of__atc_membrane2_combined_model_of__biocrnpyler_77342; r6_biocrnpyler_77342_cell2combined_model_of__combined_model_of__external_reservoir_model_combined_model_of__atc_membrane2_combined_model_of__biocrnpyler_77342_k*complex_atc_i_dna_f_tetR_biocrnpyler_77342_cell2combined_model_of__combined_model_of__external_reservoir_model_combined_model_of__atc_membrane2_combined_model_of__biocrnpyler_77342;
    r6_biocrnpyler_77342_cell2combined_model_of__combined_model_of__external_reservoir_model_combined_model_of__atc_membrane2_combined_model_of__biocrnpyler_77342_k = 5e-5;
  r6_1_biocrnpyler_77342_cell2combined_model_of__combined_model_of__external_reservoir_model_combined_model_of__atc_membrane2_combined_model_of__biocrnpyler_77342: dna_f_biocrnpyler_77342_cell2combined_model_of__combined_model_of__external_reservoir_model_combined_model_of__atc_membrane2_combined_model_of__biocrnpyler_77342 + complex_atc_i_tetR_biocrnpyler_77342_cell2combined_model_of__combined_model_of__external_reservoir_model_combined_model_of__atc_membrane2_combined_model_of__biocrnpyler_77342 => complex_atc_i_dna_f_tetR_biocrnpyler_77342_cell2combined_model_of__combined_model_of__external_reservoir_model_combined_model_of__atc_membrane2_combined_model_of__biocrnpyler_77342; r6_1_biocrnpyler_77342_cell2combined_model_of__combined_model_of__external_reservoir_model_combined_model_of__atc_membrane2_combined_model_of__biocrnpyler_77342_k*dna_f_biocrnpyler_77342_cell2combined_model_of__combined_model_of__external_reservoir_model_combined_model_of__atc_membrane2_combined_model_of__biocrnpyler_77342*complex_atc_i_tetR_biocrnpyler_77342_cell2combined_model_of__combined_model_of__external_reservoir_model_combined_model_of__atc_membrane2_combined_model_of__biocrnpyler_77342;
    r6_1_biocrnpyler_77342_cell2combined_model_of__combined_model_of__external_reservoir_model_combined_model_of__atc_membrane2_combined_model_of__biocrnpyler_77342_k = 1e-10;
  r8_biocrnpyler_77342_cell2combined_model_of__combined_model_of__external_reservoir_model_combined_model_of__atc_membrane2_combined_model_of__biocrnpyler_77342: dna_f_biocrnpyler_77342_cell2combined_model_of__combined_model_of__external_reservoir_model_combined_model_of__atc_membrane2_combined_model_of__biocrnpyler_77342 => dna_f_biocrnpyler_77342_cell2combined_model_of__combined_model_of__external_reservoir_model_combined_model_of__atc_membrane2_combined_model_of__biocrnpyler_77342 + rna_f_biocrnpyler_77342_cell2combined_model_of__combined_model_of__external_reservoir_model_combined_model_of__atc_membrane2_combined_model_of__biocrnpyler_77342; r8_biocrnpyler_77342_cell2combined_model_of__combined_model_of__external_reservoir_model_combined_model_of__atc_membrane2_combined_model_of__biocrnpyler_77342_k*dna_f_biocrnpyler_77342_cell2combined_model_of__combined_model_of__external_reservoir_model_combined_model_of__atc_membrane2_combined_model_of__biocrnpyler_77342;
    r8_biocrnpyler_77342_cell2combined_model_of__combined_model_of__external_reservoir_model_combined_model_of__atc_membrane2_combined_model_of__biocrnpyler_77342_k = 0.001875;
  r9_biocrnpyler_77342_cell2combined_model_of__combined_model_of__external_reservoir_model_combined_model_of__atc_membrane2_combined_model_of__biocrnpyler_77342: rna_f_biocrnpyler_77342_cell2combined_model_of__combined_model_of__external_reservoir_model_combined_model_of__atc_membrane2_combined_model_of__biocrnpyler_77342 + ATP_biocrnpyler_77342_cell2combined_model_of__combined_model_of__external_reservoir_model_combined_model_of__atc_membrane2_combined_model_of__biocrnpyler_77342 => rna_f_biocrnpyler_77342_cell2combined_model_of__combined_model_of__external_reservoir_model_combined_model_of__atc_membrane2_combined_model_of__biocrnpyler_77342 + ADP_biocrnpyler_77342_cell2combined_model_of__combined_model_of__external_reservoir_model_combined_model_of__atc_membrane2_combined_model_of__biocrnpyler_77342 + exsA_biocrnpyler_77342_cell2combined_model_of__combined_model_of__external_reservoir_model_combined_model_of__atc_membrane2_combined_model_of__biocrnpyler_77342 + P_biocrnpyler_77342_cell2combined_model_of__combined_model_of__external_reservoir_model_combined_model_of__atc_membrane2_combined_model_of__biocrnpyler_77342; r9_biocrnpyler_77342_cell2combined_model_of__combined_model_of__external_reservoir_model_combined_model_of__atc_membrane2_combined_model_of__biocrnpyler_77342_k*rna_f_biocrnpyler_77342_cell2combined_model_of__combined_model_of__external_reservoir_model_combined_model_of__atc_membrane2_combined_model_of__biocrnpyler_77342*ATP_biocrnpyler_77342_cell2combined_model_of__combined_model_of__external_reservoir_model_combined_model_of__atc_membrane2_combined_model_of__biocrnpyler_77342^r9_biocrnpyler_77342_cell2combined_model_of__combined_model_of__external_reservoir_model_combined_model_of__atc_membrane2_combined_model_of__biocrnpyler_77342_n/(ATP_biocrnpyler_77342_cell2combined_model_of__combined_model_of__external_reservoir_model_combined_model_of__atc_membrane2_combined_model_of__biocrnpyler_77342^r9_biocrnpyler_77342_cell2combined_model_of__combined_model_of__external_reservoir_model_combined_model_of__atc_membrane2_combined_model_of__biocrnpyler_77342_n + r9_biocrnpyler_77342_cell2combined_model_of__combined_model_of__external_reservoir_model_combined_model_of__atc_membrane2_combined_model_of__biocrnpyler_77342_K);
    r9_biocrnpyler_77342_cell2combined_model_of__combined_model_of__external_reservoir_model_combined_model_of__atc_membrane2_combined_model_of__biocrnpyler_77342_k = 0.0005; r9_biocrnpyler_77342_cell2combined_model_of__combined_model_of__external_reservoir_model_combined_model_of__atc_membrane2_combined_model_of__biocrnpyler_77342_n = 1; r9_biocrnpyler_77342_cell2combined_model_of__combined_model_of__external_reservoir_model_combined_model_of__atc_membrane2_combined_model_of__biocrnpyler_77342_K = 1;
  r10_biocrnpyler_77342_cell2combined_model_of__combined_model_of__external_reservoir_model_combined_model_of__atc_membrane2_combined_model_of__biocrnpyler_77342: rna_f_biocrnpyler_77342_cell2combined_model_of__combined_model_of__external_reservoir_model_combined_model_of__atc_membrane2_combined_model_of__biocrnpyler_77342 => ; r10_biocrnpyler_77342_cell2combined_model_of__combined_model_of__external_reservoir_model_combined_model_of__atc_membrane2_combined_model_of__biocrnpyler_77342_k*rna_f_biocrnpyler_77342_cell2combined_model_of__combined_model_of__external_reservoir_model_combined_model_of__atc_membrane2_combined_model_of__biocrnpyler_77342;
    r10_biocrnpyler_77342_cell2combined_model_of__combined_model_of__external_reservoir_model_combined_model_of__atc_membrane2_combined_model_of__biocrnpyler_77342_k = 0.001;
  r1_cell3_cell3combined_model_of__combined_model_of__external_reservoir_model_combined_model_of__atc_membrane3_combined_model_of__biocrnpyler_872167: atc_e_external_reservoir_model_1_combined_cell1combined_model_of__combined_model_of__external_reservoir_model_combined_model_of__atc_membrane_dnaexp_membrane_combined_model_of__biocrnpyler_269558_1_combined -> atc_i_cell3combined_model_of__combined_model_of__external_reservoir_model_combined_model_of__atc_membrane3_combined_model_of__biocrnpyler_872167; kb_combined*atc_e_external_reservoir_model_1_combined_cell1combined_model_of__combined_model_of__external_reservoir_model_combined_model_of__atc_membrane_dnaexp_membrane_combined_model_of__biocrnpyler_269558_1_combined - kd_combined*atc_i_cell3combined_model_of__combined_model_of__external_reservoir_model_combined_model_of__atc_membrane3_combined_model_of__biocrnpyler_872167;
  r0_biocrnpyler_872167_cell3combined_model_of__combined_model_of__external_reservoir_model_combined_model_of__atc_membrane3_combined_model_of__biocrnpyler_872167: dna_h_biocrnpyler_872167_cell3combined_model_of__combined_model_of__external_reservoir_model_combined_model_of__atc_membrane3_combined_model_of__biocrnpyler_872167 + exsA_biocrnpyler_872167_cell3combined_model_of__combined_model_of__external_reservoir_model_combined_model_of__atc_membrane3_combined_model_of__biocrnpyler_872167 => complex_dna_h_exsA_biocrnpyler_872167_cell3combined_model_of__combined_model_of__external_reservoir_model_combined_model_of__atc_membrane3_combined_model_of__biocrnpyler_872167; r0_biocrnpyler_872167_cell3combined_model_of__combined_model_of__external_reservoir_model_combined_model_of__atc_membrane3_combined_model_of__biocrnpyler_872167_k*dna_h_biocrnpyler_872167_cell3combined_model_of__combined_model_of__external_reservoir_model_combined_model_of__atc_membrane3_combined_model_of__biocrnpyler_872167*exsA_biocrnpyler_872167_cell3combined_model_of__combined_model_of__external_reservoir_model_combined_model_of__atc_membrane3_combined_model_of__biocrnpyler_872167;
    r0_biocrnpyler_872167_cell3combined_model_of__combined_model_of__external_reservoir_model_combined_model_of__atc_membrane3_combined_model_of__biocrnpyler_872167_k = 4e-5;
  r0_1_biocrnpyler_872167_cell3combined_model_of__combined_model_of__external_reservoir_model_combined_model_of__atc_membrane3_combined_model_of__biocrnpyler_872167: complex_dna_h_exsA_biocrnpyler_872167_cell3combined_model_of__combined_model_of__external_reservoir_model_combined_model_of__atc_membrane3_combined_model_of__biocrnpyler_872167 => dna_h_biocrnpyler_872167_cell3combined_model_of__combined_model_of__external_reservoir_model_combined_model_of__atc_membrane3_combined_model_of__biocrnpyler_872167 + exsA_biocrnpyler_872167_cell3combined_model_of__combined_model_of__external_reservoir_model_combined_model_of__atc_membrane3_combined_model_of__biocrnpyler_872167; r0_1_biocrnpyler_872167_cell3combined_model_of__combined_model_of__external_reservoir_model_combined_model_of__atc_membrane3_combined_model_of__biocrnpyler_872167_k*complex_dna_h_exsA_biocrnpyler_872167_cell3combined_model_of__combined_model_of__external_reservoir_model_combined_model_of__atc_membrane3_combined_model_of__biocrnpyler_872167;
    r0_1_biocrnpyler_872167_cell3combined_model_of__combined_model_of__external_reservoir_model_combined_model_of__atc_membrane3_combined_model_of__biocrnpyler_872167_k = 1e-12;
  r2_biocrnpyler_872167_cell3combined_model_of__combined_model_of__external_reservoir_model_combined_model_of__atc_membrane3_combined_model_of__biocrnpyler_872167: complex_dna_h_exsA_biocrnpyler_872167_cell3combined_model_of__combined_model_of__external_reservoir_model_combined_model_of__atc_membrane3_combined_model_of__biocrnpyler_872167 => complex_dna_h_exsA_biocrnpyler_872167_cell3combined_model_of__combined_model_of__external_reservoir_model_combined_model_of__atc_membrane3_combined_model_of__biocrnpyler_872167 + rna_h_biocrnpyler_872167_cell3combined_model_of__combined_model_of__external_reservoir_model_combined_model_of__atc_membrane3_combined_model_of__biocrnpyler_872167; r2_biocrnpyler_872167_cell3combined_model_of__combined_model_of__external_reservoir_model_combined_model_of__atc_membrane3_combined_model_of__biocrnpyler_872167_k*complex_dna_h_exsA_biocrnpyler_872167_cell3combined_model_of__combined_model_of__external_reservoir_model_combined_model_of__atc_membrane3_combined_model_of__biocrnpyler_872167;
    r2_biocrnpyler_872167_cell3combined_model_of__combined_model_of__external_reservoir_model_combined_model_of__atc_membrane3_combined_model_of__biocrnpyler_872167_k = 0.001875;
  r3_biocrnpyler_872167_cell3combined_model_of__combined_model_of__external_reservoir_model_combined_model_of__atc_membrane3_combined_model_of__biocrnpyler_872167: rna_h_biocrnpyler_872167_cell3combined_model_of__combined_model_of__external_reservoir_model_combined_model_of__atc_membrane3_combined_model_of__biocrnpyler_872167 + ATP_biocrnpyler_872167_cell3combined_model_of__combined_model_of__external_reservoir_model_combined_model_of__atc_membrane3_combined_model_of__biocrnpyler_872167 => rna_h_biocrnpyler_872167_cell3combined_model_of__combined_model_of__external_reservoir_model_combined_model_of__atc_membrane3_combined_model_of__biocrnpyler_872167 + ADP_biocrnpyler_872167_cell3combined_model_of__combined_model_of__external_reservoir_model_combined_model_of__atc_membrane3_combined_model_of__biocrnpyler_872167 + gfp_biocrnpyler_872167_cell3combined_model_of__combined_model_of__external_reservoir_model_combined_model_of__atc_membrane3_combined_model_of__biocrnpyler_872167 + P_biocrnpyler_872167_cell3combined_model_of__combined_model_of__external_reservoir_model_combined_model_of__atc_membrane3_combined_model_of__biocrnpyler_872167; r3_biocrnpyler_872167_cell3combined_model_of__combined_model_of__external_reservoir_model_combined_model_of__atc_membrane3_combined_model_of__biocrnpyler_872167_k*rna_h_biocrnpyler_872167_cell3combined_model_of__combined_model_of__external_reservoir_model_combined_model_of__atc_membrane3_combined_model_of__biocrnpyler_872167*ATP_biocrnpyler_872167_cell3combined_model_of__combined_model_of__external_reservoir_model_combined_model_of__atc_membrane3_combined_model_of__biocrnpyler_872167^r3_biocrnpyler_872167_cell3combined_model_of__combined_model_of__external_reservoir_model_combined_model_of__atc_membrane3_combined_model_of__biocrnpyler_872167_n/(ATP_biocrnpyler_872167_cell3combined_model_of__combined_model_of__external_reservoir_model_combined_model_of__atc_membrane3_combined_model_of__biocrnpyler_872167^r3_biocrnpyler_872167_cell3combined_model_of__combined_model_of__external_reservoir_model_combined_model_of__atc_membrane3_combined_model_of__biocrnpyler_872167_n + r3_biocrnpyler_872167_cell3combined_model_of__combined_model_of__external_reservoir_model_combined_model_of__atc_membrane3_combined_model_of__biocrnpyler_872167_K);
    r3_biocrnpyler_872167_cell3combined_model_of__combined_model_of__external_reservoir_model_combined_model_of__atc_membrane3_combined_model_of__biocrnpyler_872167_k = 0.0005; r3_biocrnpyler_872167_cell3combined_model_of__combined_model_of__external_reservoir_model_combined_model_of__atc_membrane3_combined_model_of__biocrnpyler_872167_n = 1; r3_biocrnpyler_872167_cell3combined_model_of__combined_model_of__external_reservoir_model_combined_model_of__atc_membrane3_combined_model_of__biocrnpyler_872167_K = 1;
  r4_biocrnpyler_872167_cell3combined_model_of__combined_model_of__external_reservoir_model_combined_model_of__atc_membrane3_combined_model_of__biocrnpyler_872167: rna_h_biocrnpyler_872167_cell3combined_model_of__combined_model_of__external_reservoir_model_combined_model_of__atc_membrane3_combined_model_of__biocrnpyler_872167 => ; r4_biocrnpyler_872167_cell3combined_model_of__combined_model_of__external_reservoir_model_combined_model_of__atc_membrane3_combined_model_of__biocrnpyler_872167_k*rna_h_biocrnpyler_872167_cell3combined_model_of__combined_model_of__external_reservoir_model_combined_model_of__atc_membrane3_combined_model_of__biocrnpyler_872167;
    r4_biocrnpyler_872167_cell3combined_model_of__combined_model_of__external_reservoir_model_combined_model_of__atc_membrane3_combined_model_of__biocrnpyler_872167_k = 0.001;
  raa1: ssDNA_comp1_cell2combined_model_of__combined_model_of__external_reservoir_model_combined_model_of__atc_membrane2_combined_model_of__biocrnpyler_77342 + ssDNA_comp2_cell3combined_model_of__combined_model_of__external_reservoir_model_combined_model_of__atc_membrane3_combined_model_of__biocrnpyler_872167 + ssDNA_e_cell1combined_model_of__combined_model_of__external_reservoir_model_combined_model_of__atc_membrane_dnaexp_membrane_combined_model_of__biocrnpyler_269558 -> dsDNA; kf*ssDNA_comp1*ssDNA_comp2*ssDNA_e - kre*dsDNA;

  // Unit definitions:
  unit square_metre = metre^2;
  unit per_second = 1 / second;
  unit substance = dimensionless;
end
