// SBML level 3 version 2

model dnaexp_membrane()
  // model units - substance: substance, time: second, extent: mole

  // Compartments:
  compartment internal = 1e-6 litre;
  compartment external = 1e-6 litre;

  // Species:
  species ssDNA_e in external = 0;
  species ssDNA in internal = 0;
  species VirE2_b in internal = 1;
  species VirE2_b_ssDNA in internal = 0;

  // Parameters:
  kb = 0.2 per_second;
  kd = 0.01 per_second;

  // Reactions:
  R1: VirE2_b + ssDNA -> VirE2_b_ssDNA; kb*VirE2_b*ssDNA - kd*VirE2_b_ssDNA;
  R2: VirE2_b_ssDNA -> ssDNA_e + VirE2_b; kd*VirE2_b_ssDNA - kb*VirE2_b*ssDNA_e;

  // Unit definitions:
  unit per_second = 1 / second;
  unit substance = dimensionless;
end
