// SBML level 3 version 2

model combined_model_of__combined_model_of__external_reservoir_model_combined_model_of__atc_membrane2_combined_model_of__biocrnpyler_624668()
  // model units - substance: mole, time: second, volume: litre, area: square_metre, length: metre, extent: mole

  // Compartments:
  compartment cell_external = 0.0001 litre;
  compartment cell_2_internal_combined = 1e-6 litre;

  // Species:
  species atc_e_external_reservoir_model_1_combined in cell_external = 10000;
  species atc_i_cell2 in cell_2_internal_combined = 0;
  species ssDNA_comp1 in cell_2_internal_combined = 10;
  species enzyme_VioA_biocrnpyler_624668 in cell_2_internal_combined = 0;
  species complex_dna_dna_vioA_protein_RNAP_biocrnpyler_624668 in cell_2_internal_combined = 0;
  species protein_Ribo_biocrnpyler_624668 in cell_2_internal_combined = 24;
  species complex_protein_Ribo_transcript_vioA_biocrnpyler_624668 in cell_2_internal_combined = 0;
  species dna_dna_vioA_biocrnpyler_624668 in cell_2_internal_combined = 10;
  species transcript_vioA_biocrnpyler_624668 in cell_2_internal_combined = 0;
  species protein_RNAase_biocrnpyler_624668 in cell_2_internal_combined = 6;
  species complex_protein_RNAase_transcript_vioA_biocrnpyler_624668 in cell_2_internal_combined = 0;
  species protein_RNAP_biocrnpyler_624668 in cell_2_internal_combined = 3;
  species enzyme_VioB_biocrnpyler_624668 in cell_2_internal_combined = 0;
  species complex_protein_RNAase_transcript_vioB_biocrnpyler_624668 in cell_2_internal_combined = 0;
  species complex_protein_Ribo_transcript_vioB_biocrnpyler_624668 in cell_2_internal_combined = 0;
  species complex_dna_dna_vioB_protein_RNAP_biocrnpyler_624668 in cell_2_internal_combined = 0;
  species transcript_vioB_biocrnpyler_624668 in cell_2_internal_combined = 0;
  species dna_dna_vioB_biocrnpyler_624668 in cell_2_internal_combined = 10;
  species enzyme_VioE_biocrnpyler_624668 in cell_2_internal_combined = 0;
  species complex_protein_Ribo_transcript_vioE_biocrnpyler_624668 in cell_2_internal_combined = 0;
  species complex_protein_RNAase_transcript_vioE_biocrnpyler_624668 in cell_2_internal_combined = 0;
  species dna_dna_vioE_biocrnpyler_624668 in cell_2_internal_combined = 10;
  species transcript_vioE_biocrnpyler_624668 in cell_2_internal_combined = 0;
  species complex_dna_dna_vioE_protein_RNAP_biocrnpyler_624668 in cell_2_internal_combined = 0;
  species transcript_vioD_biocrnpyler_624668 in cell_2_internal_combined = 0;
  species complex_protein_Ribo_transcript_vioD_biocrnpyler_624668 in cell_2_internal_combined = 0;
  species complex_dna_dna_vioD_protein_RNAP_biocrnpyler_624668 in cell_2_internal_combined = 0;
  species enzyme_VioD_biocrnpyler_624668 in cell_2_internal_combined = 0;
  species complex_protein_RNAase_transcript_vioD_biocrnpyler_624668 in cell_2_internal_combined = 0;
  species dna_dna_vioD_biocrnpyler_624668 in cell_2_internal_combined = 10;
  species TRP_biocrnpyler_624668 in cell_2_internal_combined = 10;
  species IPA_imine_biocrnpyler_624668 in cell_2_internal_combined = 0;
  species complex_TRP_enzyme_VioA_biocrnpyler_624668 in cell_2_internal_combined = 0;
  species IPA_imine_dimer_biocrnpyler_624668 in cell_2_internal_combined = 0;
  species complex_2x_IPA_imine_enzyme_VioB_biocrnpyler_624668 in cell_2_internal_combined = 0;
  species PTDVA_biocrnpyler_624668 in cell_2_internal_combined = 0;
  species complex_IPA_imine_dimer_enzyme_VioE_biocrnpyler_624668 in cell_2_internal_combined = 0;
  species PTVA_biocrnpyler_624668 in cell_2_internal_combined = 0;
  species complex_PTDVA_enzyme_VioD_biocrnpyler_624668 in cell_2_internal_combined = 0;

  // Parameters:
  kb = 0.002 per_second;
  kd = 1e-5 per_second;

  // Reactions:
  r1_cell2: atc_e_external_reservoir_model_1_combined -> atc_i_cell2; kb*atc_e_external_reservoir_model_1_combined - kd*atc_i_cell2;
  r0_biocrnpyler_624668: dna_dna_vioA_biocrnpyler_624668 + protein_RNAP_biocrnpyler_624668 => complex_dna_dna_vioA_protein_RNAP_biocrnpyler_624668; r0_biocrnpyler_624668_k*dna_dna_vioA_biocrnpyler_624668*protein_RNAP_biocrnpyler_624668;
    r0_biocrnpyler_624668_k = 100;
  r0_1_biocrnpyler_624668: complex_dna_dna_vioA_protein_RNAP_biocrnpyler_624668 => dna_dna_vioA_biocrnpyler_624668 + protein_RNAP_biocrnpyler_624668; r0_1_biocrnpyler_624668_k*complex_dna_dna_vioA_protein_RNAP_biocrnpyler_624668;
    r0_1_biocrnpyler_624668_k = 10;
  r2_biocrnpyler_624668: complex_dna_dna_vioA_protein_RNAP_biocrnpyler_624668 => dna_dna_vioA_biocrnpyler_624668 + transcript_vioA_biocrnpyler_624668 + protein_RNAP_biocrnpyler_624668; r2_biocrnpyler_624668_k*complex_dna_dna_vioA_protein_RNAP_biocrnpyler_624668;
    r2_biocrnpyler_624668_k = 0.05;
  r3_biocrnpyler_624668: transcript_vioA_biocrnpyler_624668 + protein_Ribo_biocrnpyler_624668 => complex_protein_Ribo_transcript_vioA_biocrnpyler_624668; r3_biocrnpyler_624668_k*transcript_vioA_biocrnpyler_624668*protein_Ribo_biocrnpyler_624668;
    r3_biocrnpyler_624668_k = 100;
  r3_1_biocrnpyler_624668: complex_protein_Ribo_transcript_vioA_biocrnpyler_624668 => transcript_vioA_biocrnpyler_624668 + protein_Ribo_biocrnpyler_624668; r3_1_biocrnpyler_624668_k*complex_protein_Ribo_transcript_vioA_biocrnpyler_624668;
    r3_1_biocrnpyler_624668_k = 10;
  r5_biocrnpyler_624668: complex_protein_Ribo_transcript_vioA_biocrnpyler_624668 => transcript_vioA_biocrnpyler_624668 + enzyme_VioA_biocrnpyler_624668 + protein_Ribo_biocrnpyler_624668; r5_biocrnpyler_624668_k*complex_protein_Ribo_transcript_vioA_biocrnpyler_624668;
    r5_biocrnpyler_624668_k = 0.05;
  r6_biocrnpyler_624668: transcript_vioA_biocrnpyler_624668 + protein_RNAase_biocrnpyler_624668 => complex_protein_RNAase_transcript_vioA_biocrnpyler_624668; r6_biocrnpyler_624668_k*transcript_vioA_biocrnpyler_624668*protein_RNAase_biocrnpyler_624668;
    r6_biocrnpyler_624668_k = 100;
  r6_1_biocrnpyler_624668: complex_protein_RNAase_transcript_vioA_biocrnpyler_624668 => transcript_vioA_biocrnpyler_624668 + protein_RNAase_biocrnpyler_624668; r6_1_biocrnpyler_624668_k*complex_protein_RNAase_transcript_vioA_biocrnpyler_624668;
    r6_1_biocrnpyler_624668_k = 10;
  r8_biocrnpyler_624668: complex_protein_RNAase_transcript_vioA_biocrnpyler_624668 => protein_RNAase_biocrnpyler_624668; r8_biocrnpyler_624668_k*complex_protein_RNAase_transcript_vioA_biocrnpyler_624668;
    r8_biocrnpyler_624668_k = 0.001;
  r9_biocrnpyler_624668: dna_dna_vioB_biocrnpyler_624668 + protein_RNAP_biocrnpyler_624668 => complex_dna_dna_vioB_protein_RNAP_biocrnpyler_624668; r9_biocrnpyler_624668_k*dna_dna_vioB_biocrnpyler_624668*protein_RNAP_biocrnpyler_624668;
    r9_biocrnpyler_624668_k = 100;
  r9_1_biocrnpyler_624668: complex_dna_dna_vioB_protein_RNAP_biocrnpyler_624668 => dna_dna_vioB_biocrnpyler_624668 + protein_RNAP_biocrnpyler_624668; r9_1_biocrnpyler_624668_k*complex_dna_dna_vioB_protein_RNAP_biocrnpyler_624668;
    r9_1_biocrnpyler_624668_k = 10;
  r11_biocrnpyler_624668: complex_dna_dna_vioB_protein_RNAP_biocrnpyler_624668 => dna_dna_vioB_biocrnpyler_624668 + transcript_vioB_biocrnpyler_624668 + protein_RNAP_biocrnpyler_624668; r11_biocrnpyler_624668_k*complex_dna_dna_vioB_protein_RNAP_biocrnpyler_624668;
    r11_biocrnpyler_624668_k = 0.05;
  r12_biocrnpyler_624668: transcript_vioB_biocrnpyler_624668 + protein_Ribo_biocrnpyler_624668 => complex_protein_Ribo_transcript_vioB_biocrnpyler_624668; r12_biocrnpyler_624668_k*transcript_vioB_biocrnpyler_624668*protein_Ribo_biocrnpyler_624668;
    r12_biocrnpyler_624668_k = 100;
  r12_1_biocrnpyler_624668: complex_protein_Ribo_transcript_vioB_biocrnpyler_624668 => transcript_vioB_biocrnpyler_624668 + protein_Ribo_biocrnpyler_624668; r12_1_biocrnpyler_624668_k*complex_protein_Ribo_transcript_vioB_biocrnpyler_624668;
    r12_1_biocrnpyler_624668_k = 10;
  r14_biocrnpyler_624668: complex_protein_Ribo_transcript_vioB_biocrnpyler_624668 => transcript_vioB_biocrnpyler_624668 + enzyme_VioB_biocrnpyler_624668 + protein_Ribo_biocrnpyler_624668; r14_biocrnpyler_624668_k*complex_protein_Ribo_transcript_vioB_biocrnpyler_624668;
    r14_biocrnpyler_624668_k = 0.05;
  r15_biocrnpyler_624668: transcript_vioB_biocrnpyler_624668 + protein_RNAase_biocrnpyler_624668 => complex_protein_RNAase_transcript_vioB_biocrnpyler_624668; r15_biocrnpyler_624668_k*transcript_vioB_biocrnpyler_624668*protein_RNAase_biocrnpyler_624668;
    r15_biocrnpyler_624668_k = 100;
  r15_1_biocrnpyler_624668: complex_protein_RNAase_transcript_vioB_biocrnpyler_624668 => transcript_vioB_biocrnpyler_624668 + protein_RNAase_biocrnpyler_624668; r15_1_biocrnpyler_624668_k*complex_protein_RNAase_transcript_vioB_biocrnpyler_624668;
    r15_1_biocrnpyler_624668_k = 10;
  r17_biocrnpyler_624668: complex_protein_RNAase_transcript_vioB_biocrnpyler_624668 => protein_RNAase_biocrnpyler_624668; r17_biocrnpyler_624668_k*complex_protein_RNAase_transcript_vioB_biocrnpyler_624668;
    r17_biocrnpyler_624668_k = 0.001;
  r18_biocrnpyler_624668: dna_dna_vioE_biocrnpyler_624668 + protein_RNAP_biocrnpyler_624668 => complex_dna_dna_vioE_protein_RNAP_biocrnpyler_624668; r18_biocrnpyler_624668_k*dna_dna_vioE_biocrnpyler_624668*protein_RNAP_biocrnpyler_624668;
    r18_biocrnpyler_624668_k = 100;
  r18_1_biocrnpyler_624668: complex_dna_dna_vioE_protein_RNAP_biocrnpyler_624668 => dna_dna_vioE_biocrnpyler_624668 + protein_RNAP_biocrnpyler_624668; r18_1_biocrnpyler_624668_k*complex_dna_dna_vioE_protein_RNAP_biocrnpyler_624668;
    r18_1_biocrnpyler_624668_k = 10;
  r20_biocrnpyler_624668: complex_dna_dna_vioE_protein_RNAP_biocrnpyler_624668 => dna_dna_vioE_biocrnpyler_624668 + transcript_vioE_biocrnpyler_624668 + protein_RNAP_biocrnpyler_624668; r20_biocrnpyler_624668_k*complex_dna_dna_vioE_protein_RNAP_biocrnpyler_624668;
    r20_biocrnpyler_624668_k = 0.05;
  r21_biocrnpyler_624668: transcript_vioE_biocrnpyler_624668 + protein_Ribo_biocrnpyler_624668 => complex_protein_Ribo_transcript_vioE_biocrnpyler_624668; r21_biocrnpyler_624668_k*transcript_vioE_biocrnpyler_624668*protein_Ribo_biocrnpyler_624668;
    r21_biocrnpyler_624668_k = 100;
  r21_1_biocrnpyler_624668: complex_protein_Ribo_transcript_vioE_biocrnpyler_624668 => transcript_vioE_biocrnpyler_624668 + protein_Ribo_biocrnpyler_624668; r21_1_biocrnpyler_624668_k*complex_protein_Ribo_transcript_vioE_biocrnpyler_624668;
    r21_1_biocrnpyler_624668_k = 10;
  r23_biocrnpyler_624668: complex_protein_Ribo_transcript_vioE_biocrnpyler_624668 => transcript_vioE_biocrnpyler_624668 + enzyme_VioE_biocrnpyler_624668 + protein_Ribo_biocrnpyler_624668; r23_biocrnpyler_624668_k*complex_protein_Ribo_transcript_vioE_biocrnpyler_624668;
    r23_biocrnpyler_624668_k = 0.05;
  r24_biocrnpyler_624668: transcript_vioE_biocrnpyler_624668 + protein_RNAase_biocrnpyler_624668 => complex_protein_RNAase_transcript_vioE_biocrnpyler_624668; r24_biocrnpyler_624668_k*transcript_vioE_biocrnpyler_624668*protein_RNAase_biocrnpyler_624668;
    r24_biocrnpyler_624668_k = 100;
  r24_1_biocrnpyler_624668: complex_protein_RNAase_transcript_vioE_biocrnpyler_624668 => transcript_vioE_biocrnpyler_624668 + protein_RNAase_biocrnpyler_624668; r24_1_biocrnpyler_624668_k*complex_protein_RNAase_transcript_vioE_biocrnpyler_624668;
    r24_1_biocrnpyler_624668_k = 10;
  r26_biocrnpyler_624668: complex_protein_RNAase_transcript_vioE_biocrnpyler_624668 => protein_RNAase_biocrnpyler_624668; r26_biocrnpyler_624668_k*complex_protein_RNAase_transcript_vioE_biocrnpyler_624668;
    r26_biocrnpyler_624668_k = 0.001;
  r27_biocrnpyler_624668: dna_dna_vioD_biocrnpyler_624668 + protein_RNAP_biocrnpyler_624668 => complex_dna_dna_vioD_protein_RNAP_biocrnpyler_624668; r27_biocrnpyler_624668_k*dna_dna_vioD_biocrnpyler_624668*protein_RNAP_biocrnpyler_624668;
    r27_biocrnpyler_624668_k = 100;
  r27_1_biocrnpyler_624668: complex_dna_dna_vioD_protein_RNAP_biocrnpyler_624668 => dna_dna_vioD_biocrnpyler_624668 + protein_RNAP_biocrnpyler_624668; r27_1_biocrnpyler_624668_k*complex_dna_dna_vioD_protein_RNAP_biocrnpyler_624668;
    r27_1_biocrnpyler_624668_k = 10;
  r29_biocrnpyler_624668: complex_dna_dna_vioD_protein_RNAP_biocrnpyler_624668 => dna_dna_vioD_biocrnpyler_624668 + transcript_vioD_biocrnpyler_624668 + protein_RNAP_biocrnpyler_624668; r29_biocrnpyler_624668_k*complex_dna_dna_vioD_protein_RNAP_biocrnpyler_624668;
    r29_biocrnpyler_624668_k = 0.05;
  r30_biocrnpyler_624668: transcript_vioD_biocrnpyler_624668 + protein_Ribo_biocrnpyler_624668 => complex_protein_Ribo_transcript_vioD_biocrnpyler_624668; r30_biocrnpyler_624668_k*transcript_vioD_biocrnpyler_624668*protein_Ribo_biocrnpyler_624668;
    r30_biocrnpyler_624668_k = 100;
  r30_1_biocrnpyler_624668: complex_protein_Ribo_transcript_vioD_biocrnpyler_624668 => transcript_vioD_biocrnpyler_624668 + protein_Ribo_biocrnpyler_624668; r30_1_biocrnpyler_624668_k*complex_protein_Ribo_transcript_vioD_biocrnpyler_624668;
    r30_1_biocrnpyler_624668_k = 10;
  r32_biocrnpyler_624668: complex_protein_Ribo_transcript_vioD_biocrnpyler_624668 => transcript_vioD_biocrnpyler_624668 + enzyme_VioD_biocrnpyler_624668 + protein_Ribo_biocrnpyler_624668; r32_biocrnpyler_624668_k*complex_protein_Ribo_transcript_vioD_biocrnpyler_624668;
    r32_biocrnpyler_624668_k = 0.05;
  r33_biocrnpyler_624668: transcript_vioD_biocrnpyler_624668 + protein_RNAase_biocrnpyler_624668 => complex_protein_RNAase_transcript_vioD_biocrnpyler_624668; r33_biocrnpyler_624668_k*transcript_vioD_biocrnpyler_624668*protein_RNAase_biocrnpyler_624668;
    r33_biocrnpyler_624668_k = 100;
  r33_1_biocrnpyler_624668: complex_protein_RNAase_transcript_vioD_biocrnpyler_624668 => transcript_vioD_biocrnpyler_624668 + protein_RNAase_biocrnpyler_624668; r33_1_biocrnpyler_624668_k*complex_protein_RNAase_transcript_vioD_biocrnpyler_624668;
    r33_1_biocrnpyler_624668_k = 10;
  r35_biocrnpyler_624668: complex_protein_RNAase_transcript_vioD_biocrnpyler_624668 => protein_RNAase_biocrnpyler_624668; r35_biocrnpyler_624668_k*complex_protein_RNAase_transcript_vioD_biocrnpyler_624668;
    r35_biocrnpyler_624668_k = 0.001;
  r36_biocrnpyler_624668: TRP_biocrnpyler_624668 + enzyme_VioA_biocrnpyler_624668 => complex_TRP_enzyme_VioA_biocrnpyler_624668; r36_biocrnpyler_624668_k*TRP_biocrnpyler_624668*enzyme_VioA_biocrnpyler_624668;
    r36_biocrnpyler_624668_k = 0.002777778;
  r36_1_biocrnpyler_624668: complex_TRP_enzyme_VioA_biocrnpyler_624668 => TRP_biocrnpyler_624668 + enzyme_VioA_biocrnpyler_624668; r36_1_biocrnpyler_624668_k*complex_TRP_enzyme_VioA_biocrnpyler_624668;
    r36_1_biocrnpyler_624668_k = 0.0002777778;
  r38_biocrnpyler_624668: complex_TRP_enzyme_VioA_biocrnpyler_624668 => IPA_imine_biocrnpyler_624668 + enzyme_VioA_biocrnpyler_624668; r38_biocrnpyler_624668_k*complex_TRP_enzyme_VioA_biocrnpyler_624668;
    r38_biocrnpyler_624668_k = 0.0009388889;
  r39_biocrnpyler_624668: 2 IPA_imine_biocrnpyler_624668 + enzyme_VioB_biocrnpyler_624668 => complex_2x_IPA_imine_enzyme_VioB_biocrnpyler_624668; r39_biocrnpyler_624668_k*IPA_imine_biocrnpyler_624668^2*enzyme_VioB_biocrnpyler_624668;
    r39_biocrnpyler_624668_k = 0.002777778;
  r39_1_biocrnpyler_624668: complex_2x_IPA_imine_enzyme_VioB_biocrnpyler_624668 => 2 IPA_imine_biocrnpyler_624668 + enzyme_VioB_biocrnpyler_624668; r39_1_biocrnpyler_624668_k*complex_2x_IPA_imine_enzyme_VioB_biocrnpyler_624668;
    r39_1_biocrnpyler_624668_k = 0.0002777778;
  r41_biocrnpyler_624668: complex_2x_IPA_imine_enzyme_VioB_biocrnpyler_624668 => IPA_imine_dimer_biocrnpyler_624668 + enzyme_VioB_biocrnpyler_624668; r41_biocrnpyler_624668_k*complex_2x_IPA_imine_enzyme_VioB_biocrnpyler_624668;
    r41_biocrnpyler_624668_k = 1.25;
  r42_biocrnpyler_624668: IPA_imine_dimer_biocrnpyler_624668 + enzyme_VioE_biocrnpyler_624668 => complex_IPA_imine_dimer_enzyme_VioE_biocrnpyler_624668; r42_biocrnpyler_624668_k*IPA_imine_dimer_biocrnpyler_624668*enzyme_VioE_biocrnpyler_624668;
    r42_biocrnpyler_624668_k = 100;
  r42_1_biocrnpyler_624668: complex_IPA_imine_dimer_enzyme_VioE_biocrnpyler_624668 => IPA_imine_dimer_biocrnpyler_624668 + enzyme_VioE_biocrnpyler_624668; r42_1_biocrnpyler_624668_k*complex_IPA_imine_dimer_enzyme_VioE_biocrnpyler_624668;
    r42_1_biocrnpyler_624668_k = 10;
  r44_biocrnpyler_624668: complex_IPA_imine_dimer_enzyme_VioE_biocrnpyler_624668 => PTDVA_biocrnpyler_624668 + enzyme_VioE_biocrnpyler_624668; r44_biocrnpyler_624668_k*complex_IPA_imine_dimer_enzyme_VioE_biocrnpyler_624668;
    r44_biocrnpyler_624668_k = 0.02777778;
  r45_biocrnpyler_624668: PTDVA_biocrnpyler_624668 + enzyme_VioD_biocrnpyler_624668 => complex_PTDVA_enzyme_VioD_biocrnpyler_624668; r45_biocrnpyler_624668_k*PTDVA_biocrnpyler_624668*enzyme_VioD_biocrnpyler_624668;
    r45_biocrnpyler_624668_k = 100;
  r45_1_biocrnpyler_624668: complex_PTDVA_enzyme_VioD_biocrnpyler_624668 => PTDVA_biocrnpyler_624668 + enzyme_VioD_biocrnpyler_624668; r45_1_biocrnpyler_624668_k*complex_PTDVA_enzyme_VioD_biocrnpyler_624668;
    r45_1_biocrnpyler_624668_k = 10;
  r47_biocrnpyler_624668: complex_PTDVA_enzyme_VioD_biocrnpyler_624668 => PTVA_biocrnpyler_624668 + enzyme_VioD_biocrnpyler_624668; r47_biocrnpyler_624668_k*complex_PTDVA_enzyme_VioD_biocrnpyler_624668;
    r47_biocrnpyler_624668_k = 0.02777778;

  // Unit definitions:
  unit square_metre = metre^2;
  unit per_second = 1 / second;
  unit substance = dimensionless;
end
