// SBML level 3 version 2

model combined_model_of__combined_model_of__external_reservoir_model_combined_model_of__atc_membrane3_combined_model_of__biocrnpyler_693963()
  // model units - substance: mole, time: second, volume: litre, area: square_metre, length: metre, extent: mole

  // Compartments:
  compartment cell_external = 0.0001 litre;
  compartment cell_3_internal_combined = 1e-6 litre;

  // Species:
  species atc_e_external_reservoir_model_1_combined in cell_external = 10000;
  species atc_i_cell3 in cell_3_internal_combined = 0;
  species ssDNA_comp2 in cell_3_internal_combined = 10;
  species complex_protein_Ribo_transcript_vioC_biocrnpyler_693963 in cell_3_internal_combined = 0;
  species complex_dna_dna_vioC_protein_RNAP_biocrnpyler_693963 in cell_3_internal_combined = 0;
  species transcript_vioC_biocrnpyler_693963 in cell_3_internal_combined = 0;
  species protein_Ribo_biocrnpyler_693963 in cell_3_internal_combined = 24;
  species protein_RNAase_biocrnpyler_693963 in cell_3_internal_combined = 6;
  species enzyme_VioC_biocrnpyler_693963 in cell_3_internal_combined = 0;
  species complex_protein_RNAase_transcript_vioC_biocrnpyler_693963 in cell_3_internal_combined = 0;
  species dna_dna_vioC_biocrnpyler_693963 in cell_3_internal_combined = 10;
  species protein_RNAP_biocrnpyler_693963 in cell_3_internal_combined = 3;
  species PTVA_biocrnpyler_693963 in cell_3_internal_combined = 0;
  species V_biocrnpyler_693963 in cell_3_internal_combined = 0;
  species complex_PTVA_enzyme_VioC_biocrnpyler_693963 in cell_3_internal_combined = 0;
  species PTDVA_biocrnpyler_693963 in cell_3_internal_combined = 0;
  species DV_biocrnpyler_693963 in cell_3_internal_combined = 0;
  species complex_PTDVA_enzyme_VioC_biocrnpyler_693963 in cell_3_internal_combined = 0;

  // Parameters:
  kb = 0.002 per_second;
  kd = 1e-5 per_second;

  // Reactions:
  r1_cell3: atc_e_external_reservoir_model_1_combined -> atc_i_cell3; kb*atc_e_external_reservoir_model_1_combined - kd*atc_i_cell3;
  r0_biocrnpyler_693963: dna_dna_vioC_biocrnpyler_693963 + protein_RNAP_biocrnpyler_693963 => complex_dna_dna_vioC_protein_RNAP_biocrnpyler_693963; r0_biocrnpyler_693963_k*dna_dna_vioC_biocrnpyler_693963*protein_RNAP_biocrnpyler_693963;
    r0_biocrnpyler_693963_k = 100;
  r0_1_biocrnpyler_693963: complex_dna_dna_vioC_protein_RNAP_biocrnpyler_693963 => dna_dna_vioC_biocrnpyler_693963 + protein_RNAP_biocrnpyler_693963; r0_1_biocrnpyler_693963_k*complex_dna_dna_vioC_protein_RNAP_biocrnpyler_693963;
    r0_1_biocrnpyler_693963_k = 10;
  r2_biocrnpyler_693963: complex_dna_dna_vioC_protein_RNAP_biocrnpyler_693963 => dna_dna_vioC_biocrnpyler_693963 + transcript_vioC_biocrnpyler_693963 + protein_RNAP_biocrnpyler_693963; r2_biocrnpyler_693963_k*complex_dna_dna_vioC_protein_RNAP_biocrnpyler_693963;
    r2_biocrnpyler_693963_k = 0.05;
  r3_biocrnpyler_693963: transcript_vioC_biocrnpyler_693963 + protein_Ribo_biocrnpyler_693963 => complex_protein_Ribo_transcript_vioC_biocrnpyler_693963; r3_biocrnpyler_693963_k*transcript_vioC_biocrnpyler_693963*protein_Ribo_biocrnpyler_693963;
    r3_biocrnpyler_693963_k = 100;
  r3_1_biocrnpyler_693963: complex_protein_Ribo_transcript_vioC_biocrnpyler_693963 => transcript_vioC_biocrnpyler_693963 + protein_Ribo_biocrnpyler_693963; r3_1_biocrnpyler_693963_k*complex_protein_Ribo_transcript_vioC_biocrnpyler_693963;
    r3_1_biocrnpyler_693963_k = 10;
  r5_biocrnpyler_693963: complex_protein_Ribo_transcript_vioC_biocrnpyler_693963 => transcript_vioC_biocrnpyler_693963 + enzyme_VioC_biocrnpyler_693963 + protein_Ribo_biocrnpyler_693963; r5_biocrnpyler_693963_k*complex_protein_Ribo_transcript_vioC_biocrnpyler_693963;
    r5_biocrnpyler_693963_k = 0.05;
  r6_biocrnpyler_693963: transcript_vioC_biocrnpyler_693963 + protein_RNAase_biocrnpyler_693963 => complex_protein_RNAase_transcript_vioC_biocrnpyler_693963; r6_biocrnpyler_693963_k*transcript_vioC_biocrnpyler_693963*protein_RNAase_biocrnpyler_693963;
    r6_biocrnpyler_693963_k = 100;
  r6_1_biocrnpyler_693963: complex_protein_RNAase_transcript_vioC_biocrnpyler_693963 => transcript_vioC_biocrnpyler_693963 + protein_RNAase_biocrnpyler_693963; r6_1_biocrnpyler_693963_k*complex_protein_RNAase_transcript_vioC_biocrnpyler_693963;
    r6_1_biocrnpyler_693963_k = 10;
  r8_biocrnpyler_693963: complex_protein_RNAase_transcript_vioC_biocrnpyler_693963 => protein_RNAase_biocrnpyler_693963; r8_biocrnpyler_693963_k*complex_protein_RNAase_transcript_vioC_biocrnpyler_693963;
    r8_biocrnpyler_693963_k = 0.001;
  r9_biocrnpyler_693963: PTVA_biocrnpyler_693963 + enzyme_VioC_biocrnpyler_693963 => complex_PTVA_enzyme_VioC_biocrnpyler_693963; r9_biocrnpyler_693963_k*PTVA_biocrnpyler_693963*enzyme_VioC_biocrnpyler_693963;
    r9_biocrnpyler_693963_k = 100;
  r9_1_biocrnpyler_693963: complex_PTVA_enzyme_VioC_biocrnpyler_693963 => PTVA_biocrnpyler_693963 + enzyme_VioC_biocrnpyler_693963; r9_1_biocrnpyler_693963_k*complex_PTVA_enzyme_VioC_biocrnpyler_693963;
    r9_1_biocrnpyler_693963_k = 10;
  r11_biocrnpyler_693963: complex_PTVA_enzyme_VioC_biocrnpyler_693963 => V_biocrnpyler_693963 + enzyme_VioC_biocrnpyler_693963; r11_biocrnpyler_693963_k*complex_PTVA_enzyme_VioC_biocrnpyler_693963;
    r11_biocrnpyler_693963_k = 0.02777778;
  r12_biocrnpyler_693963: PTDVA_biocrnpyler_693963 + enzyme_VioC_biocrnpyler_693963 => complex_PTDVA_enzyme_VioC_biocrnpyler_693963; r12_biocrnpyler_693963_k*PTDVA_biocrnpyler_693963*enzyme_VioC_biocrnpyler_693963;
    r12_biocrnpyler_693963_k = 100;
  r12_1_biocrnpyler_693963: complex_PTDVA_enzyme_VioC_biocrnpyler_693963 => PTDVA_biocrnpyler_693963 + enzyme_VioC_biocrnpyler_693963; r12_1_biocrnpyler_693963_k*complex_PTDVA_enzyme_VioC_biocrnpyler_693963;
    r12_1_biocrnpyler_693963_k = 10;
  r14_biocrnpyler_693963: complex_PTDVA_enzyme_VioC_biocrnpyler_693963 => DV_biocrnpyler_693963 + enzyme_VioC_biocrnpyler_693963; r14_biocrnpyler_693963_k*complex_PTDVA_enzyme_VioC_biocrnpyler_693963;
    r14_biocrnpyler_693963_k = 0.02777778;

  // Unit definitions:
  unit square_metre = metre^2;
  unit per_second = 1 / second;
  unit substance = dimensionless;
end
