// SBML level 3 version 2

model combined_model_of__combined_model_of__combined_model_of__external_reservoir_model_combined_model_of__atc_membrane_dnaexp_membrane_combined_model_of__biocrnpyler_855875_combined_model_of__combined_model_of__external_reservoir_model_combined_model_of__atc_membrane2_combined_model_of__biocrnpyler_624668_combined_model_of__combined_model_of__external_reservoir_model_combined_model_of__atc_membrane3_combined_model_of__biocrnpyler_693963()
  // model units - substance: mole, time: second, volume: litre, area: square_metre, length: metre, extent: mole

  // Compartments:
  compartment cell_1_internal_combined = 0.000203 litre;
  compartment cell_external_combined = 0.0001 litre;
  compartment cell_2_internal_combined = 1e-6 litre;
  compartment cell_3_internal_combined = 1e-6 litre;
  compartment cell_external_combined_1 = 0.0001 litre;

  // Species:
  species ssDNA_e in cell_external_combined = 0;
  species ssDNA in cell_1_internal_combined = 50;
  species VirE2_b_ssDNA in cell_1_internal_combined = 0;
  species dna_g_biocrnpyler_855875 in cell_1_internal_combined = 1;
  species tetR_biocrnpyler_855875 in cell_1_internal_combined = 10;
  species rna_g_biocrnpyler_855875 in cell_1_internal_combined = 0;
  species VirE2_f_biocrnpyler_855875 in cell_1_internal_combined = 0;
  species ATP_biocrnpyler_855875 in cell_1_internal_combined = 15;
  species ADP_biocrnpyler_855875 in cell_1_internal_combined = 0;
  species atc_i_1_combined in cell_1_internal_combined = 0;
  species complex_atc_i_tetR_biocrnpyler_855875 in cell_1_internal_combined = 0;
  species VirE2_b_1_combined in cell_1_internal_combined = 0;
  species complex_dna_g_tetR_biocrnpyler_855875 in cell_1_internal_combined = 0;
  species complex_atc_i_dna_g_tetR_biocrnpyler_855875 in cell_1_internal_combined = 0;
  species P_biocrnpyler_855875 in cell_1_internal_combined = 0;
  species atc_i_cell2 in cell_2_internal_combined = 0;
  species ssDNA_comp1 in cell_2_internal_combined = 10;
  species enzyme_VioA_biocrnpyler_624668 in cell_2_internal_combined = 0;
  species complex_dna_dna_vioA_protein_RNAP_biocrnpyler_624668 in cell_2_internal_combined = 0;
  species protein_Ribo_biocrnpyler_624668 in cell_2_internal_combined = 24;
  species complex_protein_Ribo_transcript_vioA_biocrnpyler_624668 in cell_2_internal_combined = 0;
  species dna_dna_vioA_biocrnpyler_624668 in cell_2_internal_combined = 10;
  species transcript_vioA_biocrnpyler_624668 in cell_2_internal_combined = 0;
  species protein_RNAase_biocrnpyler_624668 in cell_2_internal_combined = 6;
  species complex_protein_RNAase_transcript_vioA_biocrnpyler_624668 in cell_2_internal_combined = 0;
  species protein_RNAP_biocrnpyler_624668 in cell_2_internal_combined = 3;
  species enzyme_VioB_biocrnpyler_624668 in cell_2_internal_combined = 0;
  species complex_protein_RNAase_transcript_vioB_biocrnpyler_624668 in cell_2_internal_combined = 0;
  species complex_protein_Ribo_transcript_vioB_biocrnpyler_624668 in cell_2_internal_combined = 0;
  species complex_dna_dna_vioB_protein_RNAP_biocrnpyler_624668 in cell_2_internal_combined = 0;
  species transcript_vioB_biocrnpyler_624668 in cell_2_internal_combined = 0;
  species dna_dna_vioB_biocrnpyler_624668 in cell_2_internal_combined = 10;
  species enzyme_VioE_biocrnpyler_624668 in cell_2_internal_combined = 0;
  species complex_protein_Ribo_transcript_vioE_biocrnpyler_624668 in cell_2_internal_combined = 0;
  species complex_protein_RNAase_transcript_vioE_biocrnpyler_624668 in cell_2_internal_combined = 0;
  species dna_dna_vioE_biocrnpyler_624668 in cell_2_internal_combined = 10;
  species transcript_vioE_biocrnpyler_624668 in cell_2_internal_combined = 0;
  species complex_dna_dna_vioE_protein_RNAP_biocrnpyler_624668 in cell_2_internal_combined = 0;
  species transcript_vioD_biocrnpyler_624668 in cell_2_internal_combined = 0;
  species complex_protein_Ribo_transcript_vioD_biocrnpyler_624668 in cell_2_internal_combined = 0;
  species complex_dna_dna_vioD_protein_RNAP_biocrnpyler_624668 in cell_2_internal_combined = 0;
  species enzyme_VioD_biocrnpyler_624668 in cell_2_internal_combined = 0;
  species complex_protein_RNAase_transcript_vioD_biocrnpyler_624668 in cell_2_internal_combined = 0;
  species dna_dna_vioD_biocrnpyler_624668 in cell_2_internal_combined = 10;
  species TRP_biocrnpyler_624668 in cell_2_internal_combined = 10;
  species IPA_imine_biocrnpyler_624668 in cell_2_internal_combined = 0;
  species complex_TRP_enzyme_VioA_biocrnpyler_624668 in cell_2_internal_combined = 0;
  species IPA_imine_dimer_biocrnpyler_624668 in cell_2_internal_combined = 0;
  species complex_2x_IPA_imine_enzyme_VioB_biocrnpyler_624668 in cell_2_internal_combined = 0;
  species PTDVA_biocrnpyler_624668 in cell_2_internal_combined = 0;
  species complex_IPA_imine_dimer_enzyme_VioE_biocrnpyler_624668 in cell_2_internal_combined = 0;
  species PTVA_biocrnpyler_624668 in cell_2_internal_combined = 0;
  species complex_PTDVA_enzyme_VioD_biocrnpyler_624668 in cell_2_internal_combined = 0;
  species atc_i_cell3 in cell_3_internal_combined = 0;
  species ssDNA_comp2 in cell_3_internal_combined = 10;
  species complex_protein_Ribo_transcript_vioC_biocrnpyler_693963 in cell_3_internal_combined = 0;
  species complex_dna_dna_vioC_protein_RNAP_biocrnpyler_693963 in cell_3_internal_combined = 0;
  species transcript_vioC_biocrnpyler_693963 in cell_3_internal_combined = 0;
  species protein_Ribo_biocrnpyler_693963 in cell_3_internal_combined = 24;
  species protein_RNAase_biocrnpyler_693963 in cell_3_internal_combined = 6;
  species enzyme_VioC_biocrnpyler_693963 in cell_3_internal_combined = 0;
  species complex_protein_RNAase_transcript_vioC_biocrnpyler_693963 in cell_3_internal_combined = 0;
  species dna_dna_vioC_biocrnpyler_693963 in cell_3_internal_combined = 10;
  species protein_RNAP_biocrnpyler_693963 in cell_3_internal_combined = 3;
  species PTVA_biocrnpyler_693963 in cell_3_internal_combined = 0;
  species V_biocrnpyler_693963 in cell_3_internal_combined = 0;
  species complex_PTVA_enzyme_VioC_biocrnpyler_693963 in cell_3_internal_combined = 0;
  species PTDVA_biocrnpyler_693963 in cell_3_internal_combined = 0;
  species DV_biocrnpyler_693963 in cell_3_internal_combined = 0;
  species complex_PTDVA_enzyme_VioC_biocrnpyler_693963 in cell_3_internal_combined = 0;
  species atc_e_external_reservoir_model_1_combined_1_combined in cell_external = 10000;
  species dsDNA in cell_external_combined = 0;

  // Parameters:
  kb1 = 0.004 per_second;
  kd1 = 1e-5 per_second;
  kd2 = 0.0025 per_second;
  kb_combined = 0.002 per_second;
  kd_combined = 1e-5 per_second;
  kf = 100 per_second;
  kre = 1e-7 per_second;

  // Reactions:
  r1_cell1: atc_e_external_reservoir_model_1_combined_1_combined -> atc_i_1_combined; kb_combined*atc_e_external_reservoir_model_1_combined_1_combined - kd_combined*atc_i_1_combined;
  R1: VirE2_b_1_combined + ssDNA -> VirE2_b_ssDNA; kb1*VirE2_b_1_combined*ssDNA - kd1*VirE2_b_ssDNA;
  R2: VirE2_b_ssDNA => ssDNA_e + VirE2_b_1_combined; kd2*VirE2_b_ssDNA;
  r0_biocrnpyler_855875: atc_i_1_combined + tetR_biocrnpyler_855875 => complex_atc_i_tetR_biocrnpyler_855875; r0_biocrnpyler_855875_k*atc_i_1_combined*tetR_biocrnpyler_855875;
    r0_biocrnpyler_855875_k = 0.0002;
  r0_1_biocrnpyler_855875: complex_atc_i_tetR_biocrnpyler_855875 => atc_i_1_combined + tetR_biocrnpyler_855875; r0_1_biocrnpyler_855875_k*complex_atc_i_tetR_biocrnpyler_855875;
    r0_1_biocrnpyler_855875_k = 2e-9;
  r2_biocrnpyler_855875: dna_g_biocrnpyler_855875 + tetR_biocrnpyler_855875 => complex_dna_g_tetR_biocrnpyler_855875; r2_biocrnpyler_855875_k*dna_g_biocrnpyler_855875*tetR_biocrnpyler_855875;
    r2_biocrnpyler_855875_k = 4e-5;
  r2_1_biocrnpyler_855875: complex_dna_g_tetR_biocrnpyler_855875 => dna_g_biocrnpyler_855875 + tetR_biocrnpyler_855875; r2_1_biocrnpyler_855875_k*complex_dna_g_tetR_biocrnpyler_855875;
    r2_1_biocrnpyler_855875_k = 1e-12;
  r4_biocrnpyler_855875: complex_dna_g_tetR_biocrnpyler_855875 + atc_i_1_combined => complex_atc_i_dna_g_tetR_biocrnpyler_855875; r4_biocrnpyler_855875_k*complex_dna_g_tetR_biocrnpyler_855875*atc_i_1_combined;
    r4_biocrnpyler_855875_k = 6e-6;
  r4_1_biocrnpyler_855875: complex_atc_i_dna_g_tetR_biocrnpyler_855875 => complex_dna_g_tetR_biocrnpyler_855875 + atc_i_1_combined; r4_1_biocrnpyler_855875_k*complex_atc_i_dna_g_tetR_biocrnpyler_855875;
    r4_1_biocrnpyler_855875_k = 3e-9;
  r6_biocrnpyler_855875: complex_atc_i_dna_g_tetR_biocrnpyler_855875 => dna_g_biocrnpyler_855875 + complex_atc_i_tetR_biocrnpyler_855875; r6_biocrnpyler_855875_k*complex_atc_i_dna_g_tetR_biocrnpyler_855875;
    r6_biocrnpyler_855875_k = 0.005;
  r6_1_biocrnpyler_855875: dna_g_biocrnpyler_855875 + complex_atc_i_tetR_biocrnpyler_855875 => complex_atc_i_dna_g_tetR_biocrnpyler_855875; r6_1_biocrnpyler_855875_k*dna_g_biocrnpyler_855875*complex_atc_i_tetR_biocrnpyler_855875;
    r6_1_biocrnpyler_855875_k = 1e-10;
  r8_biocrnpyler_855875: dna_g_biocrnpyler_855875 => dna_g_biocrnpyler_855875 + rna_g_biocrnpyler_855875; r8_biocrnpyler_855875_k*dna_g_biocrnpyler_855875;
    r8_biocrnpyler_855875_k = 0.0031875;
  r9_biocrnpyler_855875: rna_g_biocrnpyler_855875 + ATP_biocrnpyler_855875 => rna_g_biocrnpyler_855875 + ADP_biocrnpyler_855875 + VirE2_f_biocrnpyler_855875 + P_biocrnpyler_855875; r9_biocrnpyler_855875_k*rna_g_biocrnpyler_855875*ATP_biocrnpyler_855875^n/(ATP_biocrnpyler_855875^n + K);
    r9_biocrnpyler_855875_k = 0.001; n = 1; K = 1;
  r10_biocrnpyler_855875: VirE2_f_biocrnpyler_855875 => VirE2_b_1_combined; r10_biocrnpyler_855875_k*VirE2_f_biocrnpyler_855875;
    r10_biocrnpyler_855875_k = 5e-5;
  r10_1_biocrnpyler_855875: VirE2_b_1_combined => VirE2_f_biocrnpyler_855875; r10_1_biocrnpyler_855875_k*VirE2_b_1_combined;
    r10_1_biocrnpyler_855875_k = 1e-10;
  r12_biocrnpyler_855875: rna_g_biocrnpyler_855875 => ; r12_biocrnpyler_855875_k*rna_g_biocrnpyler_855875;
    r12_biocrnpyler_855875_k = 0.001;
  r13_biocrnpyler_855875: VirE2_f_biocrnpyler_855875 => ; r13_biocrnpyler_855875_k*VirE2_f_biocrnpyler_855875;
    r13_biocrnpyler_855875_k = 1e-5;
  r1_cell2: atc_e_external_reservoir_model_1_combined_1_combined -> atc_i_cell2; kb_combined*atc_e_external_reservoir_model_1_combined_1_combined - kd_combined*atc_i_cell2;
  r0_biocrnpyler_624668: dna_dna_vioA_biocrnpyler_624668 + protein_RNAP_biocrnpyler_624668 => complex_dna_dna_vioA_protein_RNAP_biocrnpyler_624668; r0_biocrnpyler_624668_k*dna_dna_vioA_biocrnpyler_624668*protein_RNAP_biocrnpyler_624668;
    r0_biocrnpyler_624668_k = 100;
  r0_1_biocrnpyler_624668: complex_dna_dna_vioA_protein_RNAP_biocrnpyler_624668 => dna_dna_vioA_biocrnpyler_624668 + protein_RNAP_biocrnpyler_624668; r0_1_biocrnpyler_624668_k*complex_dna_dna_vioA_protein_RNAP_biocrnpyler_624668;
    r0_1_biocrnpyler_624668_k = 10;
  r2_biocrnpyler_624668: complex_dna_dna_vioA_protein_RNAP_biocrnpyler_624668 => dna_dna_vioA_biocrnpyler_624668 + transcript_vioA_biocrnpyler_624668 + protein_RNAP_biocrnpyler_624668; r2_biocrnpyler_624668_k*complex_dna_dna_vioA_protein_RNAP_biocrnpyler_624668;
    r2_biocrnpyler_624668_k = 0.05;
  r3_biocrnpyler_624668: transcript_vioA_biocrnpyler_624668 + protein_Ribo_biocrnpyler_624668 => complex_protein_Ribo_transcript_vioA_biocrnpyler_624668; r3_biocrnpyler_624668_k*transcript_vioA_biocrnpyler_624668*protein_Ribo_biocrnpyler_624668;
    r3_biocrnpyler_624668_k = 100;
  r3_1_biocrnpyler_624668: complex_protein_Ribo_transcript_vioA_biocrnpyler_624668 => transcript_vioA_biocrnpyler_624668 + protein_Ribo_biocrnpyler_624668; r3_1_biocrnpyler_624668_k*complex_protein_Ribo_transcript_vioA_biocrnpyler_624668;
    r3_1_biocrnpyler_624668_k = 10;
  r5_biocrnpyler_624668: complex_protein_Ribo_transcript_vioA_biocrnpyler_624668 => transcript_vioA_biocrnpyler_624668 + enzyme_VioA_biocrnpyler_624668 + protein_Ribo_biocrnpyler_624668; r5_biocrnpyler_624668_k*complex_protein_Ribo_transcript_vioA_biocrnpyler_624668;
    r5_biocrnpyler_624668_k = 0.05;
  r6_biocrnpyler_624668: transcript_vioA_biocrnpyler_624668 + protein_RNAase_biocrnpyler_624668 => complex_protein_RNAase_transcript_vioA_biocrnpyler_624668; r6_biocrnpyler_624668_k*transcript_vioA_biocrnpyler_624668*protein_RNAase_biocrnpyler_624668;
    r6_biocrnpyler_624668_k = 100;
  r6_1_biocrnpyler_624668: complex_protein_RNAase_transcript_vioA_biocrnpyler_624668 => transcript_vioA_biocrnpyler_624668 + protein_RNAase_biocrnpyler_624668; r6_1_biocrnpyler_624668_k*complex_protein_RNAase_transcript_vioA_biocrnpyler_624668;
    r6_1_biocrnpyler_624668_k = 10;
  r8_biocrnpyler_624668: complex_protein_RNAase_transcript_vioA_biocrnpyler_624668 => protein_RNAase_biocrnpyler_624668; r8_biocrnpyler_624668_k*complex_protein_RNAase_transcript_vioA_biocrnpyler_624668;
    r8_biocrnpyler_624668_k = 0.001;
  r9_biocrnpyler_624668: dna_dna_vioB_biocrnpyler_624668 + protein_RNAP_biocrnpyler_624668 => complex_dna_dna_vioB_protein_RNAP_biocrnpyler_624668; r9_biocrnpyler_624668_k*dna_dna_vioB_biocrnpyler_624668*protein_RNAP_biocrnpyler_624668;
    r9_biocrnpyler_624668_k = 100;
  r9_1_biocrnpyler_624668: complex_dna_dna_vioB_protein_RNAP_biocrnpyler_624668 => dna_dna_vioB_biocrnpyler_624668 + protein_RNAP_biocrnpyler_624668; r9_1_biocrnpyler_624668_k*complex_dna_dna_vioB_protein_RNAP_biocrnpyler_624668;
    r9_1_biocrnpyler_624668_k = 10;
  r11_biocrnpyler_624668: complex_dna_dna_vioB_protein_RNAP_biocrnpyler_624668 => dna_dna_vioB_biocrnpyler_624668 + transcript_vioB_biocrnpyler_624668 + protein_RNAP_biocrnpyler_624668; r11_biocrnpyler_624668_k*complex_dna_dna_vioB_protein_RNAP_biocrnpyler_624668;
    r11_biocrnpyler_624668_k = 0.05;
  r12_biocrnpyler_624668: transcript_vioB_biocrnpyler_624668 + protein_Ribo_biocrnpyler_624668 => complex_protein_Ribo_transcript_vioB_biocrnpyler_624668; r12_biocrnpyler_624668_k*transcript_vioB_biocrnpyler_624668*protein_Ribo_biocrnpyler_624668;
    r12_biocrnpyler_624668_k = 100;
  r12_1_biocrnpyler_624668: complex_protein_Ribo_transcript_vioB_biocrnpyler_624668 => transcript_vioB_biocrnpyler_624668 + protein_Ribo_biocrnpyler_624668; r12_1_biocrnpyler_624668_k*complex_protein_Ribo_transcript_vioB_biocrnpyler_624668;
    r12_1_biocrnpyler_624668_k = 10;
  r14_biocrnpyler_624668: complex_protein_Ribo_transcript_vioB_biocrnpyler_624668 => transcript_vioB_biocrnpyler_624668 + enzyme_VioB_biocrnpyler_624668 + protein_Ribo_biocrnpyler_624668; r14_biocrnpyler_624668_k*complex_protein_Ribo_transcript_vioB_biocrnpyler_624668;
    r14_biocrnpyler_624668_k = 0.05;
  r15_biocrnpyler_624668: transcript_vioB_biocrnpyler_624668 + protein_RNAase_biocrnpyler_624668 => complex_protein_RNAase_transcript_vioB_biocrnpyler_624668; r15_biocrnpyler_624668_k*transcript_vioB_biocrnpyler_624668*protein_RNAase_biocrnpyler_624668;
    r15_biocrnpyler_624668_k = 100;
  r15_1_biocrnpyler_624668: complex_protein_RNAase_transcript_vioB_biocrnpyler_624668 => transcript_vioB_biocrnpyler_624668 + protein_RNAase_biocrnpyler_624668; r15_1_biocrnpyler_624668_k*complex_protein_RNAase_transcript_vioB_biocrnpyler_624668;
    r15_1_biocrnpyler_624668_k = 10;
  r17_biocrnpyler_624668: complex_protein_RNAase_transcript_vioB_biocrnpyler_624668 => protein_RNAase_biocrnpyler_624668; r17_biocrnpyler_624668_k*complex_protein_RNAase_transcript_vioB_biocrnpyler_624668;
    r17_biocrnpyler_624668_k = 0.001;
  r18_biocrnpyler_624668: dna_dna_vioE_biocrnpyler_624668 + protein_RNAP_biocrnpyler_624668 => complex_dna_dna_vioE_protein_RNAP_biocrnpyler_624668; r18_biocrnpyler_624668_k*dna_dna_vioE_biocrnpyler_624668*protein_RNAP_biocrnpyler_624668;
    r18_biocrnpyler_624668_k = 100;
  r18_1_biocrnpyler_624668: complex_dna_dna_vioE_protein_RNAP_biocrnpyler_624668 => dna_dna_vioE_biocrnpyler_624668 + protein_RNAP_biocrnpyler_624668; r18_1_biocrnpyler_624668_k*complex_dna_dna_vioE_protein_RNAP_biocrnpyler_624668;
    r18_1_biocrnpyler_624668_k = 10;
  r20_biocrnpyler_624668: complex_dna_dna_vioE_protein_RNAP_biocrnpyler_624668 => dna_dna_vioE_biocrnpyler_624668 + transcript_vioE_biocrnpyler_624668 + protein_RNAP_biocrnpyler_624668; r20_biocrnpyler_624668_k*complex_dna_dna_vioE_protein_RNAP_biocrnpyler_624668;
    r20_biocrnpyler_624668_k = 0.05;
  r21_biocrnpyler_624668: transcript_vioE_biocrnpyler_624668 + protein_Ribo_biocrnpyler_624668 => complex_protein_Ribo_transcript_vioE_biocrnpyler_624668; r21_biocrnpyler_624668_k*transcript_vioE_biocrnpyler_624668*protein_Ribo_biocrnpyler_624668;
    r21_biocrnpyler_624668_k = 100;
  r21_1_biocrnpyler_624668: complex_protein_Ribo_transcript_vioE_biocrnpyler_624668 => transcript_vioE_biocrnpyler_624668 + protein_Ribo_biocrnpyler_624668; r21_1_biocrnpyler_624668_k*complex_protein_Ribo_transcript_vioE_biocrnpyler_624668;
    r21_1_biocrnpyler_624668_k = 10;
  r23_biocrnpyler_624668: complex_protein_Ribo_transcript_vioE_biocrnpyler_624668 => transcript_vioE_biocrnpyler_624668 + enzyme_VioE_biocrnpyler_624668 + protein_Ribo_biocrnpyler_624668; r23_biocrnpyler_624668_k*complex_protein_Ribo_transcript_vioE_biocrnpyler_624668;
    r23_biocrnpyler_624668_k = 0.05;
  r24_biocrnpyler_624668: transcript_vioE_biocrnpyler_624668 + protein_RNAase_biocrnpyler_624668 => complex_protein_RNAase_transcript_vioE_biocrnpyler_624668; r24_biocrnpyler_624668_k*transcript_vioE_biocrnpyler_624668*protein_RNAase_biocrnpyler_624668;
    r24_biocrnpyler_624668_k = 100;
  r24_1_biocrnpyler_624668: complex_protein_RNAase_transcript_vioE_biocrnpyler_624668 => transcript_vioE_biocrnpyler_624668 + protein_RNAase_biocrnpyler_624668; r24_1_biocrnpyler_624668_k*complex_protein_RNAase_transcript_vioE_biocrnpyler_624668;
    r24_1_biocrnpyler_624668_k = 10;
  r26_biocrnpyler_624668: complex_protein_RNAase_transcript_vioE_biocrnpyler_624668 => protein_RNAase_biocrnpyler_624668; r26_biocrnpyler_624668_k*complex_protein_RNAase_transcript_vioE_biocrnpyler_624668;
    r26_biocrnpyler_624668_k = 0.001;
  r27_biocrnpyler_624668: dna_dna_vioD_biocrnpyler_624668 + protein_RNAP_biocrnpyler_624668 => complex_dna_dna_vioD_protein_RNAP_biocrnpyler_624668; r27_biocrnpyler_624668_k*dna_dna_vioD_biocrnpyler_624668*protein_RNAP_biocrnpyler_624668;
    r27_biocrnpyler_624668_k = 100;
  r27_1_biocrnpyler_624668: complex_dna_dna_vioD_protein_RNAP_biocrnpyler_624668 => dna_dna_vioD_biocrnpyler_624668 + protein_RNAP_biocrnpyler_624668; r27_1_biocrnpyler_624668_k*complex_dna_dna_vioD_protein_RNAP_biocrnpyler_624668;
    r27_1_biocrnpyler_624668_k = 10;
  r29_biocrnpyler_624668: complex_dna_dna_vioD_protein_RNAP_biocrnpyler_624668 => dna_dna_vioD_biocrnpyler_624668 + transcript_vioD_biocrnpyler_624668 + protein_RNAP_biocrnpyler_624668; r29_biocrnpyler_624668_k*complex_dna_dna_vioD_protein_RNAP_biocrnpyler_624668;
    r29_biocrnpyler_624668_k = 0.05;
  r30_biocrnpyler_624668: transcript_vioD_biocrnpyler_624668 + protein_Ribo_biocrnpyler_624668 => complex_protein_Ribo_transcript_vioD_biocrnpyler_624668; r30_biocrnpyler_624668_k*transcript_vioD_biocrnpyler_624668*protein_Ribo_biocrnpyler_624668;
    r30_biocrnpyler_624668_k = 100;
  r30_1_biocrnpyler_624668: complex_protein_Ribo_transcript_vioD_biocrnpyler_624668 => transcript_vioD_biocrnpyler_624668 + protein_Ribo_biocrnpyler_624668; r30_1_biocrnpyler_624668_k*complex_protein_Ribo_transcript_vioD_biocrnpyler_624668;
    r30_1_biocrnpyler_624668_k = 10;
  r32_biocrnpyler_624668: complex_protein_Ribo_transcript_vioD_biocrnpyler_624668 => transcript_vioD_biocrnpyler_624668 + enzyme_VioD_biocrnpyler_624668 + protein_Ribo_biocrnpyler_624668; r32_biocrnpyler_624668_k*complex_protein_Ribo_transcript_vioD_biocrnpyler_624668;
    r32_biocrnpyler_624668_k = 0.05;
  r33_biocrnpyler_624668: transcript_vioD_biocrnpyler_624668 + protein_RNAase_biocrnpyler_624668 => complex_protein_RNAase_transcript_vioD_biocrnpyler_624668; r33_biocrnpyler_624668_k*transcript_vioD_biocrnpyler_624668*protein_RNAase_biocrnpyler_624668;
    r33_biocrnpyler_624668_k = 100;
  r33_1_biocrnpyler_624668: complex_protein_RNAase_transcript_vioD_biocrnpyler_624668 => transcript_vioD_biocrnpyler_624668 + protein_RNAase_biocrnpyler_624668; r33_1_biocrnpyler_624668_k*complex_protein_RNAase_transcript_vioD_biocrnpyler_624668;
    r33_1_biocrnpyler_624668_k = 10;
  r35_biocrnpyler_624668: complex_protein_RNAase_transcript_vioD_biocrnpyler_624668 => protein_RNAase_biocrnpyler_624668; r35_biocrnpyler_624668_k*complex_protein_RNAase_transcript_vioD_biocrnpyler_624668;
    r35_biocrnpyler_624668_k = 0.001;
  r36_biocrnpyler_624668: TRP_biocrnpyler_624668 + enzyme_VioA_biocrnpyler_624668 => complex_TRP_enzyme_VioA_biocrnpyler_624668; r36_biocrnpyler_624668_k*TRP_biocrnpyler_624668*enzyme_VioA_biocrnpyler_624668;
    r36_biocrnpyler_624668_k = 0.002777778;
  r36_1_biocrnpyler_624668: complex_TRP_enzyme_VioA_biocrnpyler_624668 => TRP_biocrnpyler_624668 + enzyme_VioA_biocrnpyler_624668; r36_1_biocrnpyler_624668_k*complex_TRP_enzyme_VioA_biocrnpyler_624668;
    r36_1_biocrnpyler_624668_k = 0.0002777778;
  r38_biocrnpyler_624668: complex_TRP_enzyme_VioA_biocrnpyler_624668 => IPA_imine_biocrnpyler_624668 + enzyme_VioA_biocrnpyler_624668; r38_biocrnpyler_624668_k*complex_TRP_enzyme_VioA_biocrnpyler_624668;
    r38_biocrnpyler_624668_k = 0.0009388889;
  r39_biocrnpyler_624668: 2 IPA_imine_biocrnpyler_624668 + enzyme_VioB_biocrnpyler_624668 => complex_2x_IPA_imine_enzyme_VioB_biocrnpyler_624668; r39_biocrnpyler_624668_k*IPA_imine_biocrnpyler_624668^2*enzyme_VioB_biocrnpyler_624668;
    r39_biocrnpyler_624668_k = 0.002777778;
  r39_1_biocrnpyler_624668: complex_2x_IPA_imine_enzyme_VioB_biocrnpyler_624668 => 2 IPA_imine_biocrnpyler_624668 + enzyme_VioB_biocrnpyler_624668; r39_1_biocrnpyler_624668_k*complex_2x_IPA_imine_enzyme_VioB_biocrnpyler_624668;
    r39_1_biocrnpyler_624668_k = 0.0002777778;
  r41_biocrnpyler_624668: complex_2x_IPA_imine_enzyme_VioB_biocrnpyler_624668 => IPA_imine_dimer_biocrnpyler_624668 + enzyme_VioB_biocrnpyler_624668; r41_biocrnpyler_624668_k*complex_2x_IPA_imine_enzyme_VioB_biocrnpyler_624668;
    r41_biocrnpyler_624668_k = 1.25;
  r42_biocrnpyler_624668: IPA_imine_dimer_biocrnpyler_624668 + enzyme_VioE_biocrnpyler_624668 => complex_IPA_imine_dimer_enzyme_VioE_biocrnpyler_624668; r42_biocrnpyler_624668_k*IPA_imine_dimer_biocrnpyler_624668*enzyme_VioE_biocrnpyler_624668;
    r42_biocrnpyler_624668_k = 100;
  r42_1_biocrnpyler_624668: complex_IPA_imine_dimer_enzyme_VioE_biocrnpyler_624668 => IPA_imine_dimer_biocrnpyler_624668 + enzyme_VioE_biocrnpyler_624668; r42_1_biocrnpyler_624668_k*complex_IPA_imine_dimer_enzyme_VioE_biocrnpyler_624668;
    r42_1_biocrnpyler_624668_k = 10;
  r44_biocrnpyler_624668: complex_IPA_imine_dimer_enzyme_VioE_biocrnpyler_624668 => PTDVA_biocrnpyler_624668 + enzyme_VioE_biocrnpyler_624668; r44_biocrnpyler_624668_k*complex_IPA_imine_dimer_enzyme_VioE_biocrnpyler_624668;
    r44_biocrnpyler_624668_k = 0.02777778;
  r45_biocrnpyler_624668: PTDVA_biocrnpyler_624668 + enzyme_VioD_biocrnpyler_624668 => complex_PTDVA_enzyme_VioD_biocrnpyler_624668; r45_biocrnpyler_624668_k*PTDVA_biocrnpyler_624668*enzyme_VioD_biocrnpyler_624668;
    r45_biocrnpyler_624668_k = 100;
  r45_1_biocrnpyler_624668: complex_PTDVA_enzyme_VioD_biocrnpyler_624668 => PTDVA_biocrnpyler_624668 + enzyme_VioD_biocrnpyler_624668; r45_1_biocrnpyler_624668_k*complex_PTDVA_enzyme_VioD_biocrnpyler_624668;
    r45_1_biocrnpyler_624668_k = 10;
  r47_biocrnpyler_624668: complex_PTDVA_enzyme_VioD_biocrnpyler_624668 => PTVA_biocrnpyler_624668 + enzyme_VioD_biocrnpyler_624668; r47_biocrnpyler_624668_k*complex_PTDVA_enzyme_VioD_biocrnpyler_624668;
    r47_biocrnpyler_624668_k = 0.02777778;
  r1_cell3: atc_e_external_reservoir_model_1_combined_1_combined -> atc_i_cell3; kb_combined*atc_e_external_reservoir_model_1_combined_1_combined - kd_combined*atc_i_cell3;
  r0_biocrnpyler_693963: dna_dna_vioC_biocrnpyler_693963 + protein_RNAP_biocrnpyler_693963 => complex_dna_dna_vioC_protein_RNAP_biocrnpyler_693963; r0_biocrnpyler_693963_k*dna_dna_vioC_biocrnpyler_693963*protein_RNAP_biocrnpyler_693963;
    r0_biocrnpyler_693963_k = 100;
  r0_1_biocrnpyler_693963: complex_dna_dna_vioC_protein_RNAP_biocrnpyler_693963 => dna_dna_vioC_biocrnpyler_693963 + protein_RNAP_biocrnpyler_693963; r0_1_biocrnpyler_693963_k*complex_dna_dna_vioC_protein_RNAP_biocrnpyler_693963;
    r0_1_biocrnpyler_693963_k = 10;
  r2_biocrnpyler_693963: complex_dna_dna_vioC_protein_RNAP_biocrnpyler_693963 => dna_dna_vioC_biocrnpyler_693963 + transcript_vioC_biocrnpyler_693963 + protein_RNAP_biocrnpyler_693963; r2_biocrnpyler_693963_k*complex_dna_dna_vioC_protein_RNAP_biocrnpyler_693963;
    r2_biocrnpyler_693963_k = 0.05;
  r3_biocrnpyler_693963: transcript_vioC_biocrnpyler_693963 + protein_Ribo_biocrnpyler_693963 => complex_protein_Ribo_transcript_vioC_biocrnpyler_693963; r3_biocrnpyler_693963_k*transcript_vioC_biocrnpyler_693963*protein_Ribo_biocrnpyler_693963;
    r3_biocrnpyler_693963_k = 100;
  r3_1_biocrnpyler_693963: complex_protein_Ribo_transcript_vioC_biocrnpyler_693963 => transcript_vioC_biocrnpyler_693963 + protein_Ribo_biocrnpyler_693963; r3_1_biocrnpyler_693963_k*complex_protein_Ribo_transcript_vioC_biocrnpyler_693963;
    r3_1_biocrnpyler_693963_k = 10;
  r5_biocrnpyler_693963: complex_protein_Ribo_transcript_vioC_biocrnpyler_693963 => transcript_vioC_biocrnpyler_693963 + enzyme_VioC_biocrnpyler_693963 + protein_Ribo_biocrnpyler_693963; r5_biocrnpyler_693963_k*complex_protein_Ribo_transcript_vioC_biocrnpyler_693963;
    r5_biocrnpyler_693963_k = 0.05;
  r6_biocrnpyler_693963: transcript_vioC_biocrnpyler_693963 + protein_RNAase_biocrnpyler_693963 => complex_protein_RNAase_transcript_vioC_biocrnpyler_693963; r6_biocrnpyler_693963_k*transcript_vioC_biocrnpyler_693963*protein_RNAase_biocrnpyler_693963;
    r6_biocrnpyler_693963_k = 100;
  r6_1_biocrnpyler_693963: complex_protein_RNAase_transcript_vioC_biocrnpyler_693963 => transcript_vioC_biocrnpyler_693963 + protein_RNAase_biocrnpyler_693963; r6_1_biocrnpyler_693963_k*complex_protein_RNAase_transcript_vioC_biocrnpyler_693963;
    r6_1_biocrnpyler_693963_k = 10;
  r8_biocrnpyler_693963: complex_protein_RNAase_transcript_vioC_biocrnpyler_693963 => protein_RNAase_biocrnpyler_693963; r8_biocrnpyler_693963_k*complex_protein_RNAase_transcript_vioC_biocrnpyler_693963;
    r8_biocrnpyler_693963_k = 0.001;
  r9_biocrnpyler_693963: PTVA_biocrnpyler_693963 + enzyme_VioC_biocrnpyler_693963 => complex_PTVA_enzyme_VioC_biocrnpyler_693963; r9_biocrnpyler_693963_k*PTVA_biocrnpyler_693963*enzyme_VioC_biocrnpyler_693963;
    r9_biocrnpyler_693963_k = 100;
  r9_1_biocrnpyler_693963: complex_PTVA_enzyme_VioC_biocrnpyler_693963 => PTVA_biocrnpyler_693963 + enzyme_VioC_biocrnpyler_693963; r9_1_biocrnpyler_693963_k*complex_PTVA_enzyme_VioC_biocrnpyler_693963;
    r9_1_biocrnpyler_693963_k = 10;
  r11_biocrnpyler_693963: complex_PTVA_enzyme_VioC_biocrnpyler_693963 => V_biocrnpyler_693963 + enzyme_VioC_biocrnpyler_693963; r11_biocrnpyler_693963_k*complex_PTVA_enzyme_VioC_biocrnpyler_693963;
    r11_biocrnpyler_693963_k = 0.02777778;
  r12_biocrnpyler_693963: PTDVA_biocrnpyler_693963 + enzyme_VioC_biocrnpyler_693963 => complex_PTDVA_enzyme_VioC_biocrnpyler_693963; r12_biocrnpyler_693963_k*PTDVA_biocrnpyler_693963*enzyme_VioC_biocrnpyler_693963;
    r12_biocrnpyler_693963_k = 100;
  r12_1_biocrnpyler_693963: complex_PTDVA_enzyme_VioC_biocrnpyler_693963 => PTDVA_biocrnpyler_693963 + enzyme_VioC_biocrnpyler_693963; r12_1_biocrnpyler_693963_k*complex_PTDVA_enzyme_VioC_biocrnpyler_693963;
    r12_1_biocrnpyler_693963_k = 10;
  r14_biocrnpyler_693963: complex_PTDVA_enzyme_VioC_biocrnpyler_693963 => DV_biocrnpyler_693963 + enzyme_VioC_biocrnpyler_693963; r14_biocrnpyler_693963_k*complex_PTDVA_enzyme_VioC_biocrnpyler_693963;
    r14_biocrnpyler_693963_k = 0.02777778;
  raa1: ssDNA_comp1 + ssDNA_comp2 + ssDNA_e -> dsDNA; kf*ssDNA_comp1*ssDNA_comp2*ssDNA_e - kre*dsDNA;

  // Unit definitions:
  unit square_metre = metre^2;
  unit per_second = 1 / second;
  unit substance = dimensionless;
end
