// SBML level 3 version 2

model biocrnpyler_979301()
  // model units - substance: mole, time: second, volume: litre, area: square_metre, length: metre, extent: mole

  // Compartments:
  compartment default = 1e-6;

  // Species:
  species enzyme_VioA in default = 0;
  species complex_dna_dna_vioA_protein_RNAP in default = 0;
  species protein_Ribo in default = 24;
  species complex_protein_Ribo_transcript_vioA in default = 0;
  species dna_dna_vioA in default = 0;
  species transcript_vioA in default = 0;
  species protein_RNAase in default = 6;
  species complex_protein_RNAase_transcript_vioA in default = 0;
  species protein_RNAP in default = 3;
  species enzyme_VioB in default = 0;
  species complex_protein_RNAase_transcript_vioB in default = 0;
  species complex_protein_Ribo_transcript_vioB in default = 0;
  species complex_dna_dna_vioB_protein_RNAP in default = 0;
  species transcript_vioB in default = 0;
  species dna_dna_vioB in default = 0;
  species enzyme_VioE in default = 0;
  species complex_protein_Ribo_transcript_vioE in default = 0;
  species complex_protein_RNAase_transcript_vioE in default = 0;
  species dna_dna_vioE in default = 0;
  species transcript_vioE in default = 0;
  species complex_dna_dna_vioE_protein_RNAP in default = 0;
  species transcript_vioD in default = 0;
  species complex_protein_Ribo_transcript_vioD in default = 0;
  species complex_dna_dna_vioD_protein_RNAP in default = 0;
  species enzyme_VioD in default = 0;
  species complex_protein_RNAase_transcript_vioD in default = 0;
  species dna_dna_vioD in default = 0;
  species TRP in default = 0;
  species IPA_imine in default = 0;
  species complex_TRP_enzyme_VioA in default = 0;
  species IPA_imine_dimer in default = 0;
  species complex_2x_IPA_imine_enzyme_VioB in default = 0;
  species PTDVA in default = 0;
  species complex_IPA_imine_dimer_enzyme_VioE in default = 0;
  species PTVA in default = 0;
  species complex_PTDVA_enzyme_VioD in default = 0;

  // Reactions:
  r0: dna_dna_vioA + protein_RNAP => complex_dna_dna_vioA_protein_RNAP; r0_k*dna_dna_vioA*protein_RNAP;
    r0_k = 0.02777778;
  r0_1: complex_dna_dna_vioA_protein_RNAP => dna_dna_vioA + protein_RNAP; r0_1_k*complex_dna_dna_vioA_protein_RNAP;
    r0_1_k = 0.002777778;
  r2: complex_dna_dna_vioA_protein_RNAP => dna_dna_vioA + transcript_vioA + protein_RNAP; r2_k*complex_dna_dna_vioA_protein_RNAP;
    r2_k = 0.0001388889;
  r3: transcript_vioA + protein_Ribo => complex_protein_Ribo_transcript_vioA; r3_k*transcript_vioA*protein_Ribo;
    r3_k = 0.02777778;
  r3_1: complex_protein_Ribo_transcript_vioA => transcript_vioA + protein_Ribo; r3_1_k*complex_protein_Ribo_transcript_vioA;
    r3_1_k = 0.002777778;
  r5: complex_protein_Ribo_transcript_vioA => transcript_vioA + enzyme_VioA + protein_Ribo; r5_k*complex_protein_Ribo_transcript_vioA;
    r5_k = 0.0005555556;
  r6: transcript_vioA + protein_RNAase => complex_protein_RNAase_transcript_vioA; r6_k*transcript_vioA*protein_RNAase;
    r6_k = 0.02777778;
  r6_1: complex_protein_RNAase_transcript_vioA => transcript_vioA + protein_RNAase; r6_1_k*complex_protein_RNAase_transcript_vioA;
    r6_1_k = 0.002777778;
  r8: complex_protein_RNAase_transcript_vioA => protein_RNAase; r8_k*complex_protein_RNAase_transcript_vioA;
    r8_k = 0.001;
  r9: dna_dna_vioB + protein_RNAP => complex_dna_dna_vioB_protein_RNAP; r9_k*dna_dna_vioB*protein_RNAP;
    r9_k = 0.02777778;
  r9_1: complex_dna_dna_vioB_protein_RNAP => dna_dna_vioB + protein_RNAP; r9_1_k*complex_dna_dna_vioB_protein_RNAP;
    r9_1_k = 0.002777778;
  r11: complex_dna_dna_vioB_protein_RNAP => dna_dna_vioB + transcript_vioB + protein_RNAP; r11_k*complex_dna_dna_vioB_protein_RNAP;
    r11_k = 0.0001388889;
  r12: transcript_vioB + protein_Ribo => complex_protein_Ribo_transcript_vioB; r12_k*transcript_vioB*protein_Ribo;
    r12_k = 0.02777778;
  r12_1: complex_protein_Ribo_transcript_vioB => transcript_vioB + protein_Ribo; r12_1_k*complex_protein_Ribo_transcript_vioB;
    r12_1_k = 0.002777778;
  r14: complex_protein_Ribo_transcript_vioB => transcript_vioB + enzyme_VioB + protein_Ribo; r14_k*complex_protein_Ribo_transcript_vioB;
    r14_k = 0.0005555556;
  r15: transcript_vioB + protein_RNAase => complex_protein_RNAase_transcript_vioB; r15_k*transcript_vioB*protein_RNAase;
    r15_k = 0.02777778;
  r15_1: complex_protein_RNAase_transcript_vioB => transcript_vioB + protein_RNAase; r15_1_k*complex_protein_RNAase_transcript_vioB;
    r15_1_k = 0.002777778;
  r17: complex_protein_RNAase_transcript_vioB => protein_RNAase; r17_k*complex_protein_RNAase_transcript_vioB;
    r17_k = 0.001;
  r18: dna_dna_vioE + protein_RNAP => complex_dna_dna_vioE_protein_RNAP; r18_k*dna_dna_vioE*protein_RNAP;
    r18_k = 0.02777778;
  r18_1: complex_dna_dna_vioE_protein_RNAP => dna_dna_vioE + protein_RNAP; r18_1_k*complex_dna_dna_vioE_protein_RNAP;
    r18_1_k = 0.002777778;
  r20: complex_dna_dna_vioE_protein_RNAP => dna_dna_vioE + transcript_vioE + protein_RNAP; r20_k*complex_dna_dna_vioE_protein_RNAP;
    r20_k = 0.0001388889;
  r21: transcript_vioE + protein_Ribo => complex_protein_Ribo_transcript_vioE; r21_k*transcript_vioE*protein_Ribo;
    r21_k = 0.02777778;
  r21_1: complex_protein_Ribo_transcript_vioE => transcript_vioE + protein_Ribo; r21_1_k*complex_protein_Ribo_transcript_vioE;
    r21_1_k = 0.002777778;
  r23: complex_protein_Ribo_transcript_vioE => transcript_vioE + enzyme_VioE + protein_Ribo; r23_k*complex_protein_Ribo_transcript_vioE;
    r23_k = 0.0005555556;
  r24: transcript_vioE + protein_RNAase => complex_protein_RNAase_transcript_vioE; r24_k*transcript_vioE*protein_RNAase;
    r24_k = 0.02777778;
  r24_1: complex_protein_RNAase_transcript_vioE => transcript_vioE + protein_RNAase; r24_1_k*complex_protein_RNAase_transcript_vioE;
    r24_1_k = 0.002777778;
  r26: complex_protein_RNAase_transcript_vioE => protein_RNAase; r26_k*complex_protein_RNAase_transcript_vioE;
    r26_k = 0.001;
  r27: dna_dna_vioD + protein_RNAP => complex_dna_dna_vioD_protein_RNAP; r27_k*dna_dna_vioD*protein_RNAP;
    r27_k = 0.02777778;
  r27_1: complex_dna_dna_vioD_protein_RNAP => dna_dna_vioD + protein_RNAP; r27_1_k*complex_dna_dna_vioD_protein_RNAP;
    r27_1_k = 0.002777778;
  r29: complex_dna_dna_vioD_protein_RNAP => dna_dna_vioD + transcript_vioD + protein_RNAP; r29_k*complex_dna_dna_vioD_protein_RNAP;
    r29_k = 0.0001388889;
  r30: transcript_vioD + protein_Ribo => complex_protein_Ribo_transcript_vioD; r30_k*transcript_vioD*protein_Ribo;
    r30_k = 0.02777778;
  r30_1: complex_protein_Ribo_transcript_vioD => transcript_vioD + protein_Ribo; r30_1_k*complex_protein_Ribo_transcript_vioD;
    r30_1_k = 0.002777778;
  r32: complex_protein_Ribo_transcript_vioD => transcript_vioD + enzyme_VioD + protein_Ribo; r32_k*complex_protein_Ribo_transcript_vioD;
    r32_k = 0.0005555556;
  r33: transcript_vioD + protein_RNAase => complex_protein_RNAase_transcript_vioD; r33_k*transcript_vioD*protein_RNAase;
    r33_k = 0.02777778;
  r33_1: complex_protein_RNAase_transcript_vioD => transcript_vioD + protein_RNAase; r33_1_k*complex_protein_RNAase_transcript_vioD;
    r33_1_k = 0.002777778;
  r35: complex_protein_RNAase_transcript_vioD => protein_RNAase; r35_k*complex_protein_RNAase_transcript_vioD;
    r35_k = 0.001;
  r36: TRP + enzyme_VioA => complex_TRP_enzyme_VioA; r36_k*TRP*enzyme_VioA;
    r36_k = 0.002777778;
  r36_1: complex_TRP_enzyme_VioA => TRP + enzyme_VioA; r36_1_k*complex_TRP_enzyme_VioA;
    r36_1_k = 0.0002777778;
  r38: complex_TRP_enzyme_VioA => IPA_imine + enzyme_VioA; r38_k*complex_TRP_enzyme_VioA;
    r38_k = 0.0009388889;
  r39: 2 IPA_imine + enzyme_VioB => complex_2x_IPA_imine_enzyme_VioB; r39_k*IPA_imine^2*enzyme_VioB;
    r39_k = 0.002777778;
  r39_1: complex_2x_IPA_imine_enzyme_VioB => 2 IPA_imine + enzyme_VioB; r39_1_k*complex_2x_IPA_imine_enzyme_VioB;
    r39_1_k = 0.0002777778;
  r41: complex_2x_IPA_imine_enzyme_VioB => IPA_imine_dimer + enzyme_VioB; r41_k*complex_2x_IPA_imine_enzyme_VioB;
    r41_k = 0.0009388889;
  r42: IPA_imine_dimer + enzyme_VioE => complex_IPA_imine_dimer_enzyme_VioE; r42_k*IPA_imine_dimer*enzyme_VioE;
    r42_k = 0.02777778;
  r42_1: complex_IPA_imine_dimer_enzyme_VioE => IPA_imine_dimer + enzyme_VioE; r42_1_k*complex_IPA_imine_dimer_enzyme_VioE;
    r42_1_k = 0.002777778;
  r44: complex_IPA_imine_dimer_enzyme_VioE => PTDVA + enzyme_VioE; r44_k*complex_IPA_imine_dimer_enzyme_VioE;
    r44_k = 0.02777778;
  r45: PTDVA + enzyme_VioD => complex_PTDVA_enzyme_VioD; r45_k*PTDVA*enzyme_VioD;
    r45_k = 0.02777778;
  r45_1: complex_PTDVA_enzyme_VioD => PTDVA + enzyme_VioD; r45_1_k*complex_PTDVA_enzyme_VioD;
    r45_1_k = 0.002777778;
  r47: complex_PTDVA_enzyme_VioD => PTVA + enzyme_VioD; r47_k*complex_PTDVA_enzyme_VioD;
    r47_k = 0.02777778;

  // Unit definitions:
  unit square_metre = metre^2;
end
