// SBML level 3 version 2

model biocrnpyler_667319()
  // model units - substance: mole, time: second, volume: litre, area: square_metre, length: metre, extent: mole

  // Compartments:
  compartment default = 1e-6;

  // Species:
  species complex_protein_Ribo_transcript_vioC in default = 0;
  species complex_dna_dna_vioC_protein_RNAP in default = 0;
  species transcript_vioC in default = 0;
  species protein_Ribo in default = 24;
  species protein_RNAase in default = 6;
  species enzyme_VioC in default = 0;
  species complex_protein_RNAase_transcript_vioC in default = 0;
  species dna_dna_vioC in default = 0;
  species protein_RNAP in default = 3;
  species PTVA in default = 0;
  species V in default = 0;
  species complex_PTVA_enzyme_VioC in default = 0;
  species PTDVA in default = 0;
  species DV in default = 0;
  species complex_PTDVA_enzyme_VioC in default = 0;

  // Reactions:
  r0: dna_dna_vioC + protein_RNAP => complex_dna_dna_vioC_protein_RNAP; r0_k*dna_dna_vioC*protein_RNAP;
    r0_k = 0.02777778;
  r0_1: complex_dna_dna_vioC_protein_RNAP => dna_dna_vioC + protein_RNAP; r0_1_k*complex_dna_dna_vioC_protein_RNAP;
    r0_1_k = 0.002777778;
  r2: complex_dna_dna_vioC_protein_RNAP => dna_dna_vioC + transcript_vioC + protein_RNAP; r2_k*complex_dna_dna_vioC_protein_RNAP;
    r2_k = 0.0001388889;
  r3: transcript_vioC + protein_Ribo => complex_protein_Ribo_transcript_vioC; r3_k*transcript_vioC*protein_Ribo;
    r3_k = 0.02777778;
  r3_1: complex_protein_Ribo_transcript_vioC => transcript_vioC + protein_Ribo; r3_1_k*complex_protein_Ribo_transcript_vioC;
    r3_1_k = 0.002777778;
  r5: complex_protein_Ribo_transcript_vioC => transcript_vioC + enzyme_VioC + protein_Ribo; r5_k*complex_protein_Ribo_transcript_vioC;
    r5_k = 0.0005555556;
  r6: transcript_vioC + protein_RNAase => complex_protein_RNAase_transcript_vioC; r6_k*transcript_vioC*protein_RNAase;
    r6_k = 0.02777778;
  r6_1: complex_protein_RNAase_transcript_vioC => transcript_vioC + protein_RNAase; r6_1_k*complex_protein_RNAase_transcript_vioC;
    r6_1_k = 0.002777778;
  r8: complex_protein_RNAase_transcript_vioC => protein_RNAase; r8_k*complex_protein_RNAase_transcript_vioC;
    r8_k = 0.001;
  r9: PTVA + enzyme_VioC => complex_PTVA_enzyme_VioC; r9_k*PTVA*enzyme_VioC;
    r9_k = 0.02777778;
  r9_1: complex_PTVA_enzyme_VioC => PTVA + enzyme_VioC; r9_1_k*complex_PTVA_enzyme_VioC;
    r9_1_k = 0.002777778;
  r11: complex_PTVA_enzyme_VioC => V + enzyme_VioC; r11_k*complex_PTVA_enzyme_VioC;
    r11_k = 0.02777778;
  r12: PTDVA + enzyme_VioC => complex_PTDVA_enzyme_VioC; r12_k*PTDVA*enzyme_VioC;
    r12_k = 0.02777778;
  r12_1: complex_PTDVA_enzyme_VioC => PTDVA + enzyme_VioC; r12_1_k*complex_PTDVA_enzyme_VioC;
    r12_1_k = 0.002777778;
  r14: complex_PTDVA_enzyme_VioC => DV + enzyme_VioC; r14_k*complex_PTDVA_enzyme_VioC;
    r14_k = 0.02777778;

  // Unit definitions:
  unit square_metre = metre^2;
end
