// SBML level 3 version 2

model combined_model_of__combined_model_of__combined_model_of__external_reservoir_model_combined_model_of__atc_membrane2_combined_model_of__biocrnpyler_624668_combined_model_of__combined_model_of__external_reservoir_model_combined_model_of__atc_membrane3_combined_model_of__biocrnpyler_693963()
  // model units - substance: mole, time: second, volume: litre, area: square_metre, length: metre, extent: mole

  // Compartments:
  compartment fusedcell_external_combined = 0.0002 litre;
  compartment fusedcell_internal_combined = 1e-6 litre;

  // Species:
  species atc_i_cell2 in fusedcell_internal_combined = 9425.249;
  species ssDNA_comp1 in fusedcell_internal_combined = 10;
  species enzyme_VioA_biocrnpyler_624668 in fusedcell_internal_combined = 404.1908;
  species complex_dna_dna_vioA_protein_RNAP_biocrnpyler_624668 in fusedcell_internal_combined = 0.7479688;
  species complex_protein_Ribo_transcript_vioA_biocrnpyler_624668 in fusedcell_internal_combined = 5.996667;
  species dna_dna_vioA_biocrnpyler_624668 in fusedcell_internal_combined = 9.252031;
  species transcript_vioA_biocrnpyler_624668 in fusedcell_internal_combined = 45.20729;
  species complex_protein_RNAase_transcript_vioA_biocrnpyler_624668 in fusedcell_internal_combined = 1.499171;
  species enzyme_VioB_biocrnpyler_624668 in fusedcell_internal_combined = 407.0283;
  species complex_protein_RNAase_transcript_vioB_biocrnpyler_624668 in fusedcell_internal_combined = 1.499171;
  species complex_protein_Ribo_transcript_vioB_biocrnpyler_624668 in fusedcell_internal_combined = 5.996667;
  species complex_dna_dna_vioB_protein_RNAP_biocrnpyler_624668 in fusedcell_internal_combined = 0.7479688;
  species transcript_vioB_biocrnpyler_624668 in fusedcell_internal_combined = 45.20729;
  species dna_dna_vioB_biocrnpyler_624668 in fusedcell_internal_combined = 9.252031;
  species enzyme_VioE_biocrnpyler_624668 in fusedcell_internal_combined = 406.9797;
  species complex_protein_Ribo_transcript_vioE_biocrnpyler_624668 in fusedcell_internal_combined = 5.996667;
  species complex_protein_RNAase_transcript_vioE_biocrnpyler_624668 in fusedcell_internal_combined = 1.499171;
  species dna_dna_vioE_biocrnpyler_624668 in fusedcell_internal_combined = 9.252031;
  species transcript_vioE_biocrnpyler_624668 in fusedcell_internal_combined = 45.20729;
  species complex_dna_dna_vioE_protein_RNAP_biocrnpyler_624668 in fusedcell_internal_combined = 0.7479688;
  species transcript_vioD_biocrnpyler_624668 in fusedcell_internal_combined = 45.20729;
  species complex_protein_Ribo_transcript_vioD_biocrnpyler_624668 in fusedcell_internal_combined = 5.996667;
  species complex_dna_dna_vioD_protein_RNAP_biocrnpyler_624668 in fusedcell_internal_combined = 0.7479688;
  species enzyme_VioD_biocrnpyler_624668 in fusedcell_internal_combined = 406.9779;
  species complex_protein_RNAase_transcript_vioD_biocrnpyler_624668 in fusedcell_internal_combined = 1.499171;
  species dna_dna_vioD_biocrnpyler_624668 in fusedcell_internal_combined = 9.252031;
  species TRP_biocrnpyler_624668 in fusedcell_internal_combined = 0.0007033504;
  species IPA_imine_biocrnpyler_624668 in fusedcell_internal_combined = 0.001179737;
  species complex_TRP_enzyme_VioA_biocrnpyler_624668 in fusedcell_internal_combined = 2.838602;
  species IPA_imine_dimer_biocrnpyler_624668 in fusedcell_internal_combined = 1.225117e-5;
  species complex_2x_IPA_imine_enzyme_VioB_biocrnpyler_624668 in fusedcell_internal_combined = 0.001067646;
  species complex_IPA_imine_dimer_enzyme_VioE_biocrnpyler_624668 in fusedcell_internal_combined = 0.04972633;
  species complex_PTDVA_enzyme_VioD_biocrnpyler_624668 in fusedcell_internal_combined = 0.05146763;
  species atc_i_cell3 in fusedcell_internal_combined = 9425.249;
  species ssDNA_comp2 in fusedcell_internal_combined = 10;
  species complex_protein_Ribo_transcript_vioC_biocrnpyler_693963 in fusedcell_internal_combined = 23.98648;
  species complex_dna_dna_vioC_protein_RNAP_biocrnpyler_693963 in fusedcell_internal_combined = 2.957789;
  species transcript_vioC_biocrnpyler_693963 in fusedcell_internal_combined = 178.3422;
  species protein_Ribo_biocrnpyler_624668_1_combined in fusedcell_internal_combined = 0.01351695;
  species protein_RNAase_biocrnpyler_624668_1_combined in fusedcell_internal_combined = 0.00336277;
  species enzyme_VioC_biocrnpyler_693963 in fusedcell_internal_combined = 1626.628;
  species complex_protein_RNAase_transcript_vioC_biocrnpyler_693963 in fusedcell_internal_combined = 5.996637;
  species dna_dna_vioC_biocrnpyler_693963 in fusedcell_internal_combined = 7.042211;
  species protein_RNAP_biocrnpyler_624668_1_combined in fusedcell_internal_combined = 0.04221086;
  species PTVA_biocrnpyler_624668_1_combined in fusedcell_internal_combined = 0;
  species V_biocrnpyler_693963 in fusedcell_internal_combined = 0;
  species complex_PTVA_enzyme_VioC_biocrnpyler_693963 in fusedcell_internal_combined = 0;
  species PTDVA_biocrnpyler_624668_1_combined in fusedcell_internal_combined = 0;
  species DV_biocrnpyler_693963 in fusedcell_internal_combined = 0;
  species complex_PTDVA_enzyme_VioC_biocrnpyler_693963 in fusedcell_internal_combined = 0;
  species atc_e_external_reservoir_model_1_combined_1_combined in fusedcell_external = 574.7511;

  // Parameters:
  kb_combined = 0.002 per_second;
  kd_combined = 1e-5 per_second;

  // Reactions:
  r1_cell2: atc_e_external_reservoir_model_1_combined_1_combined -> atc_i_cell2; kb_combined*atc_e_external_reservoir_model_1_combined_1_combined - kd_combined*atc_i_cell2;
  r0_biocrnpyler_624668: dna_dna_vioA_biocrnpyler_624668 + protein_RNAP_biocrnpyler_624668_1_combined => complex_dna_dna_vioA_protein_RNAP_biocrnpyler_624668; r0_biocrnpyler_624668_k*dna_dna_vioA_biocrnpyler_624668*protein_RNAP_biocrnpyler_624668_1_combined;
    r0_biocrnpyler_624668_k = 100;
  r0_1_biocrnpyler_624668: complex_dna_dna_vioA_protein_RNAP_biocrnpyler_624668 => dna_dna_vioA_biocrnpyler_624668 + protein_RNAP_biocrnpyler_624668_1_combined; r0_1_biocrnpyler_624668_k*complex_dna_dna_vioA_protein_RNAP_biocrnpyler_624668;
    r0_1_biocrnpyler_624668_k = 10;
  r2_biocrnpyler_624668: complex_dna_dna_vioA_protein_RNAP_biocrnpyler_624668 => dna_dna_vioA_biocrnpyler_624668 + transcript_vioA_biocrnpyler_624668 + protein_RNAP_biocrnpyler_624668_1_combined; r2_biocrnpyler_624668_k*complex_dna_dna_vioA_protein_RNAP_biocrnpyler_624668;
    r2_biocrnpyler_624668_k = 0.05;
  r3_biocrnpyler_624668: transcript_vioA_biocrnpyler_624668 + protein_Ribo_biocrnpyler_624668_1_combined => complex_protein_Ribo_transcript_vioA_biocrnpyler_624668; r3_biocrnpyler_624668_k*transcript_vioA_biocrnpyler_624668*protein_Ribo_biocrnpyler_624668_1_combined;
    r3_biocrnpyler_624668_k = 100;
  r3_1_biocrnpyler_624668: complex_protein_Ribo_transcript_vioA_biocrnpyler_624668 => transcript_vioA_biocrnpyler_624668 + protein_Ribo_biocrnpyler_624668_1_combined; r3_1_biocrnpyler_624668_k*complex_protein_Ribo_transcript_vioA_biocrnpyler_624668;
    r3_1_biocrnpyler_624668_k = 10;
  r5_biocrnpyler_624668: complex_protein_Ribo_transcript_vioA_biocrnpyler_624668 => transcript_vioA_biocrnpyler_624668 + enzyme_VioA_biocrnpyler_624668 + protein_Ribo_biocrnpyler_624668_1_combined; r5_biocrnpyler_624668_k*complex_protein_Ribo_transcript_vioA_biocrnpyler_624668;
    r5_biocrnpyler_624668_k = 0.05;
  r6_biocrnpyler_624668: transcript_vioA_biocrnpyler_624668 + protein_RNAase_biocrnpyler_624668_1_combined => complex_protein_RNAase_transcript_vioA_biocrnpyler_624668; r6_biocrnpyler_624668_k*transcript_vioA_biocrnpyler_624668*protein_RNAase_biocrnpyler_624668_1_combined;
    r6_biocrnpyler_624668_k = 100;
  r6_1_biocrnpyler_624668: complex_protein_RNAase_transcript_vioA_biocrnpyler_624668 => transcript_vioA_biocrnpyler_624668 + protein_RNAase_biocrnpyler_624668_1_combined; r6_1_biocrnpyler_624668_k*complex_protein_RNAase_transcript_vioA_biocrnpyler_624668;
    r6_1_biocrnpyler_624668_k = 10;
  r8_biocrnpyler_624668: complex_protein_RNAase_transcript_vioA_biocrnpyler_624668 => protein_RNAase_biocrnpyler_624668_1_combined; r8_biocrnpyler_624668_k*complex_protein_RNAase_transcript_vioA_biocrnpyler_624668;
    r8_biocrnpyler_624668_k = 0.001;
  r9_biocrnpyler_624668: dna_dna_vioB_biocrnpyler_624668 + protein_RNAP_biocrnpyler_624668_1_combined => complex_dna_dna_vioB_protein_RNAP_biocrnpyler_624668; r9_biocrnpyler_624668_k*dna_dna_vioB_biocrnpyler_624668*protein_RNAP_biocrnpyler_624668_1_combined;
    r9_biocrnpyler_624668_k = 100;
  r9_1_biocrnpyler_624668: complex_dna_dna_vioB_protein_RNAP_biocrnpyler_624668 => dna_dna_vioB_biocrnpyler_624668 + protein_RNAP_biocrnpyler_624668_1_combined; r9_1_biocrnpyler_624668_k*complex_dna_dna_vioB_protein_RNAP_biocrnpyler_624668;
    r9_1_biocrnpyler_624668_k = 10;
  r11_biocrnpyler_624668: complex_dna_dna_vioB_protein_RNAP_biocrnpyler_624668 => dna_dna_vioB_biocrnpyler_624668 + transcript_vioB_biocrnpyler_624668 + protein_RNAP_biocrnpyler_624668_1_combined; r11_biocrnpyler_624668_k*complex_dna_dna_vioB_protein_RNAP_biocrnpyler_624668;
    r11_biocrnpyler_624668_k = 0.05;
  r12_biocrnpyler_624668: transcript_vioB_biocrnpyler_624668 + protein_Ribo_biocrnpyler_624668_1_combined => complex_protein_Ribo_transcript_vioB_biocrnpyler_624668; r12_biocrnpyler_624668_k*transcript_vioB_biocrnpyler_624668*protein_Ribo_biocrnpyler_624668_1_combined;
    r12_biocrnpyler_624668_k = 100;
  r12_1_biocrnpyler_624668: complex_protein_Ribo_transcript_vioB_biocrnpyler_624668 => transcript_vioB_biocrnpyler_624668 + protein_Ribo_biocrnpyler_624668_1_combined; r12_1_biocrnpyler_624668_k*complex_protein_Ribo_transcript_vioB_biocrnpyler_624668;
    r12_1_biocrnpyler_624668_k = 10;
  r14_biocrnpyler_624668: complex_protein_Ribo_transcript_vioB_biocrnpyler_624668 => transcript_vioB_biocrnpyler_624668 + enzyme_VioB_biocrnpyler_624668 + protein_Ribo_biocrnpyler_624668_1_combined; r14_biocrnpyler_624668_k*complex_protein_Ribo_transcript_vioB_biocrnpyler_624668;
    r14_biocrnpyler_624668_k = 0.05;
  r15_biocrnpyler_624668: transcript_vioB_biocrnpyler_624668 + protein_RNAase_biocrnpyler_624668_1_combined => complex_protein_RNAase_transcript_vioB_biocrnpyler_624668; r15_biocrnpyler_624668_k*transcript_vioB_biocrnpyler_624668*protein_RNAase_biocrnpyler_624668_1_combined;
    r15_biocrnpyler_624668_k = 100;
  r15_1_biocrnpyler_624668: complex_protein_RNAase_transcript_vioB_biocrnpyler_624668 => transcript_vioB_biocrnpyler_624668 + protein_RNAase_biocrnpyler_624668_1_combined; r15_1_biocrnpyler_624668_k*complex_protein_RNAase_transcript_vioB_biocrnpyler_624668;
    r15_1_biocrnpyler_624668_k = 10;
  r17_biocrnpyler_624668: complex_protein_RNAase_transcript_vioB_biocrnpyler_624668 => protein_RNAase_biocrnpyler_624668_1_combined; r17_biocrnpyler_624668_k*complex_protein_RNAase_transcript_vioB_biocrnpyler_624668;
    r17_biocrnpyler_624668_k = 0.001;
  r18_biocrnpyler_624668: dna_dna_vioE_biocrnpyler_624668 + protein_RNAP_biocrnpyler_624668_1_combined => complex_dna_dna_vioE_protein_RNAP_biocrnpyler_624668; r18_biocrnpyler_624668_k*dna_dna_vioE_biocrnpyler_624668*protein_RNAP_biocrnpyler_624668_1_combined;
    r18_biocrnpyler_624668_k = 100;
  r18_1_biocrnpyler_624668: complex_dna_dna_vioE_protein_RNAP_biocrnpyler_624668 => dna_dna_vioE_biocrnpyler_624668 + protein_RNAP_biocrnpyler_624668_1_combined; r18_1_biocrnpyler_624668_k*complex_dna_dna_vioE_protein_RNAP_biocrnpyler_624668;
    r18_1_biocrnpyler_624668_k = 10;
  r20_biocrnpyler_624668: complex_dna_dna_vioE_protein_RNAP_biocrnpyler_624668 => dna_dna_vioE_biocrnpyler_624668 + transcript_vioE_biocrnpyler_624668 + protein_RNAP_biocrnpyler_624668_1_combined; r20_biocrnpyler_624668_k*complex_dna_dna_vioE_protein_RNAP_biocrnpyler_624668;
    r20_biocrnpyler_624668_k = 0.05;
  r21_biocrnpyler_624668: transcript_vioE_biocrnpyler_624668 + protein_Ribo_biocrnpyler_624668_1_combined => complex_protein_Ribo_transcript_vioE_biocrnpyler_624668; r21_biocrnpyler_624668_k*transcript_vioE_biocrnpyler_624668*protein_Ribo_biocrnpyler_624668_1_combined;
    r21_biocrnpyler_624668_k = 100;
  r21_1_biocrnpyler_624668: complex_protein_Ribo_transcript_vioE_biocrnpyler_624668 => transcript_vioE_biocrnpyler_624668 + protein_Ribo_biocrnpyler_624668_1_combined; r21_1_biocrnpyler_624668_k*complex_protein_Ribo_transcript_vioE_biocrnpyler_624668;
    r21_1_biocrnpyler_624668_k = 10;
  r23_biocrnpyler_624668: complex_protein_Ribo_transcript_vioE_biocrnpyler_624668 => transcript_vioE_biocrnpyler_624668 + enzyme_VioE_biocrnpyler_624668 + protein_Ribo_biocrnpyler_624668_1_combined; r23_biocrnpyler_624668_k*complex_protein_Ribo_transcript_vioE_biocrnpyler_624668;
    r23_biocrnpyler_624668_k = 0.05;
  r24_biocrnpyler_624668: transcript_vioE_biocrnpyler_624668 + protein_RNAase_biocrnpyler_624668_1_combined => complex_protein_RNAase_transcript_vioE_biocrnpyler_624668; r24_biocrnpyler_624668_k*transcript_vioE_biocrnpyler_624668*protein_RNAase_biocrnpyler_624668_1_combined;
    r24_biocrnpyler_624668_k = 100;
  r24_1_biocrnpyler_624668: complex_protein_RNAase_transcript_vioE_biocrnpyler_624668 => transcript_vioE_biocrnpyler_624668 + protein_RNAase_biocrnpyler_624668_1_combined; r24_1_biocrnpyler_624668_k*complex_protein_RNAase_transcript_vioE_biocrnpyler_624668;
    r24_1_biocrnpyler_624668_k = 10;
  r26_biocrnpyler_624668: complex_protein_RNAase_transcript_vioE_biocrnpyler_624668 => protein_RNAase_biocrnpyler_624668_1_combined; r26_biocrnpyler_624668_k*complex_protein_RNAase_transcript_vioE_biocrnpyler_624668;
    r26_biocrnpyler_624668_k = 0.001;
  r27_biocrnpyler_624668: dna_dna_vioD_biocrnpyler_624668 + protein_RNAP_biocrnpyler_624668_1_combined => complex_dna_dna_vioD_protein_RNAP_biocrnpyler_624668; r27_biocrnpyler_624668_k*dna_dna_vioD_biocrnpyler_624668*protein_RNAP_biocrnpyler_624668_1_combined;
    r27_biocrnpyler_624668_k = 100;
  r27_1_biocrnpyler_624668: complex_dna_dna_vioD_protein_RNAP_biocrnpyler_624668 => dna_dna_vioD_biocrnpyler_624668 + protein_RNAP_biocrnpyler_624668_1_combined; r27_1_biocrnpyler_624668_k*complex_dna_dna_vioD_protein_RNAP_biocrnpyler_624668;
    r27_1_biocrnpyler_624668_k = 10;
  r29_biocrnpyler_624668: complex_dna_dna_vioD_protein_RNAP_biocrnpyler_624668 => dna_dna_vioD_biocrnpyler_624668 + transcript_vioD_biocrnpyler_624668 + protein_RNAP_biocrnpyler_624668_1_combined; r29_biocrnpyler_624668_k*complex_dna_dna_vioD_protein_RNAP_biocrnpyler_624668;
    r29_biocrnpyler_624668_k = 0.05;
  r30_biocrnpyler_624668: transcript_vioD_biocrnpyler_624668 + protein_Ribo_biocrnpyler_624668_1_combined => complex_protein_Ribo_transcript_vioD_biocrnpyler_624668; r30_biocrnpyler_624668_k*transcript_vioD_biocrnpyler_624668*protein_Ribo_biocrnpyler_624668_1_combined;
    r30_biocrnpyler_624668_k = 100;
  r30_1_biocrnpyler_624668: complex_protein_Ribo_transcript_vioD_biocrnpyler_624668 => transcript_vioD_biocrnpyler_624668 + protein_Ribo_biocrnpyler_624668_1_combined; r30_1_biocrnpyler_624668_k*complex_protein_Ribo_transcript_vioD_biocrnpyler_624668;
    r30_1_biocrnpyler_624668_k = 10;
  r32_biocrnpyler_624668: complex_protein_Ribo_transcript_vioD_biocrnpyler_624668 => transcript_vioD_biocrnpyler_624668 + enzyme_VioD_biocrnpyler_624668 + protein_Ribo_biocrnpyler_624668_1_combined; r32_biocrnpyler_624668_k*complex_protein_Ribo_transcript_vioD_biocrnpyler_624668;
    r32_biocrnpyler_624668_k = 0.05;
  r33_biocrnpyler_624668: transcript_vioD_biocrnpyler_624668 + protein_RNAase_biocrnpyler_624668_1_combined => complex_protein_RNAase_transcript_vioD_biocrnpyler_624668; r33_biocrnpyler_624668_k*transcript_vioD_biocrnpyler_624668*protein_RNAase_biocrnpyler_624668_1_combined;
    r33_biocrnpyler_624668_k = 100;
  r33_1_biocrnpyler_624668: complex_protein_RNAase_transcript_vioD_biocrnpyler_624668 => transcript_vioD_biocrnpyler_624668 + protein_RNAase_biocrnpyler_624668_1_combined; r33_1_biocrnpyler_624668_k*complex_protein_RNAase_transcript_vioD_biocrnpyler_624668;
    r33_1_biocrnpyler_624668_k = 10;
  r35_biocrnpyler_624668: complex_protein_RNAase_transcript_vioD_biocrnpyler_624668 => protein_RNAase_biocrnpyler_624668_1_combined; r35_biocrnpyler_624668_k*complex_protein_RNAase_transcript_vioD_biocrnpyler_624668;
    r35_biocrnpyler_624668_k = 0.001;
  r36_biocrnpyler_624668: TRP_biocrnpyler_624668 + enzyme_VioA_biocrnpyler_624668 => complex_TRP_enzyme_VioA_biocrnpyler_624668; r36_biocrnpyler_624668_k*TRP_biocrnpyler_624668*enzyme_VioA_biocrnpyler_624668;
    r36_biocrnpyler_624668_k = 0.002777778;
  r36_1_biocrnpyler_624668: complex_TRP_enzyme_VioA_biocrnpyler_624668 => TRP_biocrnpyler_624668 + enzyme_VioA_biocrnpyler_624668; r36_1_biocrnpyler_624668_k*complex_TRP_enzyme_VioA_biocrnpyler_624668;
    r36_1_biocrnpyler_624668_k = 0.0002777778;
  r38_biocrnpyler_624668: complex_TRP_enzyme_VioA_biocrnpyler_624668 => IPA_imine_biocrnpyler_624668 + enzyme_VioA_biocrnpyler_624668; r38_biocrnpyler_624668_k*complex_TRP_enzyme_VioA_biocrnpyler_624668;
    r38_biocrnpyler_624668_k = 0.0009388889;
  r39_biocrnpyler_624668: 2 IPA_imine_biocrnpyler_624668 + enzyme_VioB_biocrnpyler_624668 => complex_2x_IPA_imine_enzyme_VioB_biocrnpyler_624668; r39_biocrnpyler_624668_k*IPA_imine_biocrnpyler_624668^2*enzyme_VioB_biocrnpyler_624668;
    r39_biocrnpyler_624668_k = 0.002777778;
  r39_1_biocrnpyler_624668: complex_2x_IPA_imine_enzyme_VioB_biocrnpyler_624668 => 2 IPA_imine_biocrnpyler_624668 + enzyme_VioB_biocrnpyler_624668; r39_1_biocrnpyler_624668_k*complex_2x_IPA_imine_enzyme_VioB_biocrnpyler_624668;
    r39_1_biocrnpyler_624668_k = 0.0002777778;
  r41_biocrnpyler_624668: complex_2x_IPA_imine_enzyme_VioB_biocrnpyler_624668 => IPA_imine_dimer_biocrnpyler_624668 + enzyme_VioB_biocrnpyler_624668; r41_biocrnpyler_624668_k*complex_2x_IPA_imine_enzyme_VioB_biocrnpyler_624668;
    r41_biocrnpyler_624668_k = 1.25;
  r42_biocrnpyler_624668: IPA_imine_dimer_biocrnpyler_624668 + enzyme_VioE_biocrnpyler_624668 => complex_IPA_imine_dimer_enzyme_VioE_biocrnpyler_624668; r42_biocrnpyler_624668_k*IPA_imine_dimer_biocrnpyler_624668*enzyme_VioE_biocrnpyler_624668;
    r42_biocrnpyler_624668_k = 100;
  r42_1_biocrnpyler_624668: complex_IPA_imine_dimer_enzyme_VioE_biocrnpyler_624668 => IPA_imine_dimer_biocrnpyler_624668 + enzyme_VioE_biocrnpyler_624668; r42_1_biocrnpyler_624668_k*complex_IPA_imine_dimer_enzyme_VioE_biocrnpyler_624668;
    r42_1_biocrnpyler_624668_k = 10;
  r44_biocrnpyler_624668: complex_IPA_imine_dimer_enzyme_VioE_biocrnpyler_624668 => PTDVA_biocrnpyler_624668_1_combined + enzyme_VioE_biocrnpyler_624668; r44_biocrnpyler_624668_k*complex_IPA_imine_dimer_enzyme_VioE_biocrnpyler_624668;
    r44_biocrnpyler_624668_k = 0.02777778;
  r45_biocrnpyler_624668: PTDVA_biocrnpyler_624668_1_combined + enzyme_VioD_biocrnpyler_624668 => complex_PTDVA_enzyme_VioD_biocrnpyler_624668; r45_biocrnpyler_624668_k*PTDVA_biocrnpyler_624668_1_combined*enzyme_VioD_biocrnpyler_624668;
    r45_biocrnpyler_624668_k = 100;
  r45_1_biocrnpyler_624668: complex_PTDVA_enzyme_VioD_biocrnpyler_624668 => PTDVA_biocrnpyler_624668_1_combined + enzyme_VioD_biocrnpyler_624668; r45_1_biocrnpyler_624668_k*complex_PTDVA_enzyme_VioD_biocrnpyler_624668;
    r45_1_biocrnpyler_624668_k = 10;
  r47_biocrnpyler_624668: complex_PTDVA_enzyme_VioD_biocrnpyler_624668 => PTVA_biocrnpyler_624668_1_combined + enzyme_VioD_biocrnpyler_624668; r47_biocrnpyler_624668_k*complex_PTDVA_enzyme_VioD_biocrnpyler_624668;
    r47_biocrnpyler_624668_k = 0.02777778;
  r1_cell3: atc_e_external_reservoir_model_1_combined_1_combined -> atc_i_cell3; kb_combined*atc_e_external_reservoir_model_1_combined_1_combined - kd_combined*atc_i_cell3;
  r0_biocrnpyler_693963: dna_dna_vioC_biocrnpyler_693963 + protein_RNAP_biocrnpyler_624668_1_combined => complex_dna_dna_vioC_protein_RNAP_biocrnpyler_693963; r0_biocrnpyler_693963_k*dna_dna_vioC_biocrnpyler_693963*protein_RNAP_biocrnpyler_624668_1_combined;
    r0_biocrnpyler_693963_k = 100;
  r0_1_biocrnpyler_693963: complex_dna_dna_vioC_protein_RNAP_biocrnpyler_693963 => dna_dna_vioC_biocrnpyler_693963 + protein_RNAP_biocrnpyler_624668_1_combined; r0_1_biocrnpyler_693963_k*complex_dna_dna_vioC_protein_RNAP_biocrnpyler_693963;
    r0_1_biocrnpyler_693963_k = 10;
  r2_biocrnpyler_693963: complex_dna_dna_vioC_protein_RNAP_biocrnpyler_693963 => dna_dna_vioC_biocrnpyler_693963 + transcript_vioC_biocrnpyler_693963 + protein_RNAP_biocrnpyler_624668_1_combined; r2_biocrnpyler_693963_k*complex_dna_dna_vioC_protein_RNAP_biocrnpyler_693963;
    r2_biocrnpyler_693963_k = 0.05;
  r3_biocrnpyler_693963: transcript_vioC_biocrnpyler_693963 + protein_Ribo_biocrnpyler_624668_1_combined => complex_protein_Ribo_transcript_vioC_biocrnpyler_693963; r3_biocrnpyler_693963_k*transcript_vioC_biocrnpyler_693963*protein_Ribo_biocrnpyler_624668_1_combined;
    r3_biocrnpyler_693963_k = 100;
  r3_1_biocrnpyler_693963: complex_protein_Ribo_transcript_vioC_biocrnpyler_693963 => transcript_vioC_biocrnpyler_693963 + protein_Ribo_biocrnpyler_624668_1_combined; r3_1_biocrnpyler_693963_k*complex_protein_Ribo_transcript_vioC_biocrnpyler_693963;
    r3_1_biocrnpyler_693963_k = 10;
  r5_biocrnpyler_693963: complex_protein_Ribo_transcript_vioC_biocrnpyler_693963 => transcript_vioC_biocrnpyler_693963 + enzyme_VioC_biocrnpyler_693963 + protein_Ribo_biocrnpyler_624668_1_combined; r5_biocrnpyler_693963_k*complex_protein_Ribo_transcript_vioC_biocrnpyler_693963;
    r5_biocrnpyler_693963_k = 0.05;
  r6_biocrnpyler_693963: transcript_vioC_biocrnpyler_693963 + protein_RNAase_biocrnpyler_624668_1_combined => complex_protein_RNAase_transcript_vioC_biocrnpyler_693963; r6_biocrnpyler_693963_k*transcript_vioC_biocrnpyler_693963*protein_RNAase_biocrnpyler_624668_1_combined;
    r6_biocrnpyler_693963_k = 100;
  r6_1_biocrnpyler_693963: complex_protein_RNAase_transcript_vioC_biocrnpyler_693963 => transcript_vioC_biocrnpyler_693963 + protein_RNAase_biocrnpyler_624668_1_combined; r6_1_biocrnpyler_693963_k*complex_protein_RNAase_transcript_vioC_biocrnpyler_693963;
    r6_1_biocrnpyler_693963_k = 10;
  r8_biocrnpyler_693963: complex_protein_RNAase_transcript_vioC_biocrnpyler_693963 => protein_RNAase_biocrnpyler_624668_1_combined; r8_biocrnpyler_693963_k*complex_protein_RNAase_transcript_vioC_biocrnpyler_693963;
    r8_biocrnpyler_693963_k = 0.001;
  r9_biocrnpyler_693963: PTVA_biocrnpyler_624668_1_combined + enzyme_VioC_biocrnpyler_693963 => complex_PTVA_enzyme_VioC_biocrnpyler_693963; r9_biocrnpyler_693963_k*PTVA_biocrnpyler_624668_1_combined*enzyme_VioC_biocrnpyler_693963;
    r9_biocrnpyler_693963_k = 100;
  r9_1_biocrnpyler_693963: complex_PTVA_enzyme_VioC_biocrnpyler_693963 => PTVA_biocrnpyler_624668_1_combined + enzyme_VioC_biocrnpyler_693963; r9_1_biocrnpyler_693963_k*complex_PTVA_enzyme_VioC_biocrnpyler_693963;
    r9_1_biocrnpyler_693963_k = 10;
  r11_biocrnpyler_693963: complex_PTVA_enzyme_VioC_biocrnpyler_693963 => V_biocrnpyler_693963 + enzyme_VioC_biocrnpyler_693963; r11_biocrnpyler_693963_k*complex_PTVA_enzyme_VioC_biocrnpyler_693963;
    r11_biocrnpyler_693963_k = 0.02777778;
  r12_biocrnpyler_693963: PTDVA_biocrnpyler_624668_1_combined + enzyme_VioC_biocrnpyler_693963 => complex_PTDVA_enzyme_VioC_biocrnpyler_693963; r12_biocrnpyler_693963_k*PTDVA_biocrnpyler_624668_1_combined*enzyme_VioC_biocrnpyler_693963;
    r12_biocrnpyler_693963_k = 100;
  r12_1_biocrnpyler_693963: complex_PTDVA_enzyme_VioC_biocrnpyler_693963 => PTDVA_biocrnpyler_624668_1_combined + enzyme_VioC_biocrnpyler_693963; r12_1_biocrnpyler_693963_k*complex_PTDVA_enzyme_VioC_biocrnpyler_693963;
    r12_1_biocrnpyler_693963_k = 10;
  r14_biocrnpyler_693963: complex_PTDVA_enzyme_VioC_biocrnpyler_693963 => DV_biocrnpyler_693963 + enzyme_VioC_biocrnpyler_693963; r14_biocrnpyler_693963_k*complex_PTDVA_enzyme_VioC_biocrnpyler_693963;
    r14_biocrnpyler_693963_k = 0.02777778;

  // Unit definitions:
  unit square_metre = metre^2;
  unit per_second = 1 / second;
  unit substance = dimensionless;
end
