// SBML level 3 version 2

model combined_model_of__combined_model_of__combined_model_of__external_reservoir_model_combined_model_of__atc_membrane2_combined_model_of__biocrnpyler_844781_combined_model_of__combined_model_of__external_reservoir_model_combined_model_of__atc_membrane3_combined_model_of__biocrnpyler_864602()
  // model units - substance: mole, time: second, volume: litre, area: square_metre, length: metre, extent: mole

  // Compartments:
  compartment fusedcell_external_combined = 0.0002 litre;
  compartment fusedcell_internal_combined = 1e-10 litre;

  // Species:
  species ssDNA_comp1 in fusedcell_internal_combined = 10;
  species dna_f_biocrnpyler_844781 in fusedcell_internal_combined = 0.9997573;
  species tetR_biocrnpyler_844781 in fusedcell_internal_combined = 1.007311e-7;
  species rna_f_biocrnpyler_844781 in fusedcell_internal_combined = 1.805623;
  species atc_i_cell2_1_combined in fusedcell_internal_combined = 9927.289;
  species complex_atc_i_cell2_tetR_biocrnpyler_844781 in fusedcell_internal_combined = 9.999757;
  species complex_dna_f_tetR_biocrnpyler_844781 in fusedcell_internal_combined = 4.847429e-5;
  species complex_atc_i_cell2_dna_f_tetR_biocrnpyler_844781 in fusedcell_internal_combined = 0.0001942111;
  species atc_i_cell3 in fusedcell_internal_combined = 9937.239;
  species ssDNA_comp2 in fusedcell_internal_combined = 10;
  species dna_h_biocrnpyler_864602 in fusedcell_internal_combined = 1;
  species rna_h_biocrnpyler_864602 in fusedcell_internal_combined = 0;
  species exsA_biocrnpyler_844781_1_combined in fusedcell_internal_combined = 0;
  species ATP_biocrnpyler_844781_1_combined in fusedcell_internal_combined = 15;
  species ADP_biocrnpyler_844781_1_combined in fusedcell_internal_combined = 0;
  species P_biocrnpyler_844781_1_combined in fusedcell_internal_combined = 0;
  species complex_dna_h_exsA_biocrnpyler_864602 in fusedcell_internal_combined = 0;
  species gfp_biocrnpyler_864602 in fusedcell_internal_combined = 0;
  species atc_e_external_reservoir_model_1_combined_1_combined in fusedcell_external = 62.76118;

  // Parameters:
  kb_combined = 0.002 per_second;
  kd_combined = 1e-5 per_second;

  // Reactions:
  r1_cell2: atc_e_external_reservoir_model_1_combined_1_combined -> atc_i_cell2_1_combined; kb_combined*atc_e_external_reservoir_model_1_combined_1_combined - kd_combined*atc_i_cell2_1_combined;
  r0_biocrnpyler_844781: atc_i_cell2_1_combined + tetR_biocrnpyler_844781 => complex_atc_i_cell2_tetR_biocrnpyler_844781; r0_biocrnpyler_844781_k*atc_i_cell2_1_combined*tetR_biocrnpyler_844781; r0_biocrnpyler_844781 is "r0cell2";
    r0_biocrnpyler_844781_k = 2e-5;
  r0_1_biocrnpyler_844781: complex_atc_i_cell2_tetR_biocrnpyler_844781 => atc_i_cell2_1_combined + tetR_biocrnpyler_844781; r0_1_biocrnpyler_844781_k*complex_atc_i_cell2_tetR_biocrnpyler_844781; r0_1_biocrnpyler_844781 is "r0_1cell2";
    r0_1_biocrnpyler_844781_k = 2e-9;
  r2_biocrnpyler_844781: dna_f_biocrnpyler_844781 + tetR_biocrnpyler_844781 => complex_dna_f_tetR_biocrnpyler_844781; r2_biocrnpyler_844781_k*dna_f_biocrnpyler_844781*tetR_biocrnpyler_844781;
    r2_biocrnpyler_844781_k = 4e-7;
  r2_1_biocrnpyler_844781: complex_dna_f_tetR_biocrnpyler_844781 => dna_f_biocrnpyler_844781 + tetR_biocrnpyler_844781; r2_1_biocrnpyler_844781_k*complex_dna_f_tetR_biocrnpyler_844781;
    r2_1_biocrnpyler_844781_k = 1e-12;
  r4_biocrnpyler_844781: complex_dna_f_tetR_biocrnpyler_844781 + atc_i_cell2_1_combined => complex_atc_i_cell2_dna_f_tetR_biocrnpyler_844781; r4_biocrnpyler_844781_k*complex_dna_f_tetR_biocrnpyler_844781*atc_i_cell2_1_combined;
    r4_biocrnpyler_844781_k = 6e-8;
  r4_1_biocrnpyler_844781: complex_atc_i_cell2_dna_f_tetR_biocrnpyler_844781 => complex_dna_f_tetR_biocrnpyler_844781 + atc_i_cell2_1_combined; r4_1_biocrnpyler_844781_k*complex_atc_i_cell2_dna_f_tetR_biocrnpyler_844781;
    r4_1_biocrnpyler_844781_k = 3e-9;
  r6_biocrnpyler_844781: complex_atc_i_cell2_dna_f_tetR_biocrnpyler_844781 => dna_f_biocrnpyler_844781 + complex_atc_i_cell2_tetR_biocrnpyler_844781; r6_biocrnpyler_844781_k*complex_atc_i_cell2_dna_f_tetR_biocrnpyler_844781;
    r6_biocrnpyler_844781_k = 5e-5;
  r6_1_biocrnpyler_844781: dna_f_biocrnpyler_844781 + complex_atc_i_cell2_tetR_biocrnpyler_844781 => complex_atc_i_cell2_dna_f_tetR_biocrnpyler_844781; r6_1_biocrnpyler_844781_k*dna_f_biocrnpyler_844781*complex_atc_i_cell2_tetR_biocrnpyler_844781;
    r6_1_biocrnpyler_844781_k = 1e-10;
  r8_biocrnpyler_844781: dna_f_biocrnpyler_844781 => dna_f_biocrnpyler_844781 + rna_f_biocrnpyler_844781; r8_biocrnpyler_844781_k*dna_f_biocrnpyler_844781;
    r8_biocrnpyler_844781_k = 0.001875;
  r9_biocrnpyler_844781: rna_f_biocrnpyler_844781 + ATP_biocrnpyler_844781_1_combined => rna_f_biocrnpyler_844781 + ADP_biocrnpyler_844781_1_combined + exsA_biocrnpyler_844781_1_combined + P_biocrnpyler_844781_1_combined; r9_biocrnpyler_844781_k*rna_f_biocrnpyler_844781*ATP_biocrnpyler_844781_1_combined^r9_biocrnpyler_844781_n/(ATP_biocrnpyler_844781_1_combined^r9_biocrnpyler_844781_n + r9_biocrnpyler_844781_K);
    r9_biocrnpyler_844781_k = 0.0005; r9_biocrnpyler_844781_n = 1; r9_biocrnpyler_844781_K = 1;
  r10_biocrnpyler_844781: rna_f_biocrnpyler_844781 => ; r10_biocrnpyler_844781_k*rna_f_biocrnpyler_844781;
    r10_biocrnpyler_844781_k = 0.001;
  r1_cell3: atc_e_external_reservoir_model_1_combined_1_combined -> atc_i_cell3; kb_combined*atc_e_external_reservoir_model_1_combined_1_combined - kd_combined*atc_i_cell3;
  r0_biocrnpyler_864602: dna_h_biocrnpyler_864602 + exsA_biocrnpyler_844781_1_combined => complex_dna_h_exsA_biocrnpyler_864602; r0_biocrnpyler_864602_k*dna_h_biocrnpyler_864602*exsA_biocrnpyler_844781_1_combined;
    r0_biocrnpyler_864602_k = 4e-5;
  r0_1_biocrnpyler_864602: complex_dna_h_exsA_biocrnpyler_864602 => dna_h_biocrnpyler_864602 + exsA_biocrnpyler_844781_1_combined; r0_1_biocrnpyler_864602_k*complex_dna_h_exsA_biocrnpyler_864602;
    r0_1_biocrnpyler_864602_k = 1e-12;
  r2_biocrnpyler_864602: complex_dna_h_exsA_biocrnpyler_864602 => complex_dna_h_exsA_biocrnpyler_864602 + rna_h_biocrnpyler_864602; r2_biocrnpyler_864602_k*complex_dna_h_exsA_biocrnpyler_864602;
    r2_biocrnpyler_864602_k = 0.001875;
  r3_biocrnpyler_864602: rna_h_biocrnpyler_864602 + ATP_biocrnpyler_844781_1_combined => rna_h_biocrnpyler_864602 + ADP_biocrnpyler_844781_1_combined + gfp_biocrnpyler_864602 + P_biocrnpyler_844781_1_combined; r3_biocrnpyler_864602_k*rna_h_biocrnpyler_864602*ATP_biocrnpyler_844781_1_combined^r3_biocrnpyler_864602_n/(ATP_biocrnpyler_844781_1_combined^r3_biocrnpyler_864602_n + r3_biocrnpyler_864602_K);
    r3_biocrnpyler_864602_k = 0.0005; r3_biocrnpyler_864602_n = 1; r3_biocrnpyler_864602_K = 1;
  r4_biocrnpyler_864602: rna_h_biocrnpyler_864602 => ; r4_biocrnpyler_864602_k*rna_h_biocrnpyler_864602;
    r4_biocrnpyler_864602_k = 0.001;

  // Unit definitions:
  unit square_metre = metre^2;
  unit per_second = 1 / second;
  unit substance = dimensionless;
end
