// SBML level 3 version 2

model biocrnpyler_404472()
  // model units - substance: mole, time: second, volume: litre, area: square_metre, length: metre, extent: mole

  // Compartments:
  compartment default = 1e-6;

  // Species:
  species dna_f in default = 0;
  species tetR in default = 0;
  species rna_f in default = 0;
  species exsA in default = 0;
  species ATP in default = 0;
  species ADP in default = 0;
  species atc_i in default = 0;
  species complex_atc_i_tetR_ in default = 0;
  species complex_dna_f_tetR_ in default = 0;
  species complex_atc_i_dna_f_tetR_ in default = 0;
  species P in default = 0;

  // Reactions:
  r0: atc_i + tetR => complex_atc_i_tetR_; r0_k_forward*atc_i*tetR;
    r0_k_forward = 2e-5;
  r0rev: complex_atc_i_tetR_ => atc_i + tetR; r0rev_k_reverse*complex_atc_i_tetR_;
    r0rev_k_reverse = 2e-9;
  r1: dna_f + tetR => complex_dna_f_tetR_; r1_k_forward*dna_f*tetR;
    r1_k_forward = 4e-7;
  r1rev: complex_dna_f_tetR_ => dna_f + tetR; r1rev_k_reverse*complex_dna_f_tetR_;
    r1rev_k_reverse = 1e-12;
  r2: complex_dna_f_tetR_ + atc_i => complex_atc_i_dna_f_tetR_; r2_k_forward*complex_dna_f_tetR_*atc_i;
    r2_k_forward = 6e-8;
  r2rev: complex_atc_i_dna_f_tetR_ => complex_dna_f_tetR_ + atc_i; r2rev_k_reverse*complex_atc_i_dna_f_tetR_;
    r2rev_k_reverse = 3e-9;
  r3: complex_atc_i_dna_f_tetR_ => dna_f + complex_atc_i_tetR_; r3_k_forward*complex_atc_i_dna_f_tetR_;
    r3_k_forward = 5e-5;
  r3rev: dna_f + complex_atc_i_tetR_ => complex_atc_i_dna_f_tetR_; r3rev_k_reverse*dna_f*complex_atc_i_tetR_;
    r3rev_k_reverse = 1e-10;
  r4: dna_f => dna_f + rna_f; r4_k_forward*dna_f;
    r4_k_forward = 0.001875;
  r5: rna_f + ATP => rna_f + ADP + exsA + P; k*rna_f*ATP^n/(K^n + ATP^n);
    k = 0.0007; K = 1; n = 1;
  r6: rna_f => ; r6_k_forward*rna_f;
    r6_k_forward = 0.001;

  // Unit definitions:
  unit square_metre = metre^2;
end
