// SBML level 3 version 2

model biocrnpyler_613009()
  // model units - substance: mole, time: second, volume: litre, area: square_metre, length: metre, extent: mole

  // Compartments:
  compartment default = 1e-6;

  // Species:
  species dna_h in default = 0;
  species rna_h in default = 0;
  species exsA in default = 0;
  species ATP in default = 0;
  species ADP in default = 0;
  species P in default = 0;
  species complex_dna_h_exsA_ in default = 0;
  species gfp in default = 0;

  // Reactions:
  r0: dna_h + exsA => complex_dna_h_exsA_; r0_k_forward*dna_h*exsA;
    r0_k_forward = 4e-5;
  r0rev: complex_dna_h_exsA_ => dna_h + exsA; k_reverse*complex_dna_h_exsA_;
    k_reverse = 1e-12;
  r1: complex_dna_h_exsA_ => complex_dna_h_exsA_ + rna_h; r1_k_forward*complex_dna_h_exsA_;
    r1_k_forward = 0.001875;
  r2: rna_h + ATP => rna_h + ADP + gfp + P; k*rna_h*ATP^n/(K^n + ATP^n);
    k = 0.0007; K = 1; n = 1;
  r3: rna_h => ; r3_k_forward*rna_h;
    r3_k_forward = 0.001;

  // Unit definitions:
  unit square_metre = metre^2;
end
