// SBML level 3 version 2

model combined_model_of__combined_model_of__external_reservoir_model_combined_model_of__atc_membrane_combined_model_of__biocrnpyler_942793()
  // model units - substance: mole, time: second, volume: litre, area: square_metre, length: metre, extent: mole

  // Compartments:
  compartment cellfusedexternal = 2e-6 litre;
  compartment cellfusedinternal = 1e-6 litre;

  // Species:
  species atc_e_external_reservoir_model_1_combined in cellfusedexternal = 10000/cellfusedexternal;
  species atc_i in cellfusedinternal = 0;
  species dna_h_biocrnpyler_942793 in cellfusedinternal = 1/cellfusedinternal;
  species rna_h_biocrnpyler_942793 in cellfusedinternal = 0;
  species exsA_biocrnpyler_942793 in cellfusedinternal = 0;
  species ATP_biocrnpyler_942793 in cellfusedinternal = 20/cellfusedinternal;
  species ADP_biocrnpyler_942793 in cellfusedinternal = 0;
  species P_biocrnpyler_942793 in cellfusedinternal = 0;
  species complex_dna_h_exsA_biocrnpyler_942793 in cellfusedinternal = 0;
  species gfp_biocrnpyler_942793 in cellfusedinternal = 0;

  // Parameters:
  kb = 0.002 per_second;
  kd = 1e-5 per_second;

  // Reactions:
  r1: atc_e_external_reservoir_model_1_combined -> atc_i; kb*atc_e_external_reservoir_model_1_combined - kd*atc_i;
  r0_biocrnpyler_942793: dna_h_biocrnpyler_942793 + exsA_biocrnpyler_942793 => complex_dna_h_exsA_biocrnpyler_942793; r0_biocrnpyler_942793_k*dna_h_biocrnpyler_942793*exsA_biocrnpyler_942793;
    r0_biocrnpyler_942793_k = 4e-5;
  r0_1_biocrnpyler_942793: complex_dna_h_exsA_biocrnpyler_942793 => dna_h_biocrnpyler_942793 + exsA_biocrnpyler_942793; r0_1_biocrnpyler_942793_k*complex_dna_h_exsA_biocrnpyler_942793;
    r0_1_biocrnpyler_942793_k = 1e-12;
  r2_biocrnpyler_942793: complex_dna_h_exsA_biocrnpyler_942793 => complex_dna_h_exsA_biocrnpyler_942793 + rna_h_biocrnpyler_942793; r2_biocrnpyler_942793_k*complex_dna_h_exsA_biocrnpyler_942793;
    r2_biocrnpyler_942793_k = 0.001875;
  r3_biocrnpyler_942793: rna_h_biocrnpyler_942793 + ATP_biocrnpyler_942793 => rna_h_biocrnpyler_942793 + ADP_biocrnpyler_942793 + gfp_biocrnpyler_942793 + P_biocrnpyler_942793; r3_biocrnpyler_942793_k*rna_h_biocrnpyler_942793*ATP_biocrnpyler_942793^n/(ATP_biocrnpyler_942793^n + K);
    r3_biocrnpyler_942793_k = 0.0007; n = 1; K = 1;
  r4_biocrnpyler_942793: rna_h_biocrnpyler_942793 => ; r4_biocrnpyler_942793_k*rna_h_biocrnpyler_942793;
    r4_biocrnpyler_942793_k = 0.001;

  // Unit definitions:
  unit square_metre = metre^2;
  unit per_second = 1 / second;
  unit substance = dimensionless;
end
