// SBML level 3 version 2

model combined_model_of__combined_model_of__combined_model_of__external_reservoir_model_combined_model_of__combined_model_of__biocrnpyler_151102_combined_model_of__combined_model_of__external_reservoir_model_combined_model_of__atc_membrane_combined_model_of__biocrnpyler_942793()
  // model units - substance: mole, time: second, volume: litre, area: square_metre, length: metre, extent: mole

  // Compartments:
  compartment cellfusedexternal_combined = 3e-6 litre;
  compartment cellfusedinternal_combined = 0;

  // Species:
  species dna_f_biocrnpyler_151102 in cellfusedinternal_combined = 1/cellfusedinternal_combined;
  species tetR_biocrnpyler_151102 in cellfusedinternal_combined = 10/cellfusedinternal_combined;
  species rna_f_biocrnpyler_151102 in cellfusedinternal_combined = 0;
  species atc_i_biocrnpyler_151102 in cellfusedinternal_combined = 0;
  species complex_atc_i_tetR_biocrnpyler_151102 in cellfusedinternal_combined = 0;
  species complex_dna_f_tetR_biocrnpyler_151102 in cellfusedinternal_combined = 0;
  species complex_atc_i_dna_f_tetR_biocrnpyler_151102 in cellfusedinternal_combined = 0;
  species atc_e_external_reservoir_model_1_combined in cellfusedexternal_combined = 10000/cellfusedexternal_combined;
  species atc_i in cellfusedinternal_combined = 0;
  species dna_h_biocrnpyler_942793 in cellfusedinternal_combined = 1/cellfusedinternal_combined;
  species rna_h_biocrnpyler_942793 in cellfusedinternal_combined = 0;
  species exsA_biocrnpyler_151102_1_combined in cellfusedinternal_combined = 0;
  species ATP_biocrnpyler_151102_1_combined in cellfusedinternal_combined = 20/cellfusedinternal_combined;
  species ADP_biocrnpyler_151102_1_combined in cellfusedinternal_combined = 0;
  species P_biocrnpyler_151102_1_combined in cellfusedinternal_combined = 0;
  species complex_dna_h_exsA_biocrnpyler_942793 in cellfusedinternal_combined = 0;
  species gfp_biocrnpyler_942793 in cellfusedinternal_combined = 0;

  // Parameters:
  kb = 0.002 per_second;
  kd = 1e-5 per_second;

  // Reactions:
  r0_biocrnpyler_151102: atc_i_biocrnpyler_151102 + tetR_biocrnpyler_151102 => complex_atc_i_tetR_biocrnpyler_151102; r0_biocrnpyler_151102_k*atc_i_biocrnpyler_151102*tetR_biocrnpyler_151102;
    r0_biocrnpyler_151102_k = 2e-5;
  r0_1_biocrnpyler_151102: complex_atc_i_tetR_biocrnpyler_151102 => atc_i_biocrnpyler_151102 + tetR_biocrnpyler_151102; r0_1_biocrnpyler_151102_k*complex_atc_i_tetR_biocrnpyler_151102;
    r0_1_biocrnpyler_151102_k = 2e-9;
  r2_biocrnpyler_151102: dna_f_biocrnpyler_151102 + tetR_biocrnpyler_151102 => complex_dna_f_tetR_biocrnpyler_151102; r2_biocrnpyler_151102_k*dna_f_biocrnpyler_151102*tetR_biocrnpyler_151102;
    r2_biocrnpyler_151102_k = 4e-7;
  r2_1_biocrnpyler_151102: complex_dna_f_tetR_biocrnpyler_151102 => dna_f_biocrnpyler_151102 + tetR_biocrnpyler_151102; r2_1_biocrnpyler_151102_k*complex_dna_f_tetR_biocrnpyler_151102;
    r2_1_biocrnpyler_151102_k = 1e-12;
  r4_biocrnpyler_151102: complex_dna_f_tetR_biocrnpyler_151102 + atc_i_biocrnpyler_151102 => complex_atc_i_dna_f_tetR_biocrnpyler_151102; r4_biocrnpyler_151102_k*complex_dna_f_tetR_biocrnpyler_151102*atc_i_biocrnpyler_151102;
    r4_biocrnpyler_151102_k = 6e-8;
  r4_1_biocrnpyler_151102: complex_atc_i_dna_f_tetR_biocrnpyler_151102 => complex_dna_f_tetR_biocrnpyler_151102 + atc_i_biocrnpyler_151102; r4_1_biocrnpyler_151102_k*complex_atc_i_dna_f_tetR_biocrnpyler_151102;
    r4_1_biocrnpyler_151102_k = 3e-9;
  r6_biocrnpyler_151102: complex_atc_i_dna_f_tetR_biocrnpyler_151102 => dna_f_biocrnpyler_151102 + complex_atc_i_tetR_biocrnpyler_151102; r6_biocrnpyler_151102_k*complex_atc_i_dna_f_tetR_biocrnpyler_151102;
    r6_biocrnpyler_151102_k = 5e-5;
  r6_1_biocrnpyler_151102: dna_f_biocrnpyler_151102 + complex_atc_i_tetR_biocrnpyler_151102 => complex_atc_i_dna_f_tetR_biocrnpyler_151102; r6_1_biocrnpyler_151102_k*dna_f_biocrnpyler_151102*complex_atc_i_tetR_biocrnpyler_151102;
    r6_1_biocrnpyler_151102_k = 1e-10;
  r8_biocrnpyler_151102: dna_f_biocrnpyler_151102 => dna_f_biocrnpyler_151102 + rna_f_biocrnpyler_151102; r8_biocrnpyler_151102_k*dna_f_biocrnpyler_151102;
    r8_biocrnpyler_151102_k = 0.001875;
  r9_biocrnpyler_151102: rna_f_biocrnpyler_151102 + ATP_biocrnpyler_151102_1_combined => rna_f_biocrnpyler_151102 + ADP_biocrnpyler_151102_1_combined + exsA_biocrnpyler_151102_1_combined + P_biocrnpyler_151102_1_combined; r9_biocrnpyler_151102_k*rna_f_biocrnpyler_151102*ATP_biocrnpyler_151102_1_combined^r9_biocrnpyler_151102_n/(ATP_biocrnpyler_151102_1_combined^r9_biocrnpyler_151102_n + r9_biocrnpyler_151102_K);
    r9_biocrnpyler_151102_k = 0.0007; r9_biocrnpyler_151102_n = 1; r9_biocrnpyler_151102_K = 1;
  r10_biocrnpyler_151102: rna_f_biocrnpyler_151102 => ; r10_biocrnpyler_151102_k*rna_f_biocrnpyler_151102;
    r10_biocrnpyler_151102_k = 0.001;
  r1: atc_e_external_reservoir_model_1_combined -> atc_i; kb*atc_e_external_reservoir_model_1_combined - kd*atc_i;
  r0_biocrnpyler_942793: dna_h_biocrnpyler_942793 + exsA_biocrnpyler_151102_1_combined => complex_dna_h_exsA_biocrnpyler_942793; r0_biocrnpyler_942793_k*dna_h_biocrnpyler_942793*exsA_biocrnpyler_151102_1_combined;
    r0_biocrnpyler_942793_k = 4e-5;
  r0_1_biocrnpyler_942793: complex_dna_h_exsA_biocrnpyler_942793 => dna_h_biocrnpyler_942793 + exsA_biocrnpyler_151102_1_combined; r0_1_biocrnpyler_942793_k*complex_dna_h_exsA_biocrnpyler_942793;
    r0_1_biocrnpyler_942793_k = 1e-12;
  r2_biocrnpyler_942793: complex_dna_h_exsA_biocrnpyler_942793 => complex_dna_h_exsA_biocrnpyler_942793 + rna_h_biocrnpyler_942793; r2_biocrnpyler_942793_k*complex_dna_h_exsA_biocrnpyler_942793;
    r2_biocrnpyler_942793_k = 0.001875;
  r3_biocrnpyler_942793: rna_h_biocrnpyler_942793 + ATP_biocrnpyler_151102_1_combined => rna_h_biocrnpyler_942793 + ADP_biocrnpyler_151102_1_combined + gfp_biocrnpyler_942793 + P_biocrnpyler_151102_1_combined; r3_biocrnpyler_942793_k*rna_h_biocrnpyler_942793*ATP_biocrnpyler_151102_1_combined^r3_biocrnpyler_942793_n/(ATP_biocrnpyler_151102_1_combined^r3_biocrnpyler_942793_n + r3_biocrnpyler_942793_K);
    r3_biocrnpyler_942793_k = 0.0007; r3_biocrnpyler_942793_n = 1; r3_biocrnpyler_942793_K = 1;
  r4_biocrnpyler_942793: rna_h_biocrnpyler_942793 => ; r4_biocrnpyler_942793_k*rna_h_biocrnpyler_942793;
    r4_biocrnpyler_942793_k = 0.001;

  // Unit definitions:
  unit square_metre = metre^2;
  unit per_second = 1 / second;
  unit substance = dimensionless;
end
