// SBML level 3 version 2

model atc_membrane()
  // model units - substance: substance, time: second, extent: mole

  // Compartments:
  compartment internal = 1e-6 litre;
  compartment external = 1e-6 litre;

  // Species:
  species atc_e in external = 0;
  species atc_i in internal = 0;
  species ssDNA_e in external = 0;
  species ssDNA in internal = 0;
  species VirE2_b in internal = 0;
  species VirE2_b_ssDNA in internal = 0;

  // Parameters:
  kb1 = 0.002 per_second;
  kd1 = 1e-5 per_second;
  kd2 = 0.0002 per_second;
  kb = 0.002 per_second;
  kd = 1e-5 per_second;

  // Reactions:
  r1: atc_e -> atc_i; kb*atc_e - kd*atc_i;
  R1: VirE2_b + ssDNA -> VirE2_b_ssDNA; kb1*VirE2_b*ssDNA - kd1*VirE2_b_ssDNA;
  R2: VirE2_b_ssDNA => ssDNA_e + VirE2_b; kd2*VirE2_b_ssDNA;

  // Unit definitions:
  unit per_second = 1 / second;
  unit substance = dimensionless;
end
