// SBML level 3 version 2

model external_reservoir_model()
  // model units - substance: mole, time: second, volume: litre, area: square_metre, length: metre, extent: mole

  // Compartments:
  compartment external_reservoir = 1e-6 litre;

  // Species:
  species atc_e in external_reservoir = 10000;
  species ssDNA_comp1 in external_reservoir = 0;
  species ssDNA_comp2 in external_reservoir = 0;
  species ssDNA_e in external_reservoir = 0;
  species dsDNA in external_reservoir = 0;

  // Parameters:
  kf = 2e-5 per_second;
  kre = 1e-8 per_second;

  // Reactions:
  rxx1: ssDNA_comp1 + ssDNA_comp2 + ssDNA_e -> dsDNA; kf*ssDNA_comp1*ssDNA_comp2*ssDNA_e - kre*dsDNA;

  // Unit definitions:
  unit square_metre = metre^2;
  unit per_second = 1 / second;
  unit substance = dimensionless;
end
