// SBML level 3 version 2

model combined_model_of__biocrnpyler_809953_external_reservoir_model_atc_membrane_dnaexp_membrane_biocrnpyler_523332_external_reservoir_model_atc_membrane_biocrnpyler_357607_external_reservoir_model_atc_membrane()
  // model units - substance: mole, time: second, volume: litre, area: square_metre, length: metre, extent: mole

  // Compartments:
  compartment cell_1_internal_combined = 1e-5;
  compartment cell_1_external_combined = 1e-6 litre;
  compartment cell_2_internal_combined = 1e-6;
  compartment cell_2_external_combined = 1e-6 litre;
  compartment cell_3_internal_combined = 1e-6;
  compartment cell_3_external_combined = 1e-6 litre;
  compartment cell_1_internal_combined_1 = 1e-6 litre;
  compartment cell_1_external_combined_1 = 1e-6 litre;

  // Species:
  species dna_g_biocrnpyler_809953 in cell_1_internal_combined = 0;
  species tetR_biocrnpyler_809953 in cell_1_internal_combined = 0;
  species rna_g_biocrnpyler_809953 in cell_1_internal_combined = 0;
  species VirE2_f_biocrnpyler_809953 in cell_1_internal_combined = 0;
  species ATP_biocrnpyler_809953 in cell_1_internal_combined = 0;
  species ADP_biocrnpyler_809953 in cell_1_internal_combined = 0;
  species atc_i_biocrnpyler_809953 in cell_1_internal_combined = 0;
  species complex_atc_i_tetR_biocrnpyler_809953 in cell_1_internal_combined = 0;
  species VirE2_b_biocrnpyler_809953 in cell_1_internal_combined = 0;
  species complex_dna_g_tetR_biocrnpyler_809953 in cell_1_internal_combined = 0;
  species complex_atc_i_dna_g_tetR_biocrnpyler_809953 in cell_1_internal_combined = 0;
  species P_biocrnpyler_809953 in cell_1_internal_combined = 0;
  species atc_e_external_reservoir_model_1_combined in cell_1_external_combined = 0;
  species atc_i in cell_1_internal_combined = 0;
  species ssDNA_e in cell_1_external_combined = 0;
  species ssDNA in cell_1_internal_combined = 0;
  species VirE2_b in cell_1_internal_combined = 0;
  species VirE2_b_ssDNA in cell_1_internal_combined = 0;
  species dna_f_biocrnpyler_523332 in cell_2_internal_combined = 0;
  species tetR_biocrnpyler_523332 in cell_2_internal_combined = 0;
  species rna_f_biocrnpyler_523332 in cell_2_internal_combined = 0;
  species exsA_biocrnpyler_523332 in cell_2_internal_combined = 0;
  species ATP_biocrnpyler_523332 in cell_2_internal_combined = 0;
  species ADP_biocrnpyler_523332 in cell_2_internal_combined = 0;
  species atc_i_biocrnpyler_523332 in cell_2_internal_combined = 0;
  species complex_atc_i_tetR_biocrnpyler_523332 in cell_2_internal_combined = 0;
  species complex_dna_f_tetR_biocrnpyler_523332 in cell_2_internal_combined = 0;
  species complex_atc_i_dna_f_tetR_biocrnpyler_523332 in cell_2_internal_combined = 0;
  species P_biocrnpyler_523332 in cell_2_internal_combined = 0;
  species ssDNA_comp1_external_reservoir_model in cell_2_external_combined = 0;
  species ssDNA_comp2_external_reservoir_model in cell_2_external_combined = 0;
  species ssDNA_e_external_reservoir_model in cell_2_external_combined = 0;
  species dsDNA_external_reservoir_model in cell_2_external_combined = 0;
  species dna_h_biocrnpyler_357607 in cell_3_internal_combined = 0;
  species rna_h_biocrnpyler_357607 in cell_3_internal_combined = 0;
  species exsA_biocrnpyler_357607 in cell_3_internal_combined = 0;
  species ATP_biocrnpyler_357607 in cell_3_internal_combined = 0;
  species ADP_biocrnpyler_357607 in cell_3_internal_combined = 0;
  species P_biocrnpyler_357607 in cell_3_internal_combined = 0;
  species complex_dna_h_exsA_biocrnpyler_357607 in cell_3_internal_combined = 0;
  species gfp_biocrnpyler_357607 in cell_3_internal_combined = 0;
  species atc_e_external_reservoir_model_combined in cell_3_external = 10000;
  species atc_e_external_reservoir_model_combined in cell_3_external = 0;

  // Parameters:
  kb1 = 0.002 per_second;
  kd1 = 1e-5 per_second;
  kd2 = 0.0002 per_second;
  kb_combined = 0.002 per_second;
  kd_combined = 1e-5 per_second;
  kf_combined = 2e-5 per_second;
  kre_combined = 1e-8 per_second;

  // Reactions:
  r0_biocrnpyler_809953_combined: atc_i_biocrnpyler_809953 + tetR_biocrnpyler_809953 => complex_atc_i_tetR_biocrnpyler_809953; r0_biocrnpyler_809953_combined_k*atc_i_biocrnpyler_809953*tetR_biocrnpyler_809953;
    r0_biocrnpyler_809953_combined_k = 0.0002;
  r0_1_biocrnpyler_809953_combined: complex_atc_i_tetR_biocrnpyler_809953 => atc_i_biocrnpyler_809953 + tetR_biocrnpyler_809953; r0_1_biocrnpyler_809953_combined_k*complex_atc_i_tetR_biocrnpyler_809953;
    r0_1_biocrnpyler_809953_combined_k = 2e-9;
  r2_biocrnpyler_809953: dna_g_biocrnpyler_809953 + tetR_biocrnpyler_809953 => complex_dna_g_tetR_biocrnpyler_809953; r2_biocrnpyler_809953_k*dna_g_biocrnpyler_809953*tetR_biocrnpyler_809953;
    r2_biocrnpyler_809953_k = 4e-5;
  r2_1_biocrnpyler_809953: complex_dna_g_tetR_biocrnpyler_809953 => dna_g_biocrnpyler_809953 + tetR_biocrnpyler_809953; r2_1_biocrnpyler_809953_k*complex_dna_g_tetR_biocrnpyler_809953;
    r2_1_biocrnpyler_809953_k = 1e-12;
  r4_biocrnpyler_809953: complex_dna_g_tetR_biocrnpyler_809953 + atc_i_biocrnpyler_809953 => complex_atc_i_dna_g_tetR_biocrnpyler_809953; r4_biocrnpyler_809953_k*complex_dna_g_tetR_biocrnpyler_809953*atc_i_biocrnpyler_809953;
    r4_biocrnpyler_809953_k = 6e-6;
  r4_1_biocrnpyler_809953: complex_atc_i_dna_g_tetR_biocrnpyler_809953 => complex_dna_g_tetR_biocrnpyler_809953 + atc_i_biocrnpyler_809953; r4_1_biocrnpyler_809953_k*complex_atc_i_dna_g_tetR_biocrnpyler_809953;
    r4_1_biocrnpyler_809953_k = 3e-9;
  r6_biocrnpyler_809953: complex_atc_i_dna_g_tetR_biocrnpyler_809953 => dna_g_biocrnpyler_809953 + complex_atc_i_tetR_biocrnpyler_809953; r6_biocrnpyler_809953_k*complex_atc_i_dna_g_tetR_biocrnpyler_809953;
    r6_biocrnpyler_809953_k = 0.005;
  r6_1_biocrnpyler_809953: dna_g_biocrnpyler_809953 + complex_atc_i_tetR_biocrnpyler_809953 => complex_atc_i_dna_g_tetR_biocrnpyler_809953; r6_1_biocrnpyler_809953_k*dna_g_biocrnpyler_809953*complex_atc_i_tetR_biocrnpyler_809953;
    r6_1_biocrnpyler_809953_k = 1e-10;
  r8_biocrnpyler_809953: dna_g_biocrnpyler_809953 => dna_g_biocrnpyler_809953 + rna_g_biocrnpyler_809953; r8_biocrnpyler_809953_k*dna_g_biocrnpyler_809953;
    r8_biocrnpyler_809953_k = 0.0031875;
  r9_biocrnpyler_809953: rna_g_biocrnpyler_809953 + ATP_biocrnpyler_809953 => rna_g_biocrnpyler_809953 + ADP_biocrnpyler_809953 + VirE2_f_biocrnpyler_809953 + P_biocrnpyler_809953; r9_biocrnpyler_809953_k*rna_g_biocrnpyler_809953*ATP_biocrnpyler_809953^r9_biocrnpyler_809953_n/(ATP_biocrnpyler_809953^r9_biocrnpyler_809953_n + r9_biocrnpyler_809953_K);
    r9_biocrnpyler_809953_k = 0.001; r9_biocrnpyler_809953_n = 1; r9_biocrnpyler_809953_K = 1;
  r10_biocrnpyler_809953: VirE2_f_biocrnpyler_809953 => VirE2_b_biocrnpyler_809953; r10_biocrnpyler_809953_k*VirE2_f_biocrnpyler_809953;
    r10_biocrnpyler_809953_k = 5e-5;
  r10_1_biocrnpyler_809953: VirE2_b_biocrnpyler_809953 => VirE2_f_biocrnpyler_809953; r10_1_biocrnpyler_809953_k*VirE2_b_biocrnpyler_809953;
    r10_1_biocrnpyler_809953_k = 1e-10;
  r12_biocrnpyler_809953: rna_g_biocrnpyler_809953 => ; r12_biocrnpyler_809953_k*rna_g_biocrnpyler_809953;
    r12_biocrnpyler_809953_k = 0.001;
  r13_biocrnpyler_809953: VirE2_f_biocrnpyler_809953 => ; r13_biocrnpyler_809953_k*VirE2_f_biocrnpyler_809953;
    r13_biocrnpyler_809953_k = 1e-5;
  R1: VirE2_b + ssDNA -> VirE2_b_ssDNA; kb1*VirE2_b*ssDNA - kd1*VirE2_b_ssDNA;
  R2: VirE2_b_ssDNA => ssDNA_e + VirE2_b; kd2*VirE2_b_ssDNA;
  r2_biocrnpyler_523332: dna_f_biocrnpyler_523332 + tetR_biocrnpyler_523332 => complex_dna_f_tetR_biocrnpyler_523332; r2_biocrnpyler_523332_k*dna_f_biocrnpyler_523332*tetR_biocrnpyler_523332;
    r2_biocrnpyler_523332_k = 4e-7;
  r2_1_biocrnpyler_523332: complex_dna_f_tetR_biocrnpyler_523332 => dna_f_biocrnpyler_523332 + tetR_biocrnpyler_523332; r2_1_biocrnpyler_523332_k*complex_dna_f_tetR_biocrnpyler_523332;
    r2_1_biocrnpyler_523332_k = 1e-12;
  r4_biocrnpyler_523332: complex_dna_f_tetR_biocrnpyler_523332 + atc_i_biocrnpyler_523332 => complex_atc_i_dna_f_tetR_biocrnpyler_523332; r4_biocrnpyler_523332_k*complex_dna_f_tetR_biocrnpyler_523332*atc_i_biocrnpyler_523332;
    r4_biocrnpyler_523332_k = 6e-8;
  r4_1_biocrnpyler_523332: complex_atc_i_dna_f_tetR_biocrnpyler_523332 => complex_dna_f_tetR_biocrnpyler_523332 + atc_i_biocrnpyler_523332; r4_1_biocrnpyler_523332_k*complex_atc_i_dna_f_tetR_biocrnpyler_523332;
    r4_1_biocrnpyler_523332_k = 3e-9;
  r6_biocrnpyler_523332: complex_atc_i_dna_f_tetR_biocrnpyler_523332 => dna_f_biocrnpyler_523332 + complex_atc_i_tetR_biocrnpyler_523332; r6_biocrnpyler_523332_k*complex_atc_i_dna_f_tetR_biocrnpyler_523332;
    r6_biocrnpyler_523332_k = 5e-5;
  r6_1_biocrnpyler_523332: dna_f_biocrnpyler_523332 + complex_atc_i_tetR_biocrnpyler_523332 => complex_atc_i_dna_f_tetR_biocrnpyler_523332; r6_1_biocrnpyler_523332_k*dna_f_biocrnpyler_523332*complex_atc_i_tetR_biocrnpyler_523332;
    r6_1_biocrnpyler_523332_k = 1e-10;
  r8_biocrnpyler_523332: dna_f_biocrnpyler_523332 => dna_f_biocrnpyler_523332 + rna_f_biocrnpyler_523332; r8_biocrnpyler_523332_k*dna_f_biocrnpyler_523332;
    r8_biocrnpyler_523332_k = 0.001875;
  r9_biocrnpyler_523332: rna_f_biocrnpyler_523332 + ATP_biocrnpyler_523332 => rna_f_biocrnpyler_523332 + ADP_biocrnpyler_523332 + exsA_biocrnpyler_523332 + P_biocrnpyler_523332; r9_biocrnpyler_523332_k*rna_f_biocrnpyler_523332*ATP_biocrnpyler_523332^r9_biocrnpyler_523332_n/(ATP_biocrnpyler_523332^r9_biocrnpyler_523332_n + r9_biocrnpyler_523332_K);
    r9_biocrnpyler_523332_k = 0.0005; r9_biocrnpyler_523332_n = 1; r9_biocrnpyler_523332_K = 1;
  r10_biocrnpyler_523332: rna_f_biocrnpyler_523332 => ; r10_biocrnpyler_523332_k*rna_f_biocrnpyler_523332;
    r10_biocrnpyler_523332_k = 0.001;
  r0_biocrnpyler_357607: dna_h_biocrnpyler_357607 + exsA_biocrnpyler_357607 => complex_dna_h_exsA_biocrnpyler_357607; r0_biocrnpyler_357607_k*dna_h_biocrnpyler_357607*exsA_biocrnpyler_357607;
    r0_biocrnpyler_357607_k = 4e-5;
  r0_1_biocrnpyler_357607: complex_dna_h_exsA_biocrnpyler_357607 => dna_h_biocrnpyler_357607 + exsA_biocrnpyler_357607; r0_1_biocrnpyler_357607_k*complex_dna_h_exsA_biocrnpyler_357607;
    r0_1_biocrnpyler_357607_k = 1e-12;
  r2_biocrnpyler_357607: complex_dna_h_exsA_biocrnpyler_357607 => complex_dna_h_exsA_biocrnpyler_357607 + rna_h_biocrnpyler_357607; r2_biocrnpyler_357607_k*complex_dna_h_exsA_biocrnpyler_357607;
    r2_biocrnpyler_357607_k = 0.001875;
  r3_biocrnpyler_357607: rna_h_biocrnpyler_357607 + ATP_biocrnpyler_357607 => rna_h_biocrnpyler_357607 + ADP_biocrnpyler_357607 + gfp_biocrnpyler_357607 + P_biocrnpyler_357607; r3_biocrnpyler_357607_k*rna_h_biocrnpyler_357607*ATP_biocrnpyler_357607^r3_biocrnpyler_357607_n/(ATP_biocrnpyler_357607^r3_biocrnpyler_357607_n + r3_biocrnpyler_357607_K);
    r3_biocrnpyler_357607_k = 0.0005; r3_biocrnpyler_357607_n = 1; r3_biocrnpyler_357607_K = 1;
  r4_biocrnpyler_357607: rna_h_biocrnpyler_357607 => ; r4_biocrnpyler_357607_k*rna_h_biocrnpyler_357607;
    r4_biocrnpyler_357607_k = 0.001;

  // Unit definitions:
  unit square_metre = metre^2;
  unit per_second = 1 / second;
  unit substance = dimensionless;
end
