// SBML level 3 version 2

model combined_model_of__combined_model_of__external_reservoir_model_combined_model_of__atc_membrane_dnaexp_membrane_combined_model_of__biocrnpyler_607772()
  // model units - substance: mole, time: second, volume: litre, area: square_metre, length: metre, extent: mole

  // Compartments:
  compartment cell_1_internal_combined = 3e-6 litre;
  compartment cell_external = 1e-6 litre;

  // Species:
  species ssDNA_comp1_external_reservoir_model in cell_external = 0;
  species ssDNA_comp2_external_reservoir_model in cell_external = 0;
  species dsDNA_external_reservoir_model in cell_external = 0;
  species atc_e_external_reservoir_model_1_combined in cell_external = 10000/cell_external;
  species ssDNA_e_external_reservoir_model_1_combined in cell_external = 0;
  species ssDNA in cell_1_internal_combined = 50/cell_1_internal_combined;
  species VirE2_b_ssDNA in cell_1_internal_combined = 0;
  species dna_g_biocrnpyler_607772 in cell_1_internal_combined = 1/cell_1_internal_combined;
  species tetR_biocrnpyler_607772 in cell_1_internal_combined = 10/cell_1_internal_combined;
  species rna_g_biocrnpyler_607772 in cell_1_internal_combined = 0;
  species VirE2_f_biocrnpyler_607772 in cell_1_internal_combined = 0;
  species ATP_biocrnpyler_607772 in cell_1_internal_combined = 10/cell_1_internal_combined;
  species ADP_biocrnpyler_607772 in cell_1_internal_combined = 0;
  species atc_i_1_combined in cell_1_internal_combined = 0;
  species complex_atc_i_tetR_biocrnpyler_607772 in cell_1_internal_combined = 0;
  species VirE2_b_1_combined in cell_1_internal_combined = 0;
  species complex_dna_g_tetR_biocrnpyler_607772 in cell_1_internal_combined = 0;
  species complex_atc_i_dna_g_tetR_biocrnpyler_607772 in cell_1_internal_combined = 0;
  species P_biocrnpyler_607772 in cell_1_internal_combined = 0;

  // Parameters:
  kf_external_reservoir_model = 2e-5 per_second;
  kre_external_reservoir_model = 1e-8 per_second;
  kb = 0.002 per_second;
  kd = 1e-5 per_second;
  kb1 = 0.002 per_second;
  kd1 = 1e-5 per_second;
  kd2 = 0.0002 per_second;

  // Reactions:
  rxx1_external_reservoir_model: ssDNA_comp1_external_reservoir_model + ssDNA_comp2_external_reservoir_model + ssDNA_e_external_reservoir_model_1_combined -> dsDNA_external_reservoir_model; kf_external_reservoir_model*ssDNA_comp1_external_reservoir_model*ssDNA_comp2_external_reservoir_model*ssDNA_e_external_reservoir_model_1_combined - kre_external_reservoir_model*dsDNA_external_reservoir_model;
  r1: atc_e_external_reservoir_model_1_combined -> atc_i_1_combined; kb*atc_e_external_reservoir_model_1_combined - kd*atc_i_1_combined;
  R1: VirE2_b_1_combined + ssDNA -> VirE2_b_ssDNA; kb1*VirE2_b_1_combined*ssDNA - kd1*VirE2_b_ssDNA;
  R2: VirE2_b_ssDNA => ssDNA_e_external_reservoir_model_1_combined + VirE2_b_1_combined; kd2*VirE2_b_ssDNA;
  r0_biocrnpyler_607772: atc_i_1_combined + tetR_biocrnpyler_607772 => complex_atc_i_tetR_biocrnpyler_607772; r0_biocrnpyler_607772_k*atc_i_1_combined*tetR_biocrnpyler_607772;
    r0_biocrnpyler_607772_k = 0.0002;
  r0_1_biocrnpyler_607772: complex_atc_i_tetR_biocrnpyler_607772 => atc_i_1_combined + tetR_biocrnpyler_607772; r0_1_biocrnpyler_607772_k*complex_atc_i_tetR_biocrnpyler_607772;
    r0_1_biocrnpyler_607772_k = 2e-9;
  r2_biocrnpyler_607772: dna_g_biocrnpyler_607772 + tetR_biocrnpyler_607772 => complex_dna_g_tetR_biocrnpyler_607772; r2_biocrnpyler_607772_k*dna_g_biocrnpyler_607772*tetR_biocrnpyler_607772;
    r2_biocrnpyler_607772_k = 4e-5;
  r2_1_biocrnpyler_607772: complex_dna_g_tetR_biocrnpyler_607772 => dna_g_biocrnpyler_607772 + tetR_biocrnpyler_607772; r2_1_biocrnpyler_607772_k*complex_dna_g_tetR_biocrnpyler_607772;
    r2_1_biocrnpyler_607772_k = 1e-12;
  r4_biocrnpyler_607772: complex_dna_g_tetR_biocrnpyler_607772 + atc_i_1_combined => complex_atc_i_dna_g_tetR_biocrnpyler_607772; r4_biocrnpyler_607772_k*complex_dna_g_tetR_biocrnpyler_607772*atc_i_1_combined;
    r4_biocrnpyler_607772_k = 6e-6;
  r4_1_biocrnpyler_607772: complex_atc_i_dna_g_tetR_biocrnpyler_607772 => complex_dna_g_tetR_biocrnpyler_607772 + atc_i_1_combined; r4_1_biocrnpyler_607772_k*complex_atc_i_dna_g_tetR_biocrnpyler_607772;
    r4_1_biocrnpyler_607772_k = 3e-9;
  r6_biocrnpyler_607772: complex_atc_i_dna_g_tetR_biocrnpyler_607772 => dna_g_biocrnpyler_607772 + complex_atc_i_tetR_biocrnpyler_607772; r6_biocrnpyler_607772_k*complex_atc_i_dna_g_tetR_biocrnpyler_607772;
    r6_biocrnpyler_607772_k = 0.005;
  r6_1_biocrnpyler_607772: dna_g_biocrnpyler_607772 + complex_atc_i_tetR_biocrnpyler_607772 => complex_atc_i_dna_g_tetR_biocrnpyler_607772; r6_1_biocrnpyler_607772_k*dna_g_biocrnpyler_607772*complex_atc_i_tetR_biocrnpyler_607772;
    r6_1_biocrnpyler_607772_k = 1e-10;
  r8_biocrnpyler_607772: dna_g_biocrnpyler_607772 => dna_g_biocrnpyler_607772 + rna_g_biocrnpyler_607772; r8_biocrnpyler_607772_k*dna_g_biocrnpyler_607772;
    r8_biocrnpyler_607772_k = 0.0031875;
  r9_biocrnpyler_607772: rna_g_biocrnpyler_607772 + ATP_biocrnpyler_607772 => rna_g_biocrnpyler_607772 + ADP_biocrnpyler_607772 + VirE2_f_biocrnpyler_607772 + P_biocrnpyler_607772; r9_biocrnpyler_607772_k*rna_g_biocrnpyler_607772*ATP_biocrnpyler_607772^n/(ATP_biocrnpyler_607772^n + K);
    r9_biocrnpyler_607772_k = 0.001; n = 1; K = 1;
  r10_biocrnpyler_607772: VirE2_f_biocrnpyler_607772 => VirE2_b_1_combined; r10_biocrnpyler_607772_k*VirE2_f_biocrnpyler_607772;
    r10_biocrnpyler_607772_k = 5e-5;
  r10_1_biocrnpyler_607772: VirE2_b_1_combined => VirE2_f_biocrnpyler_607772; r10_1_biocrnpyler_607772_k*VirE2_b_1_combined;
    r10_1_biocrnpyler_607772_k = 1e-10;
  r12_biocrnpyler_607772: rna_g_biocrnpyler_607772 => ; r12_biocrnpyler_607772_k*rna_g_biocrnpyler_607772;
    r12_biocrnpyler_607772_k = 0.001;
  r13_biocrnpyler_607772: VirE2_f_biocrnpyler_607772 => ; r13_biocrnpyler_607772_k*VirE2_f_biocrnpyler_607772;
    r13_biocrnpyler_607772_k = 1e-5;

  // Unit definitions:
  unit square_metre = metre^2;
  unit per_second = 1 / second;
  unit substance = dimensionless;
end
