// SBML level 3 version 2

model combined_model_of__combined_model_of__external_reservoir_model_combined_model_of__atc_membrane_combined_model_of__biocrnpyler_478938()
  // model units - substance: mole, time: second, volume: litre, area: square_metre, length: metre, extent: mole

  // Compartments:
  compartment cell_external = 2e-6 litre;
  compartment cell_2_internal_combined = 0.0001 litre;

  // Species:
  species ssDNA_comp1_external_reservoir_model in cell_external = 50/cell_external;
  species ssDNA_comp2_external_reservoir_model in cell_external = 0;
  species ssDNA_e_external_reservoir_model in cell_external = 0;
  species dsDNA_external_reservoir_model in cell_external = 0;
  species atc_e_external_reservoir_model_1_combined in cell_external = 10000/cell_external;
  species dna_f_biocrnpyler_478938 in cell_2_internal_combined = 1/cell_2_internal_combined;
  species tetR_biocrnpyler_478938 in cell_2_internal_combined = 10/cell_2_internal_combined;
  species rna_f_biocrnpyler_478938 in cell_2_internal_combined = 0;
  species exsA_biocrnpyler_478938 in cell_2_internal_combined = 0;
  species ATP_biocrnpyler_478938 in cell_2_internal_combined = 20/cell_2_internal_combined;
  species ADP_biocrnpyler_478938 in cell_2_internal_combined = 0;
  species atc_i_1_combined in cell_2_internal_combined = 0;
  species complex_atc_i_tetR_biocrnpyler_478938 in cell_2_internal_combined = 0;
  species complex_dna_f_tetR_biocrnpyler_478938 in cell_2_internal_combined = 0;
  species complex_atc_i_dna_f_tetR_biocrnpyler_478938 in cell_2_internal_combined = 0;
  species P_biocrnpyler_478938 in cell_2_internal_combined = 0;

  // Parameters:
  kf_external_reservoir_model = 2e-5 per_second;
  kre_external_reservoir_model = 1e-8 per_second;
  kb = 0.002 per_second;
  kd = 1e-5 per_second;

  // Reactions:
  rxx1_external_reservoir_model: ssDNA_comp1_external_reservoir_model + ssDNA_comp2_external_reservoir_model + ssDNA_e_external_reservoir_model -> dsDNA_external_reservoir_model; kf_external_reservoir_model*ssDNA_comp1_external_reservoir_model*ssDNA_comp2_external_reservoir_model*ssDNA_e_external_reservoir_model - kre_external_reservoir_model*dsDNA_external_reservoir_model;
  r1: atc_e_external_reservoir_model_1_combined -> atc_i_1_combined; kb*atc_e_external_reservoir_model_1_combined - kd*atc_i_1_combined;
  r0_biocrnpyler_478938: atc_i_1_combined + tetR_biocrnpyler_478938 => complex_atc_i_tetR_biocrnpyler_478938; r0_biocrnpyler_478938_k*atc_i_1_combined*tetR_biocrnpyler_478938;
    r0_biocrnpyler_478938_k = 2e-5;
  r0_1_biocrnpyler_478938: complex_atc_i_tetR_biocrnpyler_478938 => atc_i_1_combined + tetR_biocrnpyler_478938; r0_1_biocrnpyler_478938_k*complex_atc_i_tetR_biocrnpyler_478938;
    r0_1_biocrnpyler_478938_k = 2e-9;
  r2_biocrnpyler_478938: dna_f_biocrnpyler_478938 + tetR_biocrnpyler_478938 => complex_dna_f_tetR_biocrnpyler_478938; r2_biocrnpyler_478938_k*dna_f_biocrnpyler_478938*tetR_biocrnpyler_478938;
    r2_biocrnpyler_478938_k = 4e-7;
  r2_1_biocrnpyler_478938: complex_dna_f_tetR_biocrnpyler_478938 => dna_f_biocrnpyler_478938 + tetR_biocrnpyler_478938; r2_1_biocrnpyler_478938_k*complex_dna_f_tetR_biocrnpyler_478938;
    r2_1_biocrnpyler_478938_k = 1e-12;
  r4_biocrnpyler_478938: complex_dna_f_tetR_biocrnpyler_478938 + atc_i_1_combined => complex_atc_i_dna_f_tetR_biocrnpyler_478938; r4_biocrnpyler_478938_k*complex_dna_f_tetR_biocrnpyler_478938*atc_i_1_combined;
    r4_biocrnpyler_478938_k = 6e-8;
  r4_1_biocrnpyler_478938: complex_atc_i_dna_f_tetR_biocrnpyler_478938 => complex_dna_f_tetR_biocrnpyler_478938 + atc_i_1_combined; r4_1_biocrnpyler_478938_k*complex_atc_i_dna_f_tetR_biocrnpyler_478938;
    r4_1_biocrnpyler_478938_k = 3e-9;
  r6_biocrnpyler_478938: complex_atc_i_dna_f_tetR_biocrnpyler_478938 => dna_f_biocrnpyler_478938 + complex_atc_i_tetR_biocrnpyler_478938; r6_biocrnpyler_478938_k*complex_atc_i_dna_f_tetR_biocrnpyler_478938;
    r6_biocrnpyler_478938_k = 5e-5;
  r6_1_biocrnpyler_478938: dna_f_biocrnpyler_478938 + complex_atc_i_tetR_biocrnpyler_478938 => complex_atc_i_dna_f_tetR_biocrnpyler_478938; r6_1_biocrnpyler_478938_k*dna_f_biocrnpyler_478938*complex_atc_i_tetR_biocrnpyler_478938;
    r6_1_biocrnpyler_478938_k = 1e-10;
  r8_biocrnpyler_478938: dna_f_biocrnpyler_478938 => dna_f_biocrnpyler_478938 + rna_f_biocrnpyler_478938; r8_biocrnpyler_478938_k*dna_f_biocrnpyler_478938;
    r8_biocrnpyler_478938_k = 0.001875;
  r9_biocrnpyler_478938: rna_f_biocrnpyler_478938 + ATP_biocrnpyler_478938 => rna_f_biocrnpyler_478938 + ADP_biocrnpyler_478938 + exsA_biocrnpyler_478938 + P_biocrnpyler_478938; r9_biocrnpyler_478938_k*rna_f_biocrnpyler_478938*ATP_biocrnpyler_478938^n/(ATP_biocrnpyler_478938^n + K);
    r9_biocrnpyler_478938_k = 0.0005; n = 1; K = 1;
  r10_biocrnpyler_478938: rna_f_biocrnpyler_478938 => ; r10_biocrnpyler_478938_k*rna_f_biocrnpyler_478938;
    r10_biocrnpyler_478938_k = 0.001;

  // Unit definitions:
  unit square_metre = metre^2;
  unit per_second = 1 / second;
  unit substance = dimensionless;
end
