// SBML level 3 version 2

model combined_model_of__combined_model_of__external_reservoir_model_combined_model_of__atc_membrane_combined_model_of__biocrnpyler_386547()
  // model units - substance: mole, time: second, volume: litre, area: square_metre, length: metre, extent: mole

  // Compartments:
  compartment cell_external = 2e-6 litre;
  compartment cell_3_internal_combined = 0.0001 litre;

  // Species:
  species ssDNA_comp1_external_reservoir_model in cell_external = 0;
  species ssDNA_comp2_external_reservoir_model in cell_external = 50/cell_external;
  species ssDNA_e_external_reservoir_model in cell_external = 0;
  species dsDNA_external_reservoir_model in cell_external = 0;
  species atc_e_external_reservoir_model_1_combined in cell_external = 10000/cell_external;
  species atc_i in cell_3_internal_combined = 0;
  species dna_h_biocrnpyler_386547 in cell_3_internal_combined = 1/cell_3_internal_combined;
  species rna_h_biocrnpyler_386547 in cell_3_internal_combined = 0;
  species exsA_biocrnpyler_386547 in cell_3_internal_combined = 0;
  species ATP_biocrnpyler_386547 in cell_3_internal_combined = 20/cell_3_internal_combined;
  species ADP_biocrnpyler_386547 in cell_3_internal_combined = 0;
  species P_biocrnpyler_386547 in cell_3_internal_combined = 0;
  species complex_dna_h_exsA_biocrnpyler_386547 in cell_3_internal_combined = 0;
  species gfp_biocrnpyler_386547 in cell_3_internal_combined = 0;

  // Parameters:
  kf_external_reservoir_model = 2e-5 per_second;
  kre_external_reservoir_model = 1e-8 per_second;
  kb = 0.002 per_second;
  kd = 1e-5 per_second;

  // Reactions:
  rxx1_external_reservoir_model: ssDNA_comp1_external_reservoir_model + ssDNA_comp2_external_reservoir_model + ssDNA_e_external_reservoir_model -> dsDNA_external_reservoir_model; kf_external_reservoir_model*ssDNA_comp1_external_reservoir_model*ssDNA_comp2_external_reservoir_model*ssDNA_e_external_reservoir_model - kre_external_reservoir_model*dsDNA_external_reservoir_model;
  r1: atc_e_external_reservoir_model_1_combined -> atc_i; kb*atc_e_external_reservoir_model_1_combined - kd*atc_i;
  r0_biocrnpyler_386547: dna_h_biocrnpyler_386547 + exsA_biocrnpyler_386547 => complex_dna_h_exsA_biocrnpyler_386547; r0_biocrnpyler_386547_k*dna_h_biocrnpyler_386547*exsA_biocrnpyler_386547;
    r0_biocrnpyler_386547_k = 4e-5;
  r0_1_biocrnpyler_386547: complex_dna_h_exsA_biocrnpyler_386547 => dna_h_biocrnpyler_386547 + exsA_biocrnpyler_386547; r0_1_biocrnpyler_386547_k*complex_dna_h_exsA_biocrnpyler_386547;
    r0_1_biocrnpyler_386547_k = 1e-12;
  r2_biocrnpyler_386547: complex_dna_h_exsA_biocrnpyler_386547 => complex_dna_h_exsA_biocrnpyler_386547 + rna_h_biocrnpyler_386547; r2_biocrnpyler_386547_k*complex_dna_h_exsA_biocrnpyler_386547;
    r2_biocrnpyler_386547_k = 0.001875;
  r3_biocrnpyler_386547: rna_h_biocrnpyler_386547 + ATP_biocrnpyler_386547 => rna_h_biocrnpyler_386547 + ADP_biocrnpyler_386547 + gfp_biocrnpyler_386547 + P_biocrnpyler_386547; r3_biocrnpyler_386547_k*rna_h_biocrnpyler_386547*ATP_biocrnpyler_386547^n/(ATP_biocrnpyler_386547^n + K);
    r3_biocrnpyler_386547_k = 0.0005; n = 1; K = 1;
  r4_biocrnpyler_386547: rna_h_biocrnpyler_386547 => ; r4_biocrnpyler_386547_k*rna_h_biocrnpyler_386547;
    r4_biocrnpyler_386547_k = 0.001;

  // Unit definitions:
  unit square_metre = metre^2;
  unit per_second = 1 / second;
  unit substance = dimensionless;
end
