// SBML level 3 version 2

model combined_model_of__combined_model_of__combined_model_of__external_reservoir_model_combined_model_of__atc_membrane_dnaexp_membrane_combined_model_of__biocrnpyler_607772_combined_model_of__combined_model_of__external_reservoir_model_combined_model_of__atc_membrane_combined_model_of__biocrnpyler_478938_combined_model_of__combined_model_of__external_reservoir_model_combined_model_of__atc_membrane_combined_model_of__biocrnpyler_386547()
  // model units - substance: mole, time: second, volume: litre, area: square_metre, length: metre, extent: mole

  // Compartments:
  compartment cell_1_internal_combined = 7e-6 litre;
  compartment cell_external_combined = 1e-6 litre;
  compartment cell_2_internal_combined = 0.0001 litre;
  compartment cell_3_internal_combined = 0.0001 litre;

  // Species:
  species ssDNA in cell_1_internal_combined = 50/cell_1_internal_combined;
  species VirE2_b_ssDNA in cell_1_internal_combined = 0;
  species dna_g_biocrnpyler_607772 in cell_1_internal_combined = 1/cell_1_internal_combined;
  species tetR_biocrnpyler_607772 in cell_1_internal_combined = 10/cell_1_internal_combined;
  species rna_g_biocrnpyler_607772 in cell_1_internal_combined = 0;
  species VirE2_f_biocrnpyler_607772 in cell_1_internal_combined = 0;
  species ATP_biocrnpyler_607772 in cell_1_internal_combined = 10/cell_1_internal_combined;
  species ADP_biocrnpyler_607772 in cell_1_internal_combined = 0;
  species atc_i_1_combined in cell_1_internal_combined = 0;
  species complex_atc_i_tetR_biocrnpyler_607772 in cell_1_internal_combined = 0;
  species VirE2_b_1_combined in cell_1_internal_combined = 0;
  species complex_dna_g_tetR_biocrnpyler_607772 in cell_1_internal_combined = 0;
  species complex_atc_i_dna_g_tetR_biocrnpyler_607772 in cell_1_internal_combined = 0;
  species P_biocrnpyler_607772 in cell_1_internal_combined = 0;
  species dna_f_biocrnpyler_478938 in cell_2_internal_combined = 1/cell_2_internal_combined;
  species tetR_biocrnpyler_478938 in cell_2_internal_combined = 10/cell_2_internal_combined;
  species rna_f_biocrnpyler_478938 in cell_2_internal_combined = 0;
  species exsA_biocrnpyler_478938 in cell_2_internal_combined = 0;
  species ATP_biocrnpyler_478938 in cell_2_internal_combined = 20/cell_2_internal_combined;
  species ADP_biocrnpyler_478938 in cell_2_internal_combined = 0;
  species complex_atc_i_tetR_biocrnpyler_478938 in cell_2_internal_combined = 0;
  species complex_dna_f_tetR_biocrnpyler_478938 in cell_2_internal_combined = 0;
  species complex_atc_i_dna_f_tetR_biocrnpyler_478938 in cell_2_internal_combined = 0;
  species P_biocrnpyler_478938 in cell_2_internal_combined = 0;
  species atc_i in cell_3_internal_combined = 0;
  species dna_h_biocrnpyler_386547 in cell_3_internal_combined = 1/cell_3_internal_combined;
  species rna_h_biocrnpyler_386547 in cell_3_internal_combined = 0;
  species exsA_biocrnpyler_386547 in cell_3_internal_combined = 0;
  species ATP_biocrnpyler_386547 in cell_3_internal_combined = 20/cell_3_internal_combined;
  species ADP_biocrnpyler_386547 in cell_3_internal_combined = 0;
  species P_biocrnpyler_386547 in cell_3_internal_combined = 0;
  species complex_dna_h_exsA_biocrnpyler_386547 in cell_3_internal_combined = 0;
  species gfp_biocrnpyler_386547 in cell_3_internal_combined = 0;
  species ssDNA_comp1_external_reservoir_model_1_combined in cell_external = 0;
  species ssDNA_comp2_external_reservoir_model_1_combined in cell_external = 50/cell_external;
  species dsDNA_external_reservoir_model_1_combined in cell_external = 0;
  species atc_e_external_reservoir_model_1_combined_1_combined in cell_external = 10000/cell_external;
  species ssDNA_e_external_reservoir_model_1_combined_1_combined in cell_external = 0;

  // Parameters:
  kb1 = 0.002 per_second;
  kd1 = 1e-5 per_second;
  kd2 = 0.0002 per_second;
  kf_combined = 2e-5 per_second;
  kre_combined = 1e-8 per_second;
  kb_combined = 0.002 per_second;
  kd_combined = 1e-5 per_second;

  // Reactions:
  R1: VirE2_b_1_combined + ssDNA -> VirE2_b_ssDNA; kb1*VirE2_b_1_combined*ssDNA - kd1*VirE2_b_ssDNA;
  R2: VirE2_b_ssDNA => ssDNA_e_external_reservoir_model_1_combined_1_combined + VirE2_b_1_combined; kd2*VirE2_b_ssDNA;
  r0_biocrnpyler_607772_combined: atc_i_1_combined + tetR_biocrnpyler_607772 => complex_atc_i_tetR_biocrnpyler_607772; r0_biocrnpyler_607772_combined_k*atc_i_1_combined*tetR_biocrnpyler_607772;
    r0_biocrnpyler_607772_combined_k = 0.0002;
  r0_1_biocrnpyler_607772_combined: complex_atc_i_tetR_biocrnpyler_607772 => atc_i_1_combined + tetR_biocrnpyler_607772; r0_1_biocrnpyler_607772_combined_k*complex_atc_i_tetR_biocrnpyler_607772;
    r0_1_biocrnpyler_607772_combined_k = 2e-9;
  r2_biocrnpyler_607772: dna_g_biocrnpyler_607772 + tetR_biocrnpyler_607772 => complex_dna_g_tetR_biocrnpyler_607772; r2_biocrnpyler_607772_k*dna_g_biocrnpyler_607772*tetR_biocrnpyler_607772;
    r2_biocrnpyler_607772_k = 4e-5;
  r2_1_biocrnpyler_607772: complex_dna_g_tetR_biocrnpyler_607772 => dna_g_biocrnpyler_607772 + tetR_biocrnpyler_607772; r2_1_biocrnpyler_607772_k*complex_dna_g_tetR_biocrnpyler_607772;
    r2_1_biocrnpyler_607772_k = 1e-12;
  r4_biocrnpyler_607772: complex_dna_g_tetR_biocrnpyler_607772 + atc_i_1_combined => complex_atc_i_dna_g_tetR_biocrnpyler_607772; r4_biocrnpyler_607772_k*complex_dna_g_tetR_biocrnpyler_607772*atc_i_1_combined;
    r4_biocrnpyler_607772_k = 6e-6;
  r4_1_biocrnpyler_607772: complex_atc_i_dna_g_tetR_biocrnpyler_607772 => complex_dna_g_tetR_biocrnpyler_607772 + atc_i_1_combined; r4_1_biocrnpyler_607772_k*complex_atc_i_dna_g_tetR_biocrnpyler_607772;
    r4_1_biocrnpyler_607772_k = 3e-9;
  r6_biocrnpyler_607772: complex_atc_i_dna_g_tetR_biocrnpyler_607772 => dna_g_biocrnpyler_607772 + complex_atc_i_tetR_biocrnpyler_607772; r6_biocrnpyler_607772_k*complex_atc_i_dna_g_tetR_biocrnpyler_607772;
    r6_biocrnpyler_607772_k = 0.005;
  r6_1_biocrnpyler_607772: dna_g_biocrnpyler_607772 + complex_atc_i_tetR_biocrnpyler_607772 => complex_atc_i_dna_g_tetR_biocrnpyler_607772; r6_1_biocrnpyler_607772_k*dna_g_biocrnpyler_607772*complex_atc_i_tetR_biocrnpyler_607772;
    r6_1_biocrnpyler_607772_k = 1e-10;
  r8_biocrnpyler_607772: dna_g_biocrnpyler_607772 => dna_g_biocrnpyler_607772 + rna_g_biocrnpyler_607772; r8_biocrnpyler_607772_k*dna_g_biocrnpyler_607772;
    r8_biocrnpyler_607772_k = 0.0031875;
  r9_biocrnpyler_607772: rna_g_biocrnpyler_607772 + ATP_biocrnpyler_607772 => rna_g_biocrnpyler_607772 + ADP_biocrnpyler_607772 + VirE2_f_biocrnpyler_607772 + P_biocrnpyler_607772; r9_biocrnpyler_607772_k*rna_g_biocrnpyler_607772*ATP_biocrnpyler_607772^r9_biocrnpyler_607772_n/(ATP_biocrnpyler_607772^r9_biocrnpyler_607772_n + r9_biocrnpyler_607772_K);
    r9_biocrnpyler_607772_k = 0.001; r9_biocrnpyler_607772_n = 1; r9_biocrnpyler_607772_K = 1;
  r10_biocrnpyler_607772: VirE2_f_biocrnpyler_607772 => VirE2_b_1_combined; r10_biocrnpyler_607772_k*VirE2_f_biocrnpyler_607772;
    r10_biocrnpyler_607772_k = 5e-5;
  r10_1_biocrnpyler_607772: VirE2_b_1_combined => VirE2_f_biocrnpyler_607772; r10_1_biocrnpyler_607772_k*VirE2_b_1_combined;
    r10_1_biocrnpyler_607772_k = 1e-10;
  r12_biocrnpyler_607772: rna_g_biocrnpyler_607772 => ; r12_biocrnpyler_607772_k*rna_g_biocrnpyler_607772;
    r12_biocrnpyler_607772_k = 0.001;
  r13_biocrnpyler_607772: VirE2_f_biocrnpyler_607772 => ; r13_biocrnpyler_607772_k*VirE2_f_biocrnpyler_607772;
    r13_biocrnpyler_607772_k = 1e-5;
  r2_biocrnpyler_478938: dna_f_biocrnpyler_478938 + tetR_biocrnpyler_478938 => complex_dna_f_tetR_biocrnpyler_478938; r2_biocrnpyler_478938_k*dna_f_biocrnpyler_478938*tetR_biocrnpyler_478938;
    r2_biocrnpyler_478938_k = 4e-7;
  r2_1_biocrnpyler_478938: complex_dna_f_tetR_biocrnpyler_478938 => dna_f_biocrnpyler_478938 + tetR_biocrnpyler_478938; r2_1_biocrnpyler_478938_k*complex_dna_f_tetR_biocrnpyler_478938;
    r2_1_biocrnpyler_478938_k = 1e-12;
  r4_biocrnpyler_478938: complex_dna_f_tetR_biocrnpyler_478938 + atc_i_1_combined => complex_atc_i_dna_f_tetR_biocrnpyler_478938; r4_biocrnpyler_478938_k*complex_dna_f_tetR_biocrnpyler_478938*atc_i_1_combined;
    r4_biocrnpyler_478938_k = 6e-8;
  r4_1_biocrnpyler_478938: complex_atc_i_dna_f_tetR_biocrnpyler_478938 => complex_dna_f_tetR_biocrnpyler_478938 + atc_i_1_combined; r4_1_biocrnpyler_478938_k*complex_atc_i_dna_f_tetR_biocrnpyler_478938;
    r4_1_biocrnpyler_478938_k = 3e-9;
  r6_biocrnpyler_478938: complex_atc_i_dna_f_tetR_biocrnpyler_478938 => dna_f_biocrnpyler_478938 + complex_atc_i_tetR_biocrnpyler_478938; r6_biocrnpyler_478938_k*complex_atc_i_dna_f_tetR_biocrnpyler_478938;
    r6_biocrnpyler_478938_k = 5e-5;
  r6_1_biocrnpyler_478938: dna_f_biocrnpyler_478938 + complex_atc_i_tetR_biocrnpyler_478938 => complex_atc_i_dna_f_tetR_biocrnpyler_478938; r6_1_biocrnpyler_478938_k*dna_f_biocrnpyler_478938*complex_atc_i_tetR_biocrnpyler_478938;
    r6_1_biocrnpyler_478938_k = 1e-10;
  r8_biocrnpyler_478938: dna_f_biocrnpyler_478938 => dna_f_biocrnpyler_478938 + rna_f_biocrnpyler_478938; r8_biocrnpyler_478938_k*dna_f_biocrnpyler_478938;
    r8_biocrnpyler_478938_k = 0.001875;
  r9_biocrnpyler_478938: rna_f_biocrnpyler_478938 + ATP_biocrnpyler_478938 => rna_f_biocrnpyler_478938 + ADP_biocrnpyler_478938 + exsA_biocrnpyler_478938 + P_biocrnpyler_478938; r9_biocrnpyler_478938_k*rna_f_biocrnpyler_478938*ATP_biocrnpyler_478938^r9_biocrnpyler_478938_n/(ATP_biocrnpyler_478938^r9_biocrnpyler_478938_n + r9_biocrnpyler_478938_K);
    r9_biocrnpyler_478938_k = 0.0005; r9_biocrnpyler_478938_n = 1; r9_biocrnpyler_478938_K = 1;
  r10_biocrnpyler_478938: rna_f_biocrnpyler_478938 => ; r10_biocrnpyler_478938_k*rna_f_biocrnpyler_478938;
    r10_biocrnpyler_478938_k = 0.001;
  r0_biocrnpyler_386547: dna_h_biocrnpyler_386547 + exsA_biocrnpyler_386547 => complex_dna_h_exsA_biocrnpyler_386547; r0_biocrnpyler_386547_k*dna_h_biocrnpyler_386547*exsA_biocrnpyler_386547;
    r0_biocrnpyler_386547_k = 4e-5;
  r0_1_biocrnpyler_386547: complex_dna_h_exsA_biocrnpyler_386547 => dna_h_biocrnpyler_386547 + exsA_biocrnpyler_386547; r0_1_biocrnpyler_386547_k*complex_dna_h_exsA_biocrnpyler_386547;
    r0_1_biocrnpyler_386547_k = 1e-12;
  r2_biocrnpyler_386547: complex_dna_h_exsA_biocrnpyler_386547 => complex_dna_h_exsA_biocrnpyler_386547 + rna_h_biocrnpyler_386547; r2_biocrnpyler_386547_k*complex_dna_h_exsA_biocrnpyler_386547;
    r2_biocrnpyler_386547_k = 0.001875;
  r3_biocrnpyler_386547: rna_h_biocrnpyler_386547 + ATP_biocrnpyler_386547 => rna_h_biocrnpyler_386547 + ADP_biocrnpyler_386547 + gfp_biocrnpyler_386547 + P_biocrnpyler_386547; r3_biocrnpyler_386547_k*rna_h_biocrnpyler_386547*ATP_biocrnpyler_386547^r3_biocrnpyler_386547_n/(ATP_biocrnpyler_386547^r3_biocrnpyler_386547_n + r3_biocrnpyler_386547_K);
    r3_biocrnpyler_386547_k = 0.0005; r3_biocrnpyler_386547_n = 1; r3_biocrnpyler_386547_K = 1;
  r4_biocrnpyler_386547: rna_h_biocrnpyler_386547 => ; r4_biocrnpyler_386547_k*rna_h_biocrnpyler_386547;
    r4_biocrnpyler_386547_k = 0.001;

  // Unit definitions:
  unit square_metre = metre^2;
  unit per_second = 1 / second;
  unit substance = dimensionless;
end
